# OpenSim document version 20302
ForceSet arm_02_2021:
  CoordinateActuator thorax_rot1_reserve: coordinate=thorax_rot1 optimal_force=1
  CoordinateActuator thorax_rot2_reserve: coordinate=thorax_rot2 optimal_force=1
  CoordinateActuator thorax_rot3_reserve: coordinate=thorax_rot3 optimal_force=1
  CoordinateActuator sternoclavicular_r2_reserve: coordinate=sternoclavicular_r2 optimal_force=1
  CoordinateActuator sternoclavicular_r3_reserve: coordinate=sternoclavicular_r3 optimal_force=1
  CoordinateActuator unrotscap_r3_reserve: coordinate=unrotscap_r3 optimal_force=1
  CoordinateActuator unrotscap_r2_reserve: coordinate=unrotscap_r2 optimal_force=1
  CoordinateActuator acromioclavicular_r2_reserve: coordinate=acromioclavicular_r2 optimal_force=1
  CoordinateActuator acromioclavicular_r3_reserve: coordinate=acromioclavicular_r3 optimal_force=1
  CoordinateActuator acromioclavicular_r1_reserve: coordinate=acromioclavicular_r1 optimal_force=1
  CoordinateActuator unrothum_r1_reserve: coordinate=unrothum_r1 optimal_force=1
  CoordinateActuator unrothum_r3_reserve: coordinate=unrothum_r3 optimal_force=1
  CoordinateActuator unrothum_r2_reserve: coordinate=unrothum_r2 optimal_force=1
  CoordinateActuator elv_angle_reserve: coordinate=elv_angle optimal_force=1
  CoordinateActuator shoulder_ab_ad_reserve: coordinate=shoulder_ab_ad optimal_force=1
  CoordinateActuator shoulder1_r2_reserve: coordinate=shoulder1_r2 optimal_force=1
  CoordinateActuator shoulder_ext_int_reserve: coordinate=shoulder_ext_int optimal_force=1
  CoordinateActuator ra_sh_ad_ab_reserve: coordinate=ra_sh_ad_ab optimal_force=1
  CoordinateActuator ra_sh_e_f_reserve: coordinate=ra_sh_e_f optimal_force=1
  CoordinateActuator ra_sh_ext_int_reserve: coordinate=ra_sh_ext_int optimal_force=1
  CoordinateActuator elbow_flexion_reserve: coordinate=elbow_flexion optimal_force=1
  CoordinateActuator ra_el_e_f_reserve: coordinate=ra_el_e_f optimal_force=1
  CoordinateActuator ra_wr_s_p_reserve: coordinate=ra_wr_s_p optimal_force=1
  CoordinateActuator ra_wr_e_f_reserve: coordinate=ra_wr_e_f optimal_force=1
  CoordinateActuator ra_wr_ad_ab_reserve: coordinate=ra_wr_ad_ab optimal_force=1
  CoordinateActuator ra_cmc1_ad_ab_reserve: coordinate=ra_cmc1_ad_ab optimal_force=1
  CoordinateActuator ra_cmc1_f_e_reserve: coordinate=ra_cmc1_f_e optimal_force=1
  CoordinateActuator ra_mcp1_f_e_reserve: coordinate=ra_mcp1_f_e optimal_force=1
  CoordinateActuator ra_ip1_f_e_reserve: coordinate=ra_ip1_f_e optimal_force=1
  CoordinateActuator ra_mcp2_e_f_reserve: coordinate=ra_mcp2_e_f optimal_force=1
  CoordinateActuator ra_mcp2_ab_ad_reserve: coordinate=ra_mcp2_ab_ad optimal_force=1
  CoordinateActuator ra_pip2_e_f_reserve: coordinate=ra_pip2_e_f optimal_force=1
  CoordinateActuator ra_dip2_e_f_reserve: coordinate=ra_dip2_e_f optimal_force=1
  CoordinateActuator ra_mcp3_e_f_reserve: coordinate=ra_mcp3_e_f optimal_force=1
  CoordinateActuator ra_mcp3_ab_ad_reserve: coordinate=ra_mcp3_ab_ad optimal_force=1
  CoordinateActuator ra_pip3_e_f_reserve: coordinate=ra_pip3_e_f optimal_force=1
  CoordinateActuator ra_dip3_e_f_reserve: coordinate=ra_dip3_e_f optimal_force=1
  CoordinateActuator ra_mcp4_e_f_reserve: coordinate=ra_mcp4_e_f optimal_force=1
  CoordinateActuator ra_mcp4_ab_ad_reserve: coordinate=ra_mcp4_ab_ad optimal_force=1
  CoordinateActuator ra_pip4_e_f_reserve: coordinate=ra_pip4_e_f optimal_force=1
  CoordinateActuator ra_dip4_e_f_reserve: coordinate=ra_dip4_e_f optimal_force=1
  CoordinateActuator ra_mcp5_e_f_reserve: coordinate=ra_mcp5_e_f optimal_force=1
  CoordinateActuator ra_mcp5_ab_ad_reserve: coordinate=ra_mcp5_ab_ad optimal_force=1
  CoordinateActuator ra_pip5_e_f_reserve: coordinate=ra_pip5_e_f optimal_force=1
  CoordinateActuator ra_dip5_e_f_reserve: coordinate=ra_dip5_e_f optimal_force=1
