# OpenSim document version 40000
Model arm_model_02-2021:
  gravity: 0 -9.80665 0
  publications: Gritsenko et al. PLOS ONE 2016
  length_units: meters
  force_units: N
  credits:
    Matthew Boots, Russell Hardesty, Anton Sobinov, Valeriya Gritsenko, Sergiy Yakovenko, Katherine R. Saul, Wendy M. Murray, Craig M. Goehler, Melissa Daly, Meghan E. Vidt, Dustin L. Crouch
  defaults: Millard2012EquilibriumMuscle default: min_control=0.01 optimal_force=1 max_isometric_force=987.26
      optimal_fiber_length=0.0535 tendon_slack_length=0.078 pennation_angle_at_optimal=0.1396263 [radians]
      max_contraction_velocity=10 activation_time_constant=0.01 [seconds] deactivation_time_constant=0.04 [seconds]
  Ground
  BodySet:
    Body Thorax: mass=38.298 [kg] mass_center=(-0.0616 -0.254 0) inertia=(0.6915 1.0121 1.3266 0 0 0) meshes=thorax.vtp
      WrapEllipsoid Thorax: xyz_body_rotation=(0.0434587 -0.331962 0.189892) translation=(-0.0386 -0.1273 0.0709)
          quadrant=all dimensions=(0.1 0.135 0.08)
      WrapEllipsoid PECM_R_Thorax: xyz_body_rotation=(0.0434587 -0.331962 0.189892)
          translation=(-0.0386 -0.1273 0.0709) quadrant=all dimensions=(0.1 0.135 0.08)
    Body RClavicle: mass=0.156 mass_center=(-0.011096 0.0063723 0.054168)
        inertia=(0.00024259 0.00025526 4.442e-5 -1.898e-5 -6.994e-5 5.371e-5) meshes=clavicle.vtp
    Body RClavicle_Phantom: mass=0.0001 mass_center=(0 0 0) inertia=(1 1 1 0 0 0)
    Body RScapula: mass=0.70396 mass_center=(-0.054694 -0.035032 -0.043734)
        inertia=(0.0012429 0.0011504 0.0013651 0.0004494 0.00040922 0.0002411) meshes=scapula.vtp
      WrapTorus SUPSP2: xyz_body_rotation=(0.3 0.4 -0.1) translation=(-0.01 -0.01 -0.01) quadrant=all
          inner_radius=0.007 outer_radius=0.01
      WrapEllipsoid Deltoid2: xyz_body_rotation=(3.13042 -1.54881 -1.31423) translation=(-0.0058 -0.0378 0.0096)
          quadrant=-y dimensions=(0.033 0.04 0.035)
      WrapTorus Delt3: xyz_body_rotation=(0.620988 0.32882 -0.560774) translation=(-0.0973 -0.0428 -0.037) quadrant=all
          inner_radius=0.04 outer_radius=0.06
      WrapTorus INFSP: xyz_body_rotation=(0.0253073 0.58835 0.151844) translation=(-0.0561 -0.0199 -0.0112)
          quadrant=all inner_radius=0.008 outer_radius=0.019
      WrapEllipsoid TMIN: xyz_body_rotation=(-2.09754 -0.280823 -1.76348) translation=(-0.0418 -0.0519 -0.0359)
          quadrant=x dimensions=(0.03 0.03 0.05)
      WrapCylinder TRIlongglen: xyz_body_rotation=(1.37532 -0.294612 2.43596) translation=(-0.0359 -0.0309 -0.0132)
          quadrant=x radius=0.003 length=0.03
    Body RScapula_Phantom: mass=0.0001 mass_center=(0 0 0) inertia=(1 1 1 0 0 0)
    Body Phys_Phantom: mass=0.0001 mass_center=(0 0 0) inertia=(0 0 0 0 0 0)
    Body RA1H_Phantom: mass=0.0001 mass_center=(0 0 0) inertia=(1 1 1 0 0 0)
    Body RA1H_Phantom2: mass=0.0001 mass_center=(0 0 0) inertia=(1 1 1 0 0 0)
    Body RA1H: mass=2.0832 mass_center=(0.0174 -0.1353 -0.0123) inertia=(0.0182 0.0024 0.0182 0 0 0) meshes=humerus.vtp
      WrapTorus Deltoid2: xyz_body_rotation=(0.7742 0.022 -1.31423) translation=(-0.0058 0.02 0.03) quadrant=x
          inner_radius=0.03 outer_radius=0.04
      WrapEllipsoid DELT1hh: xyz_body_rotation=(0.0584685 1.00461 0.570374) translation=(-0.0139 -0.0127 -0.0262)
          quadrant=z dimensions=(0.03 0.1 0.05)
      WrapCylinder delt2hum: xyz_body_rotation=(1.55093 -0.0199582 0.0596618) translation=(0.0017 -0.0958 0.0011)
          quadrant=all radius=0.0109 length=0.12
      WrapEllipsoid delt3hum: xyz_body_rotation=(1.72735 0.0759218 -2.74313) translation=(0.0019 -0.0592 0.0011)
          quadrant=x dimensions=(0.01 0.01 0.05)
      WrapEllipsoid SUPSP: xyz_body_rotation=(0.0380482 0.00855211 -1.30673) translation=(0.0002 0.0077 0.0043)
          quadrant=all dimensions=(0.02 0.02 0.02)
      WrapEllipsoid INFSP_and_TMIN_hum_head: xyz_body_rotation=(-0.286583 -0.00907571 -0.0684169)
          translation=(-0.0003 0.0026 0.0038) quadrant=all dimensions=(0.02 0.025 0.02)
      WrapEllipsoid SUBSCAP: xyz_body_rotation=(-0.924501 0.288852 0.381529) translation=(-0.0025 0.0007 -0.0045)
          quadrant=all dimensions=(0.02 0.017 0.028)
      WrapCylinder TMINhum: xyz_body_rotation=(1.75353 0.0692896 2.74628) translation=(-0.0014 -0.0455 0) quadrant=x
          radius=0.007 length=0.07
      WrapCylinder TMAJ_LAThum: xyz_body_rotation=(1.53641 -0.0637045 1.41424) translation=(0.0007 -0.0443 -0.0055)
          quadrant=-x radius=0.007 length=0.04
      WrapCylinder PEC12hum: xyz_body_rotation=(1.55928 -0.0774926 -0.925897) translation=(0.002 -0.0508 -0.0017)
          quadrant=x radius=0.009 length=0.07
      WrapSphere PEC23hh: translation=(-0.0086 0.0021 -0.0004) quadrant=all radius=0.02
      WrapCylinder PEC3hum: xyz_body_rotation=(1.44094 -0.0561996 1.75196) translation=(0.0009 -0.0551 -0.0004)
          quadrant=-x radius=0.008 length=0.1
      WrapCylinder LAT_TMAJhh: xyz_body_rotation=(-0.305084 -0.018326 -0.686613) translation=(-0.0224 0.0102 0.0094)
          quadrant=-y radius=0.007 length=0.045
      WrapEllipsoid LAT_TMAJ2hh: xyz_body_rotation=(-0.127235 1.8469 0.0197222) translation=(0.0016 0.0092 -0.0052)
          quadrant=x dimensions=(0.01 0.02 0.02)
      WrapEllipsoid TRIlonghh: xyz_body_rotation=(3.00162 -0.853466 2.57419) translation=(-0.0078 -0.0041 -0.0014)
          quadrant=z dimensions=(0.035 0.02 0.02)
      WrapCylinder TRI: xyz_body_rotation=(-0.14015 -0.00628319 0.154985) translation=(0.0028 -0.2919 -0.0119)
          quadrant=all radius=0.016 length=0.1
      WrapSphere TMAJ_LAT_PEC_CORBhh: translation=(0.0007 0 0.006) quadrant=all radius=0.03
      WrapSphere DELT_TMAJ_LAT_PEC_CORBhh: translation=(0.0007 0 0.006) quadrant=all radius=0.03
      WrapCylinder CORBhum: xyz_body_rotation=(-1.60832 0.0959931 0.875283) translation=(0.0027 -0.1202 -0.0059)
          quadrant=x radius=0.008 length=0.1
      WrapEllipsoid Elbow_PT_ECRL_1: xyz_body_rotation=(-0.162 -0.11083 0.61453) translation=(0.003 -0.2872 -0.0069)
          quadrant=x dimensions=(0.018 0.025 0.035)
      WrapCylinder TRI_2: xyz_body_rotation=(-0.14015 -0.00628319 0.154985) translation=(0.002 -0.279 -0.0119)
          quadrant=all radius=0.024 length=0.1
      WrapCylinder BIC_LO_elbow: xyz_body_rotation=(-0.14015 -0.0062832 0.15499) translation=(0.004 -0.2731 -0.0119)
          quadrant=x radius=0.035 length=0.11
      WrapCylinder BIC_LO_3: xyz_body_rotation=(-0.19252 -0.0062832 1.5708) translation=(0.0255 -0.223 -0.033)
          quadrant=-x radius=0.005 length=0.11
      WrapEllipsoid BIC_LO_2: xyz_body_rotation=(-2.0043 -1.0016 0.97547) translation=(0.0033 0.0073 0.0003)
          quadrant=-y dimensions=(0.025 0.02 0.02)
      WrapCylinder BIC_SH_elbow: xyz_body_rotation=(-0.14015 -0.0062832 0.15499) translation=(0.004 -0.2731 -0.0119)
          quadrant=x radius=0.035 length=0.11
      WrapEllipsoid ANC_1: xyz_body_rotation=(0.00750492 -0.196699 1.04929) translation=(0.0024 -0.285 0.002)
          quadrant=-x dimensions=(0.014 0.014 0.014)
      WrapCylinder PECM_R_hum: xyz_body_rotation=(1.55928 -0.0774926 -0.925897) translation=(0.002 -0.0508 -0.0017)
          quadrant=x radius=0.009 length=0.07
      WrapEllipsoid PECM_R_hh: xyz_body_rotation=(-0.620465 -0.310494 0.363727) translation=(-0.0037 0.0005 -0.0025)
          quadrant=-z dimensions=(0.03 0.02 0.02)
      WrapEllipsoid Elbow_PT: xyz_body_rotation=(-0.162 -0.093377 0.61453) translation=(0.003 -0.2772 -0.0076)
          quadrant=x dimensions=(0.02 0.032 0.032)
      WrapCylinder ElbowECRLFlex: xyz_body_rotation=(0 0.15 0) translation=(0.015 -0.25 0) quadrant=-y radius=0.012
          length=0.08
    Body RA2U: mass=0.9827 mass_center=(0.0086 -0.0853 0.0216)
        inertia=(0.0048 0.001 0.0044 0.00028171 -6.7703e-5 0.0009706) meshes=ulna.vtp
      WrapCylinder EPL_prosup2: xyz_body_rotation=(-1.7 -0.1 0) translation=(-0.009 -0.11 0.02) quadrant=-y radius=0.01
          length=0.1
      WrapCylinder PQ2_1: xyz_body_rotation=(1.39138 0.0689405 1.52245) translation=(-0.0012 -0.2092 0.0428)
          quadrant=all radius=0.008 length=0.1
      WrapEllipsoid ANC_2: xyz_body_rotation=(0.00750492 -0.196699 1.04929) translation=(-0.016 0.002 0.002)
          quadrant=all dimensions=(0.012 0.012 0.012)
    Body RA2R: mass=0.2077 mass_center=(0.0299 -0.1614 0.0139)
        inertia=(0.00038999 7.8781e-5 0.000358 2.6803e-5 -3.7705e-6 5.7073e-5) meshes=radius.vtp
      WrapCylinder WristFCUSup: xyz_body_rotation=(-0.1 1.05 0) translation=(-0.016 -0.104 0.0014) quadrant=x
          radius=0.01 length=0.02
      WrapCylinder PQ1: xyz_body_rotation=(-1.60762 -0.0127409 -2.69025) translation=(0.0281 -0.1986 0.0288)
          quadrant=all radius=0.01 length=0.1
      WrapCylinder WristFCRFlex: xyz_body_rotation=(0.593936 1.50011 -2.23559) translation=(0.033 -0.228 0.008)
          quadrant=-y radius=0.004 length=0.02
      WrapCylinder WristFCUFlex: xyz_body_rotation=(0.593936 1.50011 -2.23559) translation=(0.015 -0.231 0.01)
          quadrant=-y radius=0.004 length=0.02
      WrapCylinder WristExtFingers: xyz_body_rotation=(0.593936 1.6 -2.23559) translation=(0.01 -0.232 0.045)
          quadrant=y radius=0.007 length=0.08
      WrapCylinder WristFlexFingers: xyz_body_rotation=(0.59394 1.5001 -1.7) translation=(0.01 -0.24 0.025) quadrant=-y
          radius=0.016 length=0.08
      WrapCylinder WristEIPFlex: xyz_body_rotation=(0.593936 1.50011 -1.7) translation=(0.01 -0.24 0.024) quadrant=-y
          radius=0.015 length=0.08
      WrapTorus EPL_Wrist: xyz_body_rotation=(1.3 0 0) translation=(0.035 -0.24 0.035) quadrant=all inner_radius=0.007
          outer_radius=0.008
      WrapCylinder wristSUPsup: xyz_body_rotation=(1.57 0 -2) translation=(-0.001 -0.03 0.005) quadrant=-y radius=0.01
          length=0.04
      WrapCylinder WristECUSup: xyz_body_rotation=(0 -2.2 0) translation=(0 -0.04 0.0075) quadrant=x radius=0.015
          length=0.05
      WrapCylinder WristECRLPro: xyz_body_rotation=(1.5 0.25 0) translation=(0.01 -0.08 0.008) quadrant=x radius=0.012
          length=0.05
      WrapTorus ECRB_1: xyz_body_rotation=(1.57 0 0) translation=(0.02 -0.237 0.044) quadrant=all inner_radius=0.005
          outer_radius=0.007
      WrapCylinder WristFCRSup: translation=(0.009 -0.07 0) quadrant=x radius=0.01 length=0.04
      WrapCylinder WristFCUPro: xyz_body_rotation=(-0.1 1.8 0) translation=(0.02 -0.1 0.01) quadrant=x radius=0.01
          length=0.03
      WrapCylinder WristPLSup: translation=(-0.005 -0.1 0) quadrant=x radius=0.018 length=0.04
      WrapCylinder BIC_LO_pro_sup: xyz_body_rotation=(1.3833 0.15001 0) translation=(0.0075 -0.06 0.003) quadrant=-y
          radius=0.0055 length=0.09
      WrapCylinder BIC_SH__pro_sup: xyz_body_rotation=(1.3833 0.15001 0) translation=(0.0075 -0.06 0.003) quadrant=-y
          radius=0.0055 length=0.09
      WrapCylinder Sup_Pro_PT: xyz_body_rotation=(1.45 0.25 0) translation=(0.02 -0.1 0.01) quadrant=x radius=0.009
          length=0.09
    Body RA3M: mass=0.2455 mass_center=(0 -0.045 0) inertia=(0.000184 0.00013045 0.0002778 0 0 0)
        meshes=(sdfast_1seg_hand_fr_c_5mc.vtp sdfast_1seg_hand_fr_c_4mc.vtp sdfast_1seg_hand_fr_c_3mc.vtp sdfast_1seg_hand_fr_c_2mc.vtp sdfast_1seg_hand_fr_c_trapezium.vtp sdfast_1seg_hand_fr_c_trapezoid.vtp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)
      WrapCylinder WristAPLExt: xyz_body_rotation=(0.593936 1.6 -2.23559) translation=(0.026 0 0) quadrant=y
          radius=0.0055 length=0.01
      WrapCylinder WristAPLExt2: xyz_body_rotation=(0.593936 1.6 -2.23559) translation=(0.026 0 -0.012) quadrant=-y
          radius=0.0055 length=0.01
      WrapCylinder WristEPBExt: xyz_body_rotation=(0.593936 1.6 -2.23559) translation=(0.026 0.001 0.001) quadrant=y
          radius=0.004 length=0.01
      WrapCylinder WristEPBFlex: xyz_body_rotation=(0.593936 1.6 -2.23559) translation=(0.026 -0.0029 -0.007)
          quadrant=-y radius=0.004 length=0.01
      WrapCylinder WristFCUExt: xyz_body_rotation=(0.593936 1.50011 -2.23559) translation=(-0.01 -0.001 0) quadrant=y
          radius=0.014 length=0.02
      WrapCylinder WristFDSExt: xyz_body_rotation=(0.59394 1.5001 -2.2356) translation=(0 -0.001 0) quadrant=y
          radius=0.012 length=0.05
      WrapCylinder WristFCRExt: xyz_body_rotation=(0.593936 1.50011 -2.23559) translation=(0.015 -0.003 0) quadrant=y
          radius=0.0135 length=0.02
      WrapTorus Thumb_APB: xyz_body_rotation=(0.785 1.57 0) translation=(0.015 -0.019 -0.027) quadrant=all
          inner_radius=0.004 outer_radius=0.005
      WrapTorus Thumb_EPB: xyz_body_rotation=(1.5 0.3 0) translation=(0.04 -0.021 -0.015) quadrant=all
          inner_radius=0.004 outer_radius=0.005
      WrapTorus Thumb_APL: xyz_body_rotation=(-0.7 0 0) translation=(0.033 -0.018 -0.018) quadrant=all
          inner_radius=0.004 outer_radius=0.005
      WrapTorus Thumb_A_A_ADPT: xyz_body_rotation=(0 1.57 0) translation=(0.014 -0.048 -0.01) quadrant=all
          inner_radius=0.002 outer_radius=0.003
      WrapCylinder Prox2FlexFDS: xyz_body_rotation=(0.593936 1.50011 -2.23559) translation=(0.021 -0.083 0) quadrant=y
          radius=0.009 length=0.01
      WrapCylinder Prox3FlexFDS: xyz_body_rotation=(0.593936 1.50011 -2.23559) translation=(0.004 -0.083 0) quadrant=y
          radius=0.013 length=0.01
      WrapCylinder Prox4FlexFDS: xyz_body_rotation=(0.593936 1.50011 -2.23559) translation=(-0.011 -0.079 0) quadrant=y
          radius=0.0115 length=0.01
      WrapCylinder Prox5FlexFDS: xyz_body_rotation=(0.593936 1.50011 -2.23559) translation=(-0.022 -0.072 0) quadrant=y
          radius=0.01 length=0.012
      WrapCylinder ProxEDMExt2: xyz_body_rotation=(0.593936 1.50011 -2.23559) translation=(-0.022 -0.075 0) quadrant=-y
          radius=0.005 length=0.012
      WrapTorus ECRL_Wrist_1: xyz_body_rotation=(1.5708 0 0) translation=(0.014 -0.013 0.012) quadrant=all
          inner_radius=0.002 outer_radius=0.003
      WrapCylinder WristPLExt: xyz_body_rotation=(0.593936 1.50011 -2.23559) translation=(0 -0.004 0) quadrant=y
          radius=0.02 length=0.02
      WrapCylinder WristECUExt: xyz_body_rotation=(1.0472 1.5001 -2) translation=(-0.015 -0.004 0.006) quadrant=y
          radius=0.001 length=0.02
      WrapCylinder WristECUFlex: xyz_body_rotation=(0.59394 1.5001 -2) translation=(-0.015 -0.005 0) quadrant=-y
          radius=0.005 length=0.02
      WrapCylinder WristFDP2Ext: xyz_body_rotation=(0.59394 1.5001 -2.2356) translation=(0 -0.001 0) quadrant=y
          radius=0.015 length=0.05
      WrapCylinder Prox2FlexFDP: xyz_body_rotation=(0.59394 1.5001 -2.2356) translation=(0.021 -0.083 0) quadrant=y
          radius=0.008 length=0.01
      WrapCylinder Prox3FlexFDP: xyz_body_rotation=(0.59394 1.5001 -2.2356) translation=(0.004 -0.085 0) quadrant=y
          radius=0.0095 length=0.01
      WrapCylinder Prox4FlexFDP: xyz_body_rotation=(0.593936 1.50011 -2.23559) translation=(-0.011 -0.081 0) quadrant=y
          radius=0.0095 length=0.01
      WrapCylinder Prox5FlexFDP: xyz_body_rotation=(0.59394 1.5001 -2.2356) translation=(-0.022 -0.075 0) quadrant=y
          radius=0.0085 length=0.012
    Body RA4P1: mass=0.0198 mass_center=(0 -0.0278 0) inertia=(5.5409e-6 9.12e-7 5.5409e-6 0 0 0) meshes=1mc.vtp
      WrapTorus Thumb_OP: xyz_body_rotation=(1.57376 0 2) translation=(-0.005 0 -0.005) quadrant=all inner_radius=0.004
          outer_radius=0.005
      WrapCylinder ThumbFlexCylinder: xyz_body_rotation=(0 -0.6 0) translation=(0 0 0) quadrant=-x radius=0.016
          length=0.03
      WrapTorus ThumbFlexTorus: xyz_body_rotation=(-1.57376 -0.0797616 0.39235) translation=(-0.01 0 -0.02)
          quadrant=all inner_radius=0.002 outer_radius=0.008
      WrapTorus Thumb_EPL: xyz_body_rotation=(-1.57376 -0.0797616 0.39235) translation=(0.01 0 0.007) quadrant=all
          inner_radius=0.004 outer_radius=0.005
      WrapCylinder CentralFlex1: translation=(0 -0.04 0) quadrant=-x radius=0.007 length=0.015
    Body RA5C1: mass=0.0179 mass_center=(0 -0.0183 0) inertia=(2.38e-6 7.58e-7 2.38e-6 0 0 0) meshes=thumbprox.vtp
      WrapCylinder CenFPBFlex: xyz_body_rotation=(0 0 0.4) translation=(-0.003 0.002 0) quadrant=-x radius=0.0035
          length=0.015
      WrapCylinder CenFPLFlex: xyz_body_rotation=(0 0 0.4) translation=(0.002 0.004 0) quadrant=-x radius=0.011
          length=0.015
      WrapCylinder CenExtEPB: xyz_body_rotation=(0 0 0.2) translation=(0 0.001 0) quadrant=x radius=0.0085 length=0.015
      WrapCylinder CenExtEPL: xyz_body_rotation=(0 0 0.2) translation=(0 0.002 0) quadrant=x radius=0.0085 length=0.015
    Body RA6D1: mass=0.0139 mass_center=(0 -0.013 0) inertia=(1.05e-6 5.26e-7 1.05e-6 0 0 0) meshes=thumbdist.vtp
      WrapCylinder DistalFlex1: translation=(-0.002 0.001 0) quadrant=-x radius=0.006 length=0.01
      WrapCylinder DistalExt1: translation=(0.002 0.001 0) quadrant=x radius=0.002 length=0.01
    Body RA4P2: mass=0.0163 mass_center=(0 -0.0169 0) inertia=(1.9255e-6 7.51e-7 1.9255e-6 0 0 0) meshes=2proxph.vtp
      WrapCylinder ProxEDC2Ext: xyz_body_rotation=(0.59394 1.5001 -2.2356) translation=(0 0.001 0.0065) quadrant=-y
          radius=0.0025 length=0.012
      WrapCylinder CentralExt2: xyz_body_rotation=(-1.57 1.57 1) translation=(0 -0.041 0) quadrant=-y radius=0.004
          length=0.012
      WrapCylinder Cen2FlexFDS: xyz_body_rotation=(-1.57 1.57 0.25) translation=(0 -0.041 -0.0015) quadrant=y
          radius=0.004 length=0.01
      WrapCylinder Cen2FlexFDP: xyz_body_rotation=(-1.57 1.57 0.8) translation=(0 -0.04 -0.0045) quadrant=y
          radius=0.003 length=0.01
    Body RA5C2: mass=0.0139 mass_center=(0 -0.0123 0) inertia=(9.9e-7 5.88e-7 9.9e-7 0 0 0) meshes=2midph.vtp
      WrapCylinder DistalExt2: xyz_body_rotation=(-1.57 1.57 0) translation=(0 -0.022 0) quadrant=-y radius=0.0009
          length=0.01
    Body RA6D2: mass=0.0131 mass_center=(0 -0.0069 0) inertia=(4.53e-7 4.96e-7 4.53e-7 0 0 0) meshes=2distph.vtp
    Body RA4P3: mass=0.0202 mass_center=(0 -0.0176 0) inertia=(2.5527e-6 9.31e-7 2.5527e-6 0 0 0) meshes=3proxph.vtp
      WrapCylinder ProxEDC3Ext: xyz_body_rotation=(0.59394 1.5001 -2.2356) translation=(0 0.005 0.004) quadrant=-y
          radius=0.0025 length=0.012
      WrapCylinder Cen3FlexFDS: xyz_body_rotation=(-1.57 1.57 0.25) translation=(0 -0.0415 -0.0015) quadrant=y
          radius=0.005 length=0.01
      WrapCylinder Cen3FlexFDP: xyz_body_rotation=(-1.57 1.57 0.8) translation=(0 -0.04 -0.0035) quadrant=y
          radius=0.004 length=0.01
    Body RA5C3: mass=0.0159 mass_center=(0 -0.0128 0) inertia=(1.1961e-6 6.73e-7 1.961e-6 0 0 0) meshes=3midph.vtp
      WrapCylinder DistalExt3: xyz_body_rotation=(-1.57 1.57 0) translation=(0 -0.029 0) quadrant=-y radius=0.0007
          length=0.01
    Body RA6D3: mass=0.0119 mass_center=(0 -0.0071 0) inertia=(4.25e-7 4.5424e-7 4.25e-7 0 0 0) meshes=3distph.vtp
    Body RA4P4: mass=0.0143 mass_center=(0 -0.0165 0) inertia=(1.64e-6 6.59e-7 1.64e-6 0 0 0) meshes=4proxph.vtp
      WrapCylinder ProxEDC4Ext: xyz_body_rotation=(0.593936 1.50011 -2.23559) translation=(0 0.0025 0.003) quadrant=-y
          radius=0.002 length=0.012
      WrapCylinder Cen4FlexFDS: xyz_body_rotation=(-1.57 1.57 0.8) translation=(0 -0.04 -0.002) quadrant=y
          radius=0.0035 length=0.01
      WrapCylinder Cen4FlexFDP: xyz_body_rotation=(-1.57 1.57 1.2) translation=(0 -0.038 -0.003) quadrant=y
          radius=0.003 length=0.01
    Body RA5C4: mass=0.0108 mass_center=(0 -0.012 0) inertia=(7.43e-7 4.57e-7 7.43e-7 0 0 0) meshes=4midph.vtp
      WrapCylinder DistalExt4: xyz_body_rotation=(-1.57 1.57 0) translation=(0 -0.024 0) quadrant=-y radius=0.0007
          length=0.01
    Body RA6D4: mass=0.0093 mass_center=(0 -0.0067 0) inertia=(3.15e-7 3.52e-7 3.15e-7 0 0 0) meshes=4distph.vtp
    Body RA4P5: mass=0.0121 mass_center=(0 -0.0143 0) inertia=(1.097e-6 5.58e-7 1.097e-6 0 0 0) meshes=5proxph.vtp
      WrapCylinder ProxEDC5Ext: xyz_body_rotation=(0.59394 1.5001 -2.2356) translation=(0 0.002 0.003) quadrant=-y
          radius=0.002 length=0.012
      WrapCylinder ProxEDMExt: xyz_body_rotation=(0.593936 1.50011 -2.23559) translation=(0 0.002 0.003) quadrant=-y
          radius=0.002 length=0.012
      WrapCylinder Cen5ExtEDM: xyz_body_rotation=(-1.57 1.57 0) translation=(0 -0.032 0.0005) quadrant=-y radius=0.0026
          length=0.01
      WrapCylinder Cen5FlexFDS: xyz_body_rotation=(-1.57 1.57 0) translation=(0 -0.033 -0.001) quadrant=y radius=0.003
          length=0.01
      WrapCylinder Cen5FlexFDP: xyz_body_rotation=(-1.57 1.57 1) translation=(0 -0.031 -0.003) quadrant=y radius=0.002
          length=0.01
    Body RA5C5: mass=0.0073 mass_center=(0 -0.0103 0) inertia=(4.13e-7 3.09e-7 4.13e-7 0 0 0) meshes=5midph.vtp
      WrapCylinder DistalExt5: xyz_body_rotation=(-1.57 1.57 0) translation=(0 -0.019 0) quadrant=-y radius=0.0015
          length=0.01
    Body RA6D5: mass=0.0067 mass_center=(0 -0.0058 0) inertia=(2.01e-7 2.54e-7 2.01e-7 0 0 0) meshes=5distph.vtp
      WrapCylinder Dist5FlexFDP_1: xyz_body_rotation=(-1.57 1.57 0) translation=(0 0 0.003) quadrant=y radius=0.001
          length=0.01
      WrapCylinder Dist5FlexFDP_2: xyz_body_rotation=(-2.0944 1.57 0) translation=(0 -0.003 -0.0045) quadrant=-y
          radius=0.001 length=0.01
  JointSet:
    CustomJoint ground_thorax: socket_parent_frame=ground_offset socket_child_frame=Thorax_offset
      Coordinate thorax_rot1: default_value=0 range=(-1.5708 1.5708) clamped=false locked=true
      Coordinate thorax_rot2: default_value=0 range=(-1.5708 1.5708) clamped=false locked=true
      Coordinate thorax_rot3: default_value=0 range=(-1.5708 1.5708) clamped=false locked=true
      PhysicalOffsetFrame ground_offset: socket_parent=/ground translation=(0 0 0) [meters]
      PhysicalOffsetFrame Thorax_offset: socket_parent=/bodyset/Thorax translation=(0 -0.508 0)
      SpatialTransform: axes_held_at_zero=(translation1 translation2 translation3)
        TransformAxis rotation1: coordinates=thorax_rot1 axis=(0 0 1) LinearFunction(coefficients=1 0)
        TransformAxis rotation2: coordinates=thorax_rot2 axis=(0 1 0) LinearFunction(coefficients=1 0)
        TransformAxis rotation3: coordinates=thorax_rot3 axis=(1 0 0) LinearFunction(coefficients=1 0)
    CustomJoint sternoclavicular: socket_parent_frame=Thorax_offset socket_child_frame=RClavicle_offset
      Coordinate sternoclavicular_r2: default_value=-0.1267109 range=(-99999.9 99999.9) clamped=false
      Coordinate sternoclavicular_r3: default_value=0.05366888 range=(-99999.9 99999.9) clamped=false
      PhysicalOffsetFrame Thorax_offset: socket_parent=/bodyset/Thorax translation=(0.006325 0.00693 0.025465)
      PhysicalOffsetFrame RClavicle_offset: socket_parent=/bodyset/RClavicle translation=(0 0 0)
      SpatialTransform: axes_held_at_zero=(rotation3 translation1 translation2 translation3)
        TransformAxis rotation1: coordinates=sternoclavicular_r2 axis=(0.0153 0.9892987 -0.1451)
            LinearFunction(coefficients=1 0)
        TransformAxis rotation2: coordinates=sternoclavicular_r3 axis=(-0.9944725 0 -0.104997)
            LinearFunction(coefficients=1 0)
    CustomJoint unrotscap: socket_parent_frame=RClavicle_offset socket_child_frame=RClavicle_Phantom_offset
      Coordinate unrotscap_r3: default_value=-0.05366888 range=(-99999.9 99999.9) clamped=false
      Coordinate unrotscap_r2: default_value=0.1267109 range=(-99999.9 99999.9) clamped=false
      PhysicalOffsetFrame RClavicle_offset: socket_parent=/bodyset/RClavicle translation=(-0.01433 0.02007 0.135535)
      PhysicalOffsetFrame RClavicle_Phantom_offset: socket_parent=/bodyset/RClavicle_Phantom translation=(0 0 0)
      SpatialTransform: axes_held_at_zero=(rotation3 translation1 translation2 translation3)
        TransformAxis rotation1: coordinates=unrotscap_r3 axis=(-0.9944725 0 -0.104997)
            LinearFunction(coefficients=1 0)
        TransformAxis rotation2: coordinates=unrotscap_r2 axis=(0.0153 0.9892987 -0.1451)
            LinearFunction(coefficients=1 0)
    CustomJoint acromioclavicular: socket_parent_frame=RClavicle_Phantom_offset socket_child_frame=RScapula_offset
      Coordinate acromioclavicular_r2: default_value=-0.02565634 range=(-99999.9 99999.9) clamped=false
      Coordinate acromioclavicular_r3: default_value=0.2073451 range=(-99999.9 99999.9) clamped=false
      Coordinate acromioclavicular_r1: default_value=0.09320058 range=(-99999.9 99999.9) clamped=false
      PhysicalOffsetFrame RClavicle_Phantom_offset: socket_parent=/bodyset/RClavicle_Phantom translation=(0 0 0)
      PhysicalOffsetFrame RScapula_offset: socket_parent=/bodyset/RScapula translation=(0 0 0)
      SpatialTransform: axes_held_at_zero=(translation1 translation2 translation3)
        TransformAxis rotation1: coordinates=acromioclavicular_r2 axis=(0.1570949 0.9472686 -0.2792909)
            LinearFunction(coefficients=1 0)
        TransformAxis rotation2: coordinates=acromioclavicular_r3 axis=(-0.754084 0.297594 0.585487)
            LinearFunction(coefficients=1 0)
        TransformAxis rotation3: coordinates=acromioclavicular_r1 axis=(0.6376998 0.1186 0.7610998)
            LinearFunction(coefficients=1 0)
    CustomJoint unrothum: socket_parent_frame=RScapula_offset socket_child_frame=RScapula_Phantom_offset
      Coordinate unrothum_r1: default_value=-0.09320058 range=(-99999.9 99999.9) clamped=false
      Coordinate unrothum_r3: default_value=-0.2073451 range=(-99999.9 99999.9) clamped=false
      Coordinate unrothum_r2: default_value=0.02565634 range=(-99999.9 99999.9) clamped=false
      PhysicalOffsetFrame RScapula_offset: socket_parent=/bodyset/RScapula translation=(-0.00955 -0.034 0.009)
      PhysicalOffsetFrame RScapula_Phantom_offset: socket_parent=/bodyset/RScapula_Phantom translation=(0 0 0)
      SpatialTransform: axes_held_at_zero=(translation1 translation2 translation3)
        TransformAxis rotation1: coordinates=unrothum_r1 axis=(0.6376998 0.1186 0.7610998)
            LinearFunction(coefficients=1 0)
        TransformAxis rotation2: coordinates=unrothum_r3 axis=(-0.754084 0.297594 0.585487)
            LinearFunction(coefficients=1 0)
        TransformAxis rotation3: coordinates=unrothum_r2 axis=(0.1570949 0.9472686 -0.2792909)
            LinearFunction(coefficients=1 0)
    CustomJoint shoulder0: socket_parent_frame=RScapula_Phantom_offset socket_child_frame=RA1H_Phantom_offset
      Coordinate elv_angle: default_value=0 range=(-1.570796 2.268928) clamped=false
      PhysicalOffsetFrame RScapula_Phantom_offset: socket_parent=/bodyset/RScapula_Phantom translation=(0 0 0)
      PhysicalOffsetFrame RA1H_Phantom_offset: socket_parent=/bodyset/RA1H_Phantom translation=(0 0 0)
      SpatialTransform: axes_held_at_zero=(rotation2 rotation3 translation1 translation2 translation3)
        TransformAxis rotation1: coordinates=elv_angle axis=(0.0048 0.9990892 0.04240001)
            LinearFunction(coefficients=1 0)
    CustomJoint shoulder1: socket_parent_frame=RA1H_Phantom_offset socket_child_frame=RA1H_Phantom2_offset
      Coordinate shoulder_ab_ad: default_value=-8.626935e-12 range=(0 3.141593) clamped=false
      Coordinate shoulder1_r2: default_value=0 range=(-99999.9 99999.9) clamped=false
      PhysicalOffsetFrame RA1H_Phantom_offset: socket_parent=/bodyset/RA1H_Phantom translation=(0 0 0)
      PhysicalOffsetFrame RA1H_Phantom2_offset: socket_parent=/bodyset/RA1H_Phantom2 translation=(0 0 0)
      SpatialTransform: axes_held_at_zero=(rotation3 translation1 translation2 translation3)
        TransformAxis rotation1: coordinates=shoulder_ab_ad axis=(-0.9982614 0.0023 0.05889802)
            LinearFunction(coefficients=1 0)
        TransformAxis rotation2: coordinates=shoulder1_r2 axis=(0.0048 0.9990892 0.04240001)
            LinearFunction(coefficients=1 0)
    CustomJoint shoulder2: socket_parent_frame=RA1H_Phantom2_offset socket_child_frame=Phys_offset
      Coordinate shoulder_ext_int: default_value=0 range=(-1.570796 0.3490659) clamped=false locked=true
      PhysicalOffsetFrame RA1H_Phantom2_offset: socket_parent=/bodyset/RA1H_Phantom2 translation=(0 0 0)
      PhysicalOffsetFrame Phys_offset: socket_parent=/bodyset/Phys_Phantom translation=(0 0 0)
      SpatialTransform: axes_held_at_zero=(rotation2 rotation3 translation1 translation2 translation3)
        TransformAxis rotation1: coordinates=shoulder_ext_int axis=(0.0048 0.9990892 0.04240001)
            LinearFunction(coefficients=1 0)
    CustomJoint phys_joint: socket_parent_frame=Phys_offset socket_child_frame=RA1H_offset
      Coordinate ra_sh_ad_ab: default_value=0 range=(-2.3562 0.7854) clamped=true
      Coordinate ra_sh_e_f: default_value=0 range=(-1.5562 3.14) clamped=true
      Coordinate ra_sh_ext_int: default_value=0 range=(-1.5562 1.5562) clamped=true
      PhysicalOffsetFrame Phys_offset: socket_parent=/bodyset/Phys_Phantom translation=(0 0 0)
      PhysicalOffsetFrame RA1H_offset: socket_parent=/bodyset/RA1H translation=(0 0 0)
      SpatialTransform: axes_held_at_zero=(translation1 translation2 translation3)
        TransformAxis rotation1: coordinates=ra_sh_ad_ab axis=(1 0 0) LinearFunction(coefficients=1 0)
        TransformAxis rotation2: coordinates=ra_sh_e_f axis=(0 0 1) LinearFunction(coefficients=1 0)
        TransformAxis rotation3: coordinates=ra_sh_ext_int axis=(0 1 0) LinearFunction(coefficients=1 0)
    CustomJoint RA1H_RA2U: socket_parent_frame=RA1H_offset socket_child_frame=RA2U_offset
      Coordinate elbow_flexion: default_value=-2e-8 range=(0 2.2689) clamped=false locked=true
      Coordinate ra_el_e_f: default_value=1.570796 range=(0 2.2689) clamped=false
      PhysicalOffsetFrame RA1H_offset: socket_parent=/bodyset/RA1H translation=(0.0061 -0.2904 -0.0123)
      PhysicalOffsetFrame RA2U_offset: socket_parent=/bodyset/RA2U translation=(0 0 0)
      SpatialTransform: axes_held_at_zero=(rotation2 translation1 translation2 translation3)
        TransformAxis rotation1: coordinates=elbow_flexion axis=(0.04940001 0.03660001 0.9981083)
            LinearFunction(coefficients=1 0)
        TransformAxis rotation3: coordinates=ra_el_e_f axis=(0 0 1) LinearFunction(coefficients=1 0)
    CustomJoint RA2U_RA2R: socket_parent_frame=RA2U_offset socket_child_frame=RA2R_offset
      Coordinate ra_wr_s_p: default_value=-0.1614779 range=(-1.5708 1.5708) clamped=false
      PhysicalOffsetFrame RA2U_offset: socket_parent=/bodyset/RA2U translation=(0.0004 -0.011503 0.019999)
      PhysicalOffsetFrame RA2R_offset: socket_parent=/bodyset/RA2R translation=(0 0 0)
      SpatialTransform: axes_held_at_zero=(rotation2 rotation3 translation1 translation2 translation3)
        TransformAxis rotation1: coordinates=ra_wr_s_p axis=(-0.01716099 0.9926656 -0.119668)
            LinearFunction(coefficients=1 0)
    CustomJoint RA2R_RA3M: socket_parent_frame=RA2R_offset socket_child_frame=RA3M_offset
      Coordinate ra_wr_e_f: default_value=0 range=(-1.2217 1.2217) clamped=false
      Coordinate ra_wr_ad_ab: default_value=1.226522e-24 range=(-0.1745 0.5236) clamped=false
      PhysicalOffsetFrame RA2R_offset: socket_parent=/bodyset/RA2R translation=(0.018 -0.242 0.025)
      PhysicalOffsetFrame RA3M_offset: socket_parent=/bodyset/RA3M translation=(0 0 0)
      SpatialTransform: axes_held_at_zero=(rotation2 translation1 translation2 translation3)
        TransformAxis rotation1: coordinates=ra_wr_e_f axis=(1 0 0) LinearFunction(coefficients=1 0)
        TransformAxis rotation3: coordinates=ra_wr_ad_ab axis=(0 0 1) LinearFunction(coefficients=1 0)
    CustomJoint RA3M_RA4P1: socket_parent_frame=RA3M_offset socket_child_frame=RA4P1_offset
      Coordinate ra_cmc1_ad_ab: default_value=0.3490659 range=(0 0.8727) clamped=true
      Coordinate ra_cmc1_f_e: default_value=0.4 range=(0 0.8727) clamped=true
      PhysicalOffsetFrame RA3M_offset: socket_parent=/bodyset/RA3M translation=(0.024 -0.0251 -0.0107)
      PhysicalOffsetFrame RA4P1_offset: socket_parent=/bodyset/RA4P1 translation=(0 0 0)
      SpatialTransform: axes_held_at_zero=(rotation2 translation1 translation2 translation3)
        TransformAxis rotation1: coordinates=ra_cmc1_ad_ab axis=(1 0 0) LinearFunction(coefficients=1 0)
        TransformAxis rotation3: coordinates=ra_cmc1_f_e axis=(0 0 1) LinearFunction(coefficients=1 0)
    CustomJoint RA4P1_RA5C1: socket_parent_frame=RA4P1_offset socket_child_frame=RA5C1_offset
      Coordinate ra_mcp1_f_e: default_value=-0.2771932 range=(-0.7854 0) clamped=true
      PhysicalOffsetFrame RA4P1_offset: socket_parent=/bodyset/RA4P1 translation=(0 -0.04 0)
      PhysicalOffsetFrame RA5C1_offset: socket_parent=/bodyset/RA5C1 translation=(0 0 0)
      SpatialTransform: axes_held_at_zero=(rotation1 rotation2 translation1 translation2 translation3)
        TransformAxis rotation3: coordinates=ra_mcp1_f_e axis=(0 0 1) LinearFunction(coefficients=1 0)
    CustomJoint RA5C1_RA6D1: socket_parent_frame=RA5C1_offset socket_child_frame=RA6D1_offset
      Coordinate ra_ip1_f_e: default_value=-0.0008878377 range=(-1.5708 0) clamped=true
      PhysicalOffsetFrame RA5C1_offset: socket_parent=/bodyset/RA5C1 translation=(0 -0.027 0)
      PhysicalOffsetFrame RA6D1_offset: socket_parent=/bodyset/RA6D1 translation=(0 0 0)
      SpatialTransform: axes_held_at_zero=(rotation1 rotation2 translation1 translation2 translation3)
        TransformAxis rotation3: coordinates=ra_ip1_f_e axis=(0 0 1) LinearFunction(coefficients=1 0)
    CustomJoint RA3M_RA4P2: socket_parent_frame=RA3M_offset socket_child_frame=RA4P2_offset
      Coordinate ra_mcp2_e_f: default_value=0.0002947496 range=(0 1.5708) clamped=true
      Coordinate ra_mcp2_ab_ad: default_value=0 range=(-0.2618 0.2618) clamped=true locked=true
      PhysicalOffsetFrame RA3M_offset: socket_parent=/bodyset/RA3M translation=(0.021 -0.085 0)
      PhysicalOffsetFrame RA4P2_offset: socket_parent=/bodyset/RA4P2 translation=(0 0 0)
      SpatialTransform: axes_held_at_zero=(rotation2 translation1 translation2 translation3)
        TransformAxis rotation1: coordinates=ra_mcp2_e_f axis=(1 0 0) LinearFunction(coefficients=1 0)
        TransformAxis rotation3: coordinates=ra_mcp2_ab_ad axis=(0 0 1) LinearFunction(coefficients=1 0)
    CustomJoint RA4P2_RA5C2: socket_parent_frame=RA4P2_offset socket_child_frame=RA5C2_offset
      Coordinate ra_pip2_e_f: default_value=0.0001507848 range=(0 2.0944) clamped=true
      PhysicalOffsetFrame RA4P2_offset: socket_parent=/bodyset/RA4P2 translation=(0 -0.04 0)
      PhysicalOffsetFrame RA5C2_offset: socket_parent=/bodyset/RA5C2 translation=(0 0 0)
      SpatialTransform: axes_held_at_zero=(rotation2 rotation3 translation1 translation2 translation3)
        TransformAxis rotation1: coordinates=ra_pip2_e_f axis=(1 0 0) LinearFunction(coefficients=1 0)
    CustomJoint RA5C2_RA6D2: socket_parent_frame=RA5C2_offset socket_child_frame=RA6D2_offset
      Coordinate ra_dip2_e_f: default_value=0.0006520257 range=(0 1.5708) clamped=true
      PhysicalOffsetFrame RA5C2_offset: socket_parent=/bodyset/RA5C2 translation=(0 -0.022 0)
      PhysicalOffsetFrame RA6D2_offset: socket_parent=/bodyset/RA6D2 translation=(0 0 0)
      SpatialTransform: axes_held_at_zero=(rotation2 rotation3 translation1 translation2 translation3)
        TransformAxis rotation1: coordinates=ra_dip2_e_f axis=(1 0 0) LinearFunction(coefficients=1 0)
    CustomJoint RA3M_RA4P3: socket_parent_frame=RA3M_offset socket_child_frame=RA4P3_offset
      Coordinate ra_mcp3_e_f: default_value=0.0004560138 range=(0 1.5708) clamped=true
      Coordinate ra_mcp3_ab_ad: default_value=0 range=(-0.2618 0.2618) clamped=true locked=true
      PhysicalOffsetFrame RA3M_offset: socket_parent=/bodyset/RA3M translation=(0.004 -0.085 0)
      PhysicalOffsetFrame RA4P3_offset: socket_parent=/bodyset/RA4P3 translation=(0 0 0)
      SpatialTransform: axes_held_at_zero=(rotation2 translation1 translation2 translation3)
        TransformAxis rotation1: coordinates=ra_mcp3_e_f axis=(1 0 0) LinearFunction(coefficients=1 0)
        TransformAxis rotation3: coordinates=ra_mcp3_ab_ad axis=(0 0 1) LinearFunction(coefficients=1 0)
    CustomJoint RA4P3_RA5C3: socket_parent_frame=RA4P3_offset socket_child_frame=RA5C3_offset
      Coordinate ra_pip3_e_f: default_value=0.0003229524 range=(0 2.0944) clamped=true
      PhysicalOffsetFrame RA4P3_offset: socket_parent=/bodyset/RA4P3 translation=(0 -0.0405 0)
      PhysicalOffsetFrame RA5C3_offset: socket_parent=/bodyset/RA5C3 translation=(0 0 0)
      SpatialTransform: axes_held_at_zero=(rotation2 rotation3 translation1 translation2 translation3)
        TransformAxis rotation1: coordinates=ra_pip3_e_f axis=(1 0 0) LinearFunction(coefficients=1 0)
    CustomJoint RA5C3_RA6D3: socket_parent_frame=RA5C3_offset socket_child_frame=RA6D3_offset
      Coordinate ra_dip3_e_f: default_value=0.0001514308 range=(0 1.5708) clamped=true
      PhysicalOffsetFrame RA5C3_offset: socket_parent=/bodyset/RA5C3 translation=(0 -0.029047 0)
      PhysicalOffsetFrame RA6D3_offset: socket_parent=/bodyset/RA6D3 translation=(0 0 0)
      SpatialTransform: axes_held_at_zero=(rotation2 rotation3 translation1 translation2 translation3)
        TransformAxis rotation1: coordinates=ra_dip3_e_f axis=(1 0 0) LinearFunction(coefficients=1 0)
    CustomJoint RA3M_RA4P4: socket_parent_frame=RA3M_offset socket_child_frame=RA4P4_offset
      Coordinate ra_mcp4_e_f: default_value=0.0001514405 range=(0 1.5708) clamped=true
      Coordinate ra_mcp4_ab_ad: default_value=0 range=(-0.2618 0.2618) clamped=true locked=true
      PhysicalOffsetFrame RA3M_offset: socket_parent=/bodyset/RA3M translation=(-0.011 -0.081 0)
      PhysicalOffsetFrame RA4P4_offset: socket_parent=/bodyset/RA4P4 translation=(0 0 0)
      SpatialTransform: axes_held_at_zero=(rotation2 translation1 translation2 translation3)
        TransformAxis rotation1: coordinates=ra_mcp4_e_f axis=(1 0 0) LinearFunction(coefficients=1 0)
        TransformAxis rotation3: coordinates=ra_mcp4_ab_ad axis=(0 0 1) LinearFunction(coefficients=1 0)
    CustomJoint RA4P4_RA5C4: socket_parent_frame=RA4P4_offset socket_child_frame=RA5C4_offset
      Coordinate ra_pip4_e_f: default_value=0.0001507942 range=(0 2.0944) clamped=true
      PhysicalOffsetFrame RA4P4_offset: socket_parent=/bodyset/RA4P4 translation=(0 -0.039 0)
      PhysicalOffsetFrame RA5C4_offset: socket_parent=/bodyset/RA5C4 translation=(0 0 0)
      SpatialTransform: axes_held_at_zero=(rotation2 rotation3 translation1 translation2 translation3)
        TransformAxis rotation1: coordinates=ra_pip4_e_f axis=(1 0 0) LinearFunction(coefficients=1 0)
    CustomJoint RA5C4_RA6D4: socket_parent_frame=RA5C4_offset socket_child_frame=RA6D4_offset
      Coordinate ra_dip4_e_f: default_value=0.0001514405 range=(0 1.5708) clamped=true
      PhysicalOffsetFrame RA5C4_offset: socket_parent=/bodyset/RA5C4 translation=(0 -0.024 0)
      PhysicalOffsetFrame RA6D4_offset: socket_parent=/bodyset/RA6D4 translation=(0 0 0)
      SpatialTransform: axes_held_at_zero=(rotation2 rotation3 translation1 translation2 translation3)
        TransformAxis rotation1: coordinates=ra_dip4_e_f axis=(1 0 0) LinearFunction(coefficients=1 0)
    CustomJoint RA3M_RA4P5: socket_parent_frame=RA3M_offset socket_child_frame=RA4P5_offset
      Coordinate ra_mcp5_e_f: default_value=0.0001514405 range=(0 1.5708) clamped=true
      Coordinate ra_mcp5_ab_ad: default_value=0 range=(-0.2618 0.2618) clamped=true locked=true
      PhysicalOffsetFrame RA3M_offset: socket_parent=/bodyset/RA3M translation=(-0.022 -0.075 0)
      PhysicalOffsetFrame RA4P5_offset: socket_parent=/bodyset/RA4P5 translation=(0 0 0)
      SpatialTransform: axes_held_at_zero=(rotation2 translation1 translation2 translation3)
        TransformAxis rotation1: coordinates=ra_mcp5_e_f axis=(1 0 0) LinearFunction(coefficients=1 0)
        TransformAxis rotation3: coordinates=ra_mcp5_ab_ad axis=(0 0 1) LinearFunction(coefficients=1 0)
    CustomJoint RA4P5_RA5C5: socket_parent_frame=RA4P5_offset socket_child_frame=RA5C5_offset
      Coordinate ra_pip5_e_f: default_value=0.0001507942 range=(0 2.0944) clamped=true
      PhysicalOffsetFrame RA4P5_offset: socket_parent=/bodyset/RA4P5 translation=(0 -0.0325 0.001)
      PhysicalOffsetFrame RA5C5_offset: socket_parent=/bodyset/RA5C5 translation=(0 0 0)
      SpatialTransform: axes_held_at_zero=(rotation2 rotation3 translation1 translation2 translation3)
        TransformAxis rotation1: coordinates=ra_pip5_e_f axis=(1 0 0) LinearFunction(coefficients=1 0)
    CustomJoint RA5C5_RA6D5: socket_parent_frame=RA5C5_offset socket_child_frame=RA6D5_offset
      Coordinate ra_dip5_e_f: default_value=0.0001514405 range=(0 1.5708) clamped=true
      PhysicalOffsetFrame RA5C5_offset: socket_parent=/bodyset/RA5C5 translation=(0 -0.02 0)
      PhysicalOffsetFrame RA6D5_offset: socket_parent=/bodyset/RA6D5 translation=(0 0 0)
      SpatialTransform: axes_held_at_zero=(rotation2 rotation3 translation1 translation2 translation3)
        TransformAxis rotation1: coordinates=ra_dip5_e_f axis=(1 0 0) LinearFunction(coefficients=1 0)
  ConstraintSet:
    CoordinateCouplerConstraint [values shared by the 11 below unless stated]: independent_coordinate_names=ra_sh_e_f
        scale_factor=1
    CoordinateCouplerConstraint sternoclavicular_r2_con: dependent_coordinate_name=sternoclavicular_r2
      coupled_coordinates_function: SimmSpline: x=(0 3) y=(0 0.3)
    CoordinateCouplerConstraint sternoclavicular_r3_con: dependent_coordinate_name=sternoclavicular_r3
      coupled_coordinates_function: SimmSpline: x=(0 3.14159) y=(0 0.322013)
    CoordinateCouplerConstraint unrotscap_r2_con: dependent_coordinate_name=unrotscap_r2
      coupled_coordinates_function: SimmSpline: x=(0 2.61799) y=(0 0.1)
    CoordinateCouplerConstraint unrotscap_r3_con: dependent_coordinate_name=unrotscap_r3
      coupled_coordinates_function: SimmSpline: x=(0 3.14159) y=(0 -0.1)
    CoordinateCouplerConstraint acromioclavicular_r1_con: dependent_coordinate_name=acromioclavicular_r1
      coupled_coordinates_function: SimmSpline: x=(0 2.61799) y=(0 0.1)
    CoordinateCouplerConstraint acromioclavicular_r2_con: dependent_coordinate_name=acromioclavicular_r2
      coupled_coordinates_function: SimmSpline: x=(0 2.61799) y=(0 -0.128282)
    CoordinateCouplerConstraint acromioclavicular_r3_con: dependent_coordinate_name=acromioclavicular_r3
      coupled_coordinates_function: SimmSpline: x=(0 2.61799) y=(0 0.1)
    CoordinateCouplerConstraint unrothum_r1_con: dependent_coordinate_name=unrothum_r1
      coupled_coordinates_function: SimmSpline: x=(0 2.61799) y=(0 -0.466003)
    CoordinateCouplerConstraint unrothum_r2_con: dependent_coordinate_name=unrothum_r2
      coupled_coordinates_function: SimmSpline: x=(0 2.61799) y=(0 0.128282)
    CoordinateCouplerConstraint unrothum_r3_con: dependent_coordinate_name=unrothum_r3
      coupled_coordinates_function: SimmSpline: x=(0 2.61799) y=(0 -1.03673)
    CoordinateCouplerConstraint shoulder1_r2_con: independent_coordinate_names=elv_angle
        dependent_coordinate_name=shoulder1_r2
      coupled_coordinates_function: SimmSpline: x=(-1.5708 3.14159) y=(1.5708 -3.14159)
  ForceSet:
    CoordinateLimitForce ThoraxRot1Limits: coordinate=thorax_rot1 upper_stiffness=100 [N*m/degree]
        upper_limit=150 [degrees] lower_stiffness=100 [N*m/degree] lower_limit=30 [degrees] damping=0
        transition=542.8423 [degrees]
    CoordinateLimitForce ThoraxRot2Limits: coordinate=thorax_rot2 upper_stiffness=100 upper_limit=150
        lower_stiffness=100 lower_limit=30 damping=0 transition=542.8423
    CoordinateLimitForce ThoraxRot3Limits: coordinate=thorax_rot3 upper_stiffness=100 upper_limit=150
        lower_stiffness=100 lower_limit=30 damping=0 transition=542.8423
    CoordinateLimitForce elbow_flexion_ligaments: coordinate=elbow_flexion upper_stiffness=0.3037 upper_limit=85
        lower_stiffness=100 lower_limit=14 damping=0 transition=139.5813
    CoordinateLimitForce elbow_flexion_damping: coordinate=elbow_flexion upper_stiffness=1e-8 upper_limit=190
        lower_stiffness=1e-8 lower_limit=190 damping=0.001745 transition=1
    CoordinateLimitForce pro_sup_ligaments: coordinate=ra_wr_s_p upper_stiffness=50 upper_limit=60 lower_stiffness=50
        lower_limit=-60 damping=0 transition=430.1186
    CoordinateLimitForce pro_sup_damping: coordinate=ra_wr_s_p upper_stiffness=1e-8 upper_limit=190
        lower_stiffness=1e-8 lower_limit=190 damping=0.001745 transition=1
    CoordinateLimitForce flexion_ligaments: coordinate=ra_wr_e_f upper_stiffness=200 upper_limit=60
        lower_stiffness=135.3232 lower_limit=-60 damping=0 transition=92.916
    CoordinateLimitForce flexion_damping: coordinate=ra_wr_e_f upper_stiffness=1e-8 upper_limit=190
        lower_stiffness=1e-8 lower_limit=190 damping=0.00043633 transition=1
    CoordinateLimitForce RA2R_RA3M_Z_damping: coordinate=ra_wr_ad_ab upper_stiffness=1e-8 upper_limit=50
        lower_stiffness=1e-8 lower_limit=0 damping=0.00043633 transition=1
    CoordinateLimitForce RA3M_RA4P1_X_damping: coordinate=ra_cmc1_ad_ab upper_stiffness=1e-7 upper_limit=50
        lower_stiffness=1e-7 lower_limit=0 damping=0.00043633 transition=1
    CoordinateLimitForce RA3M_RA4P1_Z_damping: coordinate=ra_cmc1_f_e upper_stiffness=1e-6 upper_limit=50
        lower_stiffness=1e-7 lower_limit=0 damping=0.00043633 transition=1
    CoordinateLimitForce RA4P1_RA5C1_Z_damping: coordinate=ra_mcp1_f_e upper_stiffness=1e-6 upper_limit=0
        lower_stiffness=1e-7 lower_limit=-45 damping=0.00043633 transition=1
    CoordinateLimitForce RA5C1_RA6D1_Z_damping: coordinate=ra_ip1_f_e upper_stiffness=1e-7 upper_limit=0
        lower_stiffness=1e-7 lower_limit=-90 damping=0.00043633 transition=1
    CoordinateLimitForce RA3M_RA4P2_X_damping: coordinate=ra_mcp2_e_f upper_stiffness=1e-8 upper_limit=90
        lower_stiffness=1e-8 lower_limit=0 damping=0.00043633 transition=1
    CoordinateLimitForce RA4P2_RA5C2_X_damping: coordinate=ra_pip2_e_f upper_stiffness=1e-8 upper_limit=120
        lower_stiffness=1e-8 lower_limit=0 damping=0.00043633 transition=1
    CoordinateLimitForce RA5C2_RA6D2_X_damping: coordinate=ra_dip2_e_f upper_stiffness=1e-8 upper_limit=90
        lower_stiffness=1e-8 lower_limit=0 damping=0.00043633 transition=1
    CoordinateLimitForce RA3M_RA4P3_X_damping: coordinate=ra_mcp3_e_f upper_stiffness=1e-7 upper_limit=90
        lower_stiffness=1e-7 lower_limit=0 damping=0.00043633 transition=1
    CoordinateLimitForce RA4P3_RA5C3_X_damping: coordinate=ra_pip3_e_f upper_stiffness=1e-7 upper_limit=120
        lower_stiffness=1e-7 lower_limit=0 damping=0.00043633 transition=1
    CoordinateLimitForce RA5C3_RA6D3_X_damping: coordinate=ra_dip3_e_f upper_stiffness=1e-7 upper_limit=90
        lower_stiffness=1e-7 lower_limit=0 damping=0.00043633 transition=1
    CoordinateLimitForce RA3M_RA4P4_X_damping: coordinate=ra_mcp4_e_f upper_stiffness=1e-8 upper_limit=90
        lower_stiffness=1e-8 lower_limit=0 damping=0.00043633 transition=1
    CoordinateLimitForce RA4P4_RA5C4_X_damping: coordinate=ra_pip4_e_f upper_stiffness=1e-7 upper_limit=120
        lower_stiffness=1e-7 lower_limit=0 damping=0.00043633 transition=1
    CoordinateLimitForce RA5C4_RA6D4_X_damping: coordinate=ra_dip4_e_f upper_stiffness=1e-7 upper_limit=90
        lower_stiffness=1e-7 lower_limit=0 damping=0.00043633 transition=1
    CoordinateLimitForce RA3M_RA4P5_X_damping: coordinate=ra_mcp5_e_f upper_stiffness=1e-7 upper_limit=90
        lower_stiffness=1e-7 lower_limit=0 damping=0.00043633 transition=1
    CoordinateLimitForce RA4P5_RA5C5_X_damping: coordinate=ra_pip5_e_f upper_stiffness=1e-7 upper_limit=120
        lower_stiffness=1e-7 lower_limit=0 damping=0.00043633 transition=1
    CoordinateLimitForce RA5C5_RA6D5_X_damping: coordinate=ra_dip5_e_f upper_stiffness=1e-7 upper_limit=90
        lower_stiffness=1e-7 lower_limit=0 damping=0.00043633 transition=1
    Millard2012EquilibriumMuscle [values shared by the 54 below unless stated]:
      ActiveForceLengthCurve: minimum_value=0
      ForceVelocityCurve: concentric_slope_at_vmax=0 concentric_slope_near_vmax=0.25 isometric_slope=5
          eccentric_slope_at_vmax=0 eccentric_slope_near_vmax=0.15 max_eccentric_velocity_force_multiplier=1.4
      FiberForceLengthCurve
      TendonForceLengthCurve
    Millard2012EquilibriumMuscle DELT_A: max_isometric_force=1218.9 optimal_fiber_length=0.0976
        tendon_slack_length=0.097 pennation_angle_at_optimal=0.3839724 minimum_activation=0.01
      PathPoint P1: RA1H (0.00896 -0.11883 0.00585)
      PathPoint P2: RA1H (0.01623 -0.11033 0.00412)
      PathPoint P3: RScapula (0.04347 -0.03202 0.00139)
      PathPoint P4: RClavicle (-0.014 0.01106 0.08021)
      PathWrap: wrap_object=delt2hum method=hybrid
      PathWrap pathwrap_0: wrap_object=DELT1hh method=hybrid range=(2 3)
    Millard2012EquilibriumMuscle DELT_LAT: max_isometric_force=1103.5 optimal_fiber_length=0.1078
        tendon_slack_length=0.1095 pennation_angle_at_optimal=0.2617994 minimum_activation=0.01
      PathPoint P1: RA1H (0.00461 -0.13611 0.0056)
      PathPoint P4: RScapula (-0.01078 -0.00034 0.0062)
      PathWrap: wrap_object=Deltoid2 method=hybrid range=(1 2)
    Millard2012EquilibriumMuscle DELT_P: max_isometric_force=201.6 optimal_fiber_length=0.1367
        tendon_slack_length=0.038 pennation_angle_at_optimal=0.3141593 minimum_activation=0.01
      PathPoint P1: RScapula (-0.05573 0.00122 -0.02512)
      PathPoint P2: RScapula (-0.0740232 -0.0339024 0.0136422)
      PathPoint P3: RA1H (0.00206 -0.07602 0.01045)
      PathWrap: wrap_object=delt3hum method=hybrid
      PathWrap pathwrap_0: wrap_object=DELT_TMAJ_LAT_PEC_CORBhh method=hybrid
    Millard2012EquilibriumMuscle SUPSP: max_isometric_force=499.2 optimal_fiber_length=0.0682
        tendon_slack_length=0.0395 pennation_angle_at_optimal=0.1221731 minimum_activation=0.01
      PathPoint P1: RA1H (0.021 0.0142825 0.01905812)
      PathPoint P3: RScapula (-0.044 -0.01512 -0.05855)
      PathWrap: wrap_object=SUPSP2 method=midpoint
    Millard2012EquilibriumMuscle INFSP: max_isometric_force=1075.8 optimal_fiber_length=0.0755
        tendon_slack_length=0.0308 pennation_angle_at_optimal=0.3316126 minimum_activation=0.01
      PathPoint P1: RA1H (-0.00887 0.00484 0.02448)
      PathPoint P2: RScapula (-0.07382 -0.05476 -0.04781)
      PathWrap: wrap_object=INFSP method=hybrid
      PathWrap pathwrap_0: wrap_object=INFSP_and_TMIN_hum_head method=hybrid
    Millard2012EquilibriumMuscle SUBSC: max_isometric_force=1306.9 optimal_fiber_length=0.0873
        tendon_slack_length=0.033 pennation_angle_at_optimal=0.3490659 minimum_activation=0.01
      PathPoint P1: RA1H (0.02 0.0084 -0.01331)
      ConditionalPathPoint default: RScapula (-0.07 -0.02 -0.02) socket_coordinate=/jointset/phys_joint/ra_sh_e_f
      PathPoint P3: RScapula (-0.07246 -0.03943 -0.06475)
      PathWrap: wrap_object=SUBSCAP method=hybrid
    Millard2012EquilibriumMuscle TERMI: max_isometric_force=269.5 optimal_fiber_length=0.0741
        tendon_slack_length=0.0713 pennation_angle_at_optimal=0.418879 minimum_activation=0.01
      PathPoint P1: RA1H (-0.00127 -0.01259 0.022)
      PathPoint P2: RScapula (-0.09473 -0.07991 -0.04737)
      PathPoint P3: RScapula (-0.09643 -0.08121 -0.05298)
      PathWrap: wrap_object=TMIN method=hybrid range=(1 2)
      PathWrap pathwrap_0: wrap_object=INFSP_and_TMIN_hum_head method=hybrid range=(1 2)
      PathWrap pathwrap_1: wrap_object=TMINhum method=hybrid range=(1 2)
    Millard2012EquilibriumMuscle TERMA: max_isometric_force=144 optimal_fiber_length=0.1624 tendon_slack_length=0.02
        pennation_angle_at_optimal=0.2792527 minimum_activation=0.01
      PathPoint P1: RA1H (0.00998 -0.05419 -0.00568)
      PathPoint P2: RScapula (-0.10264 -0.10319 -0.05829)
      PathPoint P3: RScapula (-0.10489 -0.10895 -0.07117)
      PathWrap: wrap_object=TMAJ_LAThum method=hybrid
      PathWrap pathwrap_0: wrap_object=LAT_TMAJhh method=hybrid range=(1 2)
      PathWrap pathwrap_1: wrap_object=LAT_TMAJ2hh method=hybrid
    Millard2012EquilibriumMuscle PECM_R: optimal_force=1 max_isometric_force=444.3 optimal_fiber_length=0.1442
        tendon_slack_length=0.0028 pennation_angle_at_optimal=0.296706 minimum_activation=0.01
      PathPoint P1: RA1H (0.01169 -0.04191 0.0078)
      PathPoint PECM_R: RA1H (0.0171333 -0.037 -0.00337)
      PathPoint PECM_R_0: Thorax (0.00445605 -0.00411206 0.119678)
      PathPoint P2: RClavicle (0.00321 -0.00013 0.05113)
      PathWrap: wrap_object=PECM_R_Thorax method=hybrid
      PathWrap pathwrap_0: wrap_object=PECM_R_hum method=hybrid range=(2 3)
      PathWrap pathwrap_1: wrap_object=PECM_R_hh method=hybrid
    Millard2012EquilibriumMuscle PECM_M: max_isometric_force=658.3 optimal_fiber_length=0.1385
        tendon_slack_length=0.089 pennation_angle_at_optimal=0.4537856 minimum_activation=0.01
      PathPoint P1: RA1H (0.01274 -0.04289 0.00785)
      PathPoint PECM_M: RA1H (0.0155133 -0.04223 -0.00447)
      PathPoint PECM_M_0: Thorax (0.0203967 -0.03295 0.123283)
      PathPoint P4: Thorax (0.03091 -0.03522 0.09705)
      PathPoint P5: Thorax (0.02769 -0.04498 0.02271)
      PathWrap: wrap_object=Thorax method=hybrid
      PathWrap pathwrap_0: wrap_object=PEC12hum method=hybrid range=(2 3)
      PathWrap pathwrap_1: wrap_object=TMAJ_LAT_PEC_CORBhh method=hybrid
      PathWrap pathwrap_2: wrap_object=PEC23hh method=hybrid
    Millard2012EquilibriumMuscle PECM_C: max_isometric_force=498.1 optimal_fiber_length=0.1385
        tendon_slack_length=0.132 pennation_angle_at_optimal=0.4363323 minimum_activation=0.01
      PathPoint P1: RA1H (0.01269 -0.04375 0.0075)
      PathPoint PECM_C: RA1H (0.0142376 -0.0456522 -0.00936165)
      PathPoint PECM_C_0: Thorax (0.02984 -0.0684602 0.114267)
      PathPoint P4: Thorax (0.0525 -0.08417 0.08935)
      PathPoint P5: Thorax (0.05724 -0.11654 0.03787)
      PathWrap: wrap_object=Thorax method=hybrid
      PathWrap pathwrap_0: wrap_object=PEC3hum method=hybrid range=(2 3)
      PathWrap pathwrap_1: wrap_object=PEC23hh method=hybrid
    Millard2012EquilibriumMuscle LATD_R: max_isometric_force=290.5 optimal_fiber_length=0.254 tendon_slack_length=0.12
        pennation_angle_at_optimal=0.4363323 minimum_activation=0.01
      PathPoint P1: RA1H (0.0105 -0.03415 -0.00653)
      PathPoint LATD_R: RScapula (-0.0736533 -0.0789433 -0.02428)
      PathPoint LATD_R_0: RScapula (-0.109183 -0.0768233 -0.06022)
      PathPoint P4: Thorax (-0.11828 -0.10118 0.03316)
      PathPoint P5: Thorax (-0.09578 -0.11724 0.00882)
      PathWrap: wrap_object=TMAJ_LAThum method=hybrid
      PathWrap pathwrap_0: wrap_object=LAT_TMAJhh method=hybrid range=(1 2)
      PathWrap pathwrap_1: wrap_object=LAT_TMAJ2hh method=hybrid
    Millard2012EquilibriumMuscle LATD_M: max_isometric_force=317.5 optimal_fiber_length=0.2324
        tendon_slack_length=0.1765 pennation_angle_at_optimal=0.3316126 minimum_activation=0.01
      PathPoint P1: RA1H (0.00968 -0.04071 -0.00611)
      PathPoint LATD_M: RScapula (-0.0787333 -0.0887833 -0.02023)
      PathPoint LATD_M_0: RScapula (-0.10544 -0.128957 -0.0645967)
      PathPoint P4: Thorax (-0.10992 -0.16908 0.02878)
      PathPoint P5: Thorax (-0.07186 -0.18818 0.00815)
      PathWrap: wrap_object=TMAJ_LAThum method=hybrid
      PathWrap pathwrap_0: wrap_object=LAT_TMAJhh method=hybrid range=(1 2)
      PathWrap pathwrap_1: wrap_object=LAT_TMAJ2hh method=hybrid
    Millard2012EquilibriumMuscle LATD_C: optimal_force=1 max_isometric_force=189 optimal_fiber_length=0.2789
        tendon_slack_length=0.1403 pennation_angle_at_optimal=0.3665191 minimum_activation=0.01
      PathPoint P1: RA1H (0.01208 -0.03922 -0.00416)
      PathPoint LATD_C: RScapula (-0.06598 -0.126013 -0.0221833)
      PathPoint LATD_C_0: RScapula (-0.10059 -0.156797 -0.0617433)
      PathPoint P4: Thorax (-0.11157 -0.19387 0.05532)
      PathPoint P5: Thorax (-0.07117 -0.24858 0.00907)
      PathWrap: wrap_object=TMAJ_LAThum method=hybrid
      PathWrap pathwrap_0: wrap_object=LAT_TMAJ2hh method=hybrid
    Millard2012EquilibriumMuscle CORBR: max_isometric_force=208.2 optimal_fiber_length=0.0932 tendon_slack_length=0.097
        pennation_angle_at_optimal=0.4712389 minimum_activation=0.01
      PathPoint P1: RScapula (0.0125 -0.04127 -0.02652)
      PathPoint P2: RScapula (0.00483 -0.06958 -0.01563)
      PathPoint P3: RA1H (0.00743 -0.15048 -0.00782)
      PathWrap: wrap_object=CORBhum method=hybrid
      PathWrap pathwrap_0: wrap_object=TMAJ_LAT_PEC_CORBhh method=hybrid
    Millard2012EquilibriumMuscle TRI_LO: optimal_force=1 max_isometric_force=771.8 optimal_fiber_length=0.134
        tendon_slack_length=0.143 pennation_angle_at_optimal=0.2094395 minimum_activation=0.01
      PathPoint P1: RScapula (-0.04565 -0.04073 -0.01377)
      PathPoint P2: RA1H (-0.02714 -0.11441 -0.00664)
      PathPoint P3: RA1H (-0.03184 -0.22637 -0.01217)
      PathPoint P4: RA1H (-0.01743 -0.26757 -0.01208)
      PathPoint P5: RA2U (-0.0219 0.01046 -0.00078)
      PathWrap: wrap_object=TRI method=hybrid
      PathWrap pathwrap_0: wrap_object=TRIlonghh method=hybrid
      PathWrap pathwrap_1: wrap_object=TRIlongglen method=hybrid
    Millard2012EquilibriumMuscle TRI_LAT: max_isometric_force=717.5 optimal_fiber_length=0.1138
        tendon_slack_length=0.098 pennation_angle_at_optimal=0.1570796 minimum_activation=0.01
      PathPoint P1: RA1H (-0.00599 -0.12646 0.00428)
      PathPoint P2: RA1H (-0.02344 -0.14528 0.00928)
      PathPoint P3: RA1H (-0.03184 -0.22637 -0.01217)
      PathPoint P4: RA1H (-0.01743 -0.26757 -0.01208)
      PathPoint P5: RA2U (-0.0219 0.01046 -0.00078)
      PathWrap: wrap_object=TRI method=hybrid
    Millard2012EquilibriumMuscle TRI_M: max_isometric_force=717.5 optimal_fiber_length=0.1138
        tendon_slack_length=0.0908 pennation_angle_at_optimal=0.1570796 minimum_activation=0.01
      PathPoint P1: RA1H (-0.00838 -0.13695 -0.00906)
      PathPoint P2: RA1H (-0.02601 -0.15139 -0.0108)
      PathPoint P3: RA1H (-0.03184 -0.22637 -0.01217)
      PathPoint P4: RA1H (-0.01743 -0.26757 -0.01208)
      PathPoint P5: RA2U (-0.0219 0.01046 -0.00078)
      PathWrap: wrap_object=TRI method=hybrid
    Millard2012EquilibriumMuscle ANC: max_isometric_force=283.2 optimal_fiber_length=0.027 tendon_slack_length=0.018
        pennation_angle_at_optimal=0 minimum_activation=0.01
      PathPoint P1: RA1H (-0.0120554 -0.277583 0.0154298)
      PathPoint P2: RA2U (-0.0218385 0.00688888 -0.0122149)
      PathWrap: wrap_object=ANC_1 method=hybrid range=(1 2)
      PathWrap pathwrap_0: wrap_object=ANC_2 method=hybrid range=(1 2)
    Millard2012EquilibriumMuscle SUP: max_isometric_force=379.6 optimal_fiber_length=0.033 tendon_slack_length=0.028
        pennation_angle_at_optimal=0 minimum_activation=0.01
      PathPoint P2: RA2R (0.016 -0.065 0.014)
      PathPoint P3: RA2U (-0.02 -0.016 0.012)
      PathWrap: wrap_object=wristSUPsup method=hybrid range=(1 2)
    Millard2012EquilibriumMuscle BIC_LO: max_isometric_force=525.1 optimal_fiber_length=0.1157
        tendon_slack_length=0.2783 pennation_angle_at_optimal=0 minimum_activation=0.01
      PathPoint P1: RScapula (-0.0342458 -0.0250575 -0.0114188)
      PathPoint P2: RScapula (-0.0171304 -0.0148168 0.00483016)
      PathPoint P3: RA1H (0.0158141 0.0146813 0.0179232)
      PathPoint P4: RA1H (0.0203717 -0.0121896 0.00761448)
      PathPoint P5: RA1H (0.0164205 -0.0643875 0.00209618)
      PathPoint P6: RA1H (0.0149798 -0.0963813 0.00129995)
      PathPoint P7: RA1H (0.0158218 -0.130321 -0.00335971)
      PathPoint P8: RA1H (0.016247 -0.187132 -0.00617737)
      PathPoint P10: RA2R (-0.00268838 -0.0511622 -0.000693133)
      PathWrap: wrap_object=BIC_LO_elbow method=hybrid range=(8 9)
      PathWrap pathwrap_0: wrap_object=BIC_LO_3 method=hybrid range=(8 9)
      PathWrap pathwrap_1: wrap_object=BIC_LO_2 method=hybrid range=(2 5)
      PathWrap pathwrap_2: wrap_object=BIC_LO_pro_sup method=hybrid range=(8 9)
    Millard2012EquilibriumMuscle BIC_SH: max_isometric_force=316.8 optimal_fiber_length=0.1321
        tendon_slack_length=0.2003 pennation_angle_at_optimal=0 minimum_activation=0.01
      PathPoint P1: RScapula (0.01268 -0.03931 -0.02625)
      PathPoint P2: RScapula (0.00093 -0.06704 -0.01593)
      PathPoint P3: RA1H (0.011 -0.07576 -0.01101)
      PathPoint P4: RA1H (0.00942851 -0.125263 -0.0104958)
      PathPoint P6: RA1H (0.016 -0.18 -0.01)
      PathPoint P8: RA2R (-0.002 -0.05 0)
      PathWrap: wrap_object=BIC_SH_elbow method=hybrid range=(5 6)
      PathWrap pathwrap_0: wrap_object=BIC_SH__pro_sup method=hybrid range=(5 6)
    Millard2012EquilibriumMuscle BR: max_isometric_force=717.5 optimal_fiber_length=0.1138 tendon_slack_length=0.0908
        pennation_angle_at_optimal=0.1570796 minimum_activation=0.01
      PathPoint P1: RA1H (0.0069 -0.2162 -0.00488474)
      PathPoint P2: RA1H (0.0126184 -0.242 0.016)
      PathPoint P3: RA1H (0.008 -0.266 0.022)
      PathPoint P4: RA2R (0.006 -0.0328782 0.007)
      PathWrap: wrap_object=TRI_2 method=hybrid range=(1 4)
    Millard2012EquilibriumMuscle BRR: max_isometric_force=276 optimal_fiber_length=0.1726 tendon_slack_length=0.133
        pennation_angle_at_optimal=0 minimum_activation=0.01
      PathPoint P1: RA1H (0.00264235 -0.195564 0.00488474)
      ConditionalPathPoint P2: RA2R (0.0157422 -0.0483249 0.0133277)
          socket_coordinate=/jointset/RA1H_RA2U/elbow_flexion range=(0 0.003149) [radians]
      PathPoint P3: RA2R (0.035637 -0.132567 0.0234613)
      PathPoint P4: RA2R (0.0413746 -0.218944 0.021877)
    Millard2012EquilibriumMuscle ECR_LO: max_isometric_force=337.3 optimal_fiber_length=0.081 tendon_slack_length=0.244
        pennation_angle_at_optimal=0 minimum_activation=0.01
      PathPoint P1: RA1H (-0.00643881 -0.257553 0.008504)
      PathPoint P3: RA2R (0.025 -0.13 0.028)
      PathPoint P3_0: RA2R (0.032 -0.23 0.038)
      PathPoint P4: RA3M (0.0153015 -0.0374122 0.00616064)
      PathWrap: wrap_object=Elbow_PT_ECRL_1 method=hybrid range=(1 2)
      PathWrap pathwrap_0: wrap_object=ECRL_Wrist_1 method=hybrid range=(3 4)
      PathWrap pathwrap_1: wrap_object=WristECRLPro method=hybrid range=(1 2)
      PathWrap pathwrap_2: wrap_object=ElbowECRLFlex method=hybrid range=(1 2)
    Millard2012EquilibriumMuscle ECR_BR: max_isometric_force=252.5 optimal_fiber_length=0.0585
        tendon_slack_length=0.2223 pennation_angle_at_optimal=0.1570796 minimum_activation=0.01
      PathPoint P1: RA1H (0.00593343 -0.289211 0.0183583)
      PathPoint P2: RA2R (0 -0.0357422 0.0114035)
      PathPoint P2_0: RA2R (0.0199962 -0.139274 0.0277437)
      PathPoint P3: RA2R (0.0230819 -0.222499 0.0416489)
      PathPoint P3_0: RA3M (0.00541277 -0.0426037 0.00945633)
      PathPoint P4: RA3M (0.00470866 -0.0766055 0.00886338)
      PathWrap: wrap_object=ECRB_1 method=hybrid range=(4 5)
    Millard2012EquilibriumMuscle ECU: max_isometric_force=192.9 optimal_fiber_length=0.0622 tendon_slack_length=0.2285
        pennation_angle_at_optimal=0.0698132 minimum_activation=0.01
      PathPoint P1: RA1H (-0.001 -0.286 0.023)
      PathPoint P2: RA2U (-0.004 -0.193815 0.048535)
      PathPoint P3: RA2U (-0.003 -0.24 0.054)
      PathPoint P5: RA3M (-0.017 -0.022 0.006)
      PathPoint P4: RA3M (-0.0257242 -0.0650469 0.00524236)
      PathWrap: wrap_object=WristECUSup method=hybrid range=(1 2)
      PathWrap pathwrap_0: wrap_object=WristECUExt method=hybrid range=(3 4)
      PathWrap pathwrap_1: wrap_object=WristECUFlex method=hybrid range=(3 4)
    Millard2012EquilibriumMuscle FCR: max_isometric_force=407.9 optimal_fiber_length=0.0628 tendon_slack_length=0.244
        pennation_angle_at_optimal=0.0523599 minimum_activation=0.01
      PathPoint P1: RA1H (0.00610339 -0.269907 -0.0323651)
      PathPoint P2: RA2U (0.00886201 -0.0223296 -0.0059838)
      PathPoint P2_0: RA2R (0.03 -0.114836 0.01)
      PathPoint P3: RA2R (0.032 -0.221999 0.0111871)
      PathPoint P3_0: RA3M (0.013558 -0.0198088 -0.00915609)
      PathWrap: wrap_object=Elbow_PT_ECRL_1 method=hybrid range=(1 2)
      PathWrap pathwrap_0: wrap_object=WristFCRSup method=hybrid range=(2 3)
      PathWrap pathwrap_1: wrap_object=WristFCRExt method=hybrid range=(4 5)
      PathWrap pathwrap_2: wrap_object=WristFCRFlex method=hybrid range=(4 5)
    Millard2012EquilibriumMuscle FCU: optimal_force=1 max_isometric_force=479.8 optimal_fiber_length=0.0509
        tendon_slack_length=0.32 pennation_angle_at_optimal=0.2094395 minimum_activation=0.01
      PathPoint P1: RA1H (0.00416977 -0.272789 -0.0314913)
      PathPoint P4: RA3M (-0.00505017 -0.0279777 -0.00439035)
      PathWrap: wrap_object=Elbow_PT_ECRL_1 method=hybrid range=(1 2)
      PathWrap pathwrap_0: wrap_object=WristFCUPro method=hybrid range=(1 2)
      PathWrap pathwrap_1: wrap_object=WristFCUSup method=hybrid range=(1 2)
      PathWrap pathwrap_2: wrap_object=WristFCUExt method=axial range=(1 2)
      PathWrap pathwrap_3: wrap_object=WristFCUFlex method=axial range=(1 2)
    Millard2012EquilibriumMuscle PL: max_isometric_force=101 optimal_fiber_length=0.0638 tendon_slack_length=0.2694
        pennation_angle_at_optimal=0.06981317 minimum_activation=0.01
      PathPoint P1: RA1H (0.00557186 -0.272413 -0.035817)
      PathPoint P2: RA2U (0.00220539 -0.0234544 -0.00773561)
      PathPoint P2_0: RA2R (0.0134642 -0.203486 0.0147447)
      PathPoint P4: RA3M (0.00236481 -0.0370637 -0.00228342)
      PathWrap: wrap_object=Elbow_PT_ECRL_1 method=hybrid range=(1 2)
      PathWrap pathwrap_0: wrap_object=WristPLSup method=hybrid range=(2 3)
      PathWrap pathwrap_1: wrap_object=WristPLExt method=hybrid range=(3 4)
    Millard2012EquilibriumMuscle PT: max_isometric_force=557.2 optimal_fiber_length=0.0492 tendon_slack_length=0.099
        pennation_angle_at_optimal=0.1745329 minimum_activation=0.01
      PathPoint P1: RA1H (0.00715546 -0.238799 -0.00769784)
      PathPoint P2: RA2U (-0.00490324 -0.0673263 0.011519)
      PathPoint P5: RA2R (0.0335137 -0.138021 0.0248443)
      PathWrap: wrap_object=Elbow_PT method=hybrid
      PathWrap pathwrap_0: wrap_object=Sup_Pro_PT method=hybrid range=(2 3)
    Millard2012EquilibriumMuscle PQ: max_isometric_force=284.7 optimal_fiber_length=0.0282 tendon_slack_length=0.005
        pennation_angle_at_optimal=0.1745329 minimum_activation=0.01
      PathPoint P1: RA2R (0.0332562 -0.192549 0.0195432)
      PathPoint P2: RA2U (0.00166723 -0.198219 0.0331929)
      PathWrap: wrap_object=PQ2_1 method=hybrid range=(1 2)
      PathWrap pathwrap_0: wrap_object=PQ1 method=hybrid range=(1 2)
    Millard2012EquilibriumMuscle FDS5: max_isometric_force=75.3 optimal_fiber_length=0.0515 tendon_slack_length=0.3386
        pennation_angle_at_optimal=0.08726646 minimum_activation=0.01
      PathPoint P1: RA2U (-0.00124864 -0.0215997 -0.00440958)
      PathPoint P2: RA2U (-0.00374887 -0.0617855 0.00753874)
      PathPoint P2_0: RA2R (0.0120846 -0.214974 0.0168634)
      PathPoint P4: RA3M (-0.0104351 -0.0297262 -0.00660471)
      PathPoint P5: RA3M (-0.0207311 -0.0558377 -0.00375816)
      PathPoint P5_0: RA4P5 (-0.000256107 -0.0103308 -0.00242406)
      PathPoint P6: RA4P5 (0.000116886 -0.0237366 -0.00162785)
      PathPoint P7: RA5C5 (-0.000322952 -0.00422864 -0.00307371)
      PathWrap: wrap_object=WristFDSExt method=hybrid range=(3 4)
      PathWrap pathwrap_0: wrap_object=Prox5FlexFDS method=hybrid range=(5 6)
      PathWrap pathwrap_1: wrap_object=Cen5FlexFDS method=hybrid range=(7 8)
    Millard2012EquilibriumMuscle FDS4: optimal_force=1 max_isometric_force=92.1606 optimal_fiber_length=0.0736
        tendon_slack_length=0.328 pennation_angle_at_optimal=0.06981317 minimum_activation=0.01
      PathPoint P1: RA2U (-0.000946066 -0.0210862 -0.000890677)
      PathPoint P2: RA2R (-0.00501413 -0.0494167 -0.0102215)
      PathPoint P2_0: RA2R (0.0152479 -0.214749 0.0170274)
      PathPoint P4: RA3M (-0.0058932 -0.0293413 -0.00516108)
      PathPoint P3: RA3M (-0.00878327 -0.059802 -0.00229132)
      PathPoint P6: RA4P4 (0.000938326 -0.012 -0.003418)
      PathPoint P7: RA4P4 (0.000968157 -0.035224 -0.00180029)
      PathPoint P8: RA5C4 (0.000334568 -0.007 -0.00195314)
      PathWrap: wrap_object=WristFDSExt method=hybrid range=(1 4)
      PathWrap pathwrap_0: wrap_object=Prox4FlexFDS method=hybrid range=(5 6)
      PathWrap pathwrap_1: wrap_object=Cen4FlexFDS method=hybrid range=(7 8)
    Millard2012EquilibriumMuscle FDS3: max_isometric_force=92.1606 optimal_fiber_length=0.0749
        tendon_slack_length=0.295 pennation_angle_at_optimal=0.1221731 minimum_activation=0.01
      PathPoint P1: RA2U (-0.000148937 -0.0206213 0.00248165)
      PathPoint P2: RA2R (-0.00380038 -0.0489322 -0.00817965)
      PathPoint P2_0: RA2R (0.0187439 -0.21435 0.0164738)
      PathPoint P4: RA3M (0.00342638 -0.0291282 -0.00467785)
      PathPoint P5: RA3M (0.0044503 -0.0611419 -0.000278613)
      PathPoint P7: RA4P3 (0.00056419 -0.014 0.00014271)
      PathPoint P8: RA4P3 (0.001 -0.036 -0.001)
      PathPoint P9: RA5C3 (0.00106215 -0.00745125 -0.00206547)
      PathWrap: wrap_object=WristFDSExt method=hybrid range=(3 4)
      PathWrap pathwrap_0: wrap_object=Prox3FlexFDS method=hybrid range=(5 6)
      PathWrap pathwrap_1: wrap_object=Cen3FlexFDS method=hybrid range=(7 8)
    Millard2012EquilibriumMuscle FDS2: max_isometric_force=162.5 optimal_fiber_length=0.0835 tendon_slack_length=0.275
        pennation_angle_at_optimal=0.1047198 minimum_activation=0.01
      PathPoint P1: RA2U (0.000135152 -0.0206183 0.00476101)
      PathPoint P2: RA2R (-0.00228893 -0.048413 -0.00640374)
      PathPoint P2_0: RA2R (0.0213946 -0.214269 0.0170638)
      PathPoint P4: RA3M (0.013301 -0.0294207 -0.00586394)
      PathPoint P5: RA3M (0.02 -0.06 -0.003)
      PathPoint P5_0: RA3M (0.0205289 -0.0821502 -0.011181)
      PathPoint P7: RA4P2 (-0.000478195 -0.015 -3.5153e-5)
      PathPoint P8: RA4P2 (0.000776349 -0.0360923 -0.00188532)
      PathPoint P9: RA5C2 (0.00071263 -0.00720042 -0.00258174)
      PathWrap: wrap_object=WristFDSExt method=hybrid range=(3 4)
      PathWrap pathwrap_0: wrap_object=Prox2FlexFDS method=hybrid range=(6 7)
      PathWrap pathwrap_1: wrap_object=Cen2FlexFDS method=hybrid range=(8 9)
    Millard2012EquilibriumMuscle FDP5: max_isometric_force=236.8 optimal_fiber_length=0.0749 tendon_slack_length=0.2819
        pennation_angle_at_optimal=0.1396263 minimum_activation=0.01
      PathPoint P1: RA2U (-0.0014056 -0.0210503 -0.0016344)
      PathPoint P2: RA2U (-0.00327523 -0.0612581 0.00914984)
      PathPoint P3: RA2R (0.0138389 -0.214681 0.0176575)
      PathPoint P4: RA3M (-0.0107409 -0.0293809 -0.006)
      PathPoint P5: RA3M (-0.0217701 -0.07 -0.007)
      PathPoint P7: RA4P5 (-0.000371799 -0.014 -0.002)
      PathPoint P7_0: RA4P5 (-8.22431e-5 -0.0279182 -0.002)
      PathPoint P8: RA5C5 (-0.000165962 -0.0077088 -0.00351)
      PathPoint P9: RA5C5 (-0.000403786 -0.0115824 -0.00311789)
      PathPoint P9_0: RA6D5 (-0.000189062 -0.00647152 -0.00324927)
      PathWrap: wrap_object=WristFDSExt method=hybrid range=(3 4)
      PathWrap pathwrap_0: wrap_object=Prox5FlexFDP method=hybrid range=(5 6)
      PathWrap pathwrap_1: wrap_object=Cen5FlexFDP method=hybrid range=(7 8)
      PathWrap pathwrap_2: wrap_object=Dist5FlexFDP_1 method=hybrid range=(9 10)
      PathWrap pathwrap_3: wrap_object=Dist5FlexFDP_2 method=hybrid range=(9 10)
    Millard2012EquilibriumMuscle FDP4: optimal_force=1 max_isometric_force=0.0571 optimal_fiber_length=0.0798
        tendon_slack_length=0.2915 pennation_angle_at_optimal=0.1221731 minimum_activation=0.01
      PathPoint P1: RA2U (-0.000124978 -0.0214275 0.00223129)
      PathPoint P2: RA2R (-0.00272984 -0.0486199 -0.00915241)
      PathPoint P3: RA2R (0.0173363 -0.214346 0.0168831)
      PathPoint P4: RA3M (-0.00469968 -0.0280417 -0.00419547)
      PathPoint P6: RA3M (-0.00957418 -0.074 -0.008)
      PathPoint P7: RA4P4 (0.00039992 -0.0127066 -0.00289379)
      PathPoint P8: RA4P4 (8.14785e-5 -0.035 -0.002)
      PathPoint P8_0: RA5C4 (3.16855e-5 -0.00922821 -0.00237395)
      PathPoint P10: RA5C4 (-0.000707778 -0.023 -0.00414949)
      PathPoint P11: RA6D4 (0 -0.007 -0.000928373)
      PathWrap: wrap_object=WristFDSExt method=hybrid range=(3 4)
      PathWrap pathwrap_0: wrap_object=Prox4FlexFDP method=hybrid range=(5 6)
      PathWrap pathwrap_1: wrap_object=Cen4FlexFDP method=hybrid range=(7 8)
    Millard2012EquilibriumMuscle FDP3: max_isometric_force=212.4 optimal_fiber_length=0.0835 tendon_slack_length=0.303
        pennation_angle_at_optimal=0.1047198 minimum_activation=0.01
      PathPoint P1: RA2U (0.000355653 -0.0203181 0.0053466)
      PathPoint P2: RA2R (-0.000254653 -0.0479974 -0.00805618)
      PathPoint P2_0: RA2R (0.0206728 -0.214394 0.0173336)
      PathPoint P4: RA3M (0.00203641 -0.0286663 -0.00456074)
      PathPoint P5: RA3M (0.00468422 -0.0815009 -0.00990199)
      PathPoint P6: RA4P3 (0.000709079 -0.0123188 -0.000281546)
      PathPoint P7: RA4P3 (0.000830374 -0.0362009 -0.002)
      PathPoint P8: RA5C3 (0.000486997 -0.0116193 -0.00327241)
      PathPoint P9: RA5C3 (0.000685955 -0.0270392 -0.00409572)
      PathPoint P10: RA6D3 (0.000980629 -0.00727591 -0.0031017)
      PathWrap: wrap_object=WristFDSExt method=hybrid range=(3 4)
      PathWrap pathwrap_0: wrap_object=Prox3FlexFDP method=hybrid range=(5 6)
      PathWrap pathwrap_1: wrap_object=Cen3FlexFDP method=hybrid range=(7 8)
    Millard2012EquilibriumMuscle FDP2: max_isometric_force=197.3 optimal_fiber_length=0.0749 tendon_slack_length=0.3015
        pennation_angle_at_optimal=0.1221731 minimum_activation=0.01
      PathPoint P1: RA2U (3.95346e-5 -0.0247112 0.00464465)
      PathPoint P2: RA2R (0.00272107 -0.0473777 -0.00464786)
      PathPoint P3: RA2R (0.0247133 -0.214344 0.0166943)
      PathPoint P4: RA3M (0.0106476 -0.0276776 -0.0062651)
      PathPoint P5: RA3M (0.020149 -0.058623 -0.0035194)
      PathPoint P6: RA3M (0.0203407 -0.0810168 -0.00861779)
      PathPoint P7: RA4P2 (-0.000493411 -0.0152083 -0.000447503)
      PathPoint P8: RA4P2 (-0.000243778 -0.036 -0.00281185)
      PathPoint P9: RA5C2 (0.000214998 -0.0101433 -0.00296279)
      PathPoint P10: RA5C2 (6.45539e-5 -0.0201522 -0.00401693)
      PathPoint P11: RA6D2 (0.000799998 -0.0087081 -0.00274248)
      PathWrap: wrap_object=WristFDP2Ext method=hybrid range=(3 4)
      PathWrap pathwrap_0: wrap_object=Prox2FlexFDP method=hybrid range=(6 7)
      PathWrap pathwrap_1: wrap_object=Cen2FlexFDP method=hybrid range=(8 9)
    Millard2012EquilibriumMuscle ED5: max_isometric_force=39.4 optimal_fiber_length=0.065 tendon_slack_length=0.335
        pennation_angle_at_optimal=0.03490659 minimum_activation=0.01
      PathPoint P1: RA1H (-0.0004 -0.28831 0.0187)
      PathPoint P2: RA2R (-0.0074 -0.0276817 0.010001)
      PathPoint P3: RA2R (0.00707245 -0.219432 0.0360689)
      PathPoint P4: RA3M (-0.0152551 -0.0243349 0.00544885)
      PathPoint P5: RA3M (-0.0229441 -0.066202 0.00500658)
      PathPoint P6: RA4P5 (-0.000880765 -0.00809297 0.00470773)
      PathPoint P7: RA4P5 (0.000192745 -0.034 0.0035)
      PathPoint P8: RA5C5 (0.000182581 -0.00451939 0.00251535)
      PathPoint P9: RA5C5 (-0.000214403 -0.0167596 0.00247951)
      PathPoint P10: RA6D5 (-4.01039e-6 -0.00309993 0.00187284)
      PathWrap: wrap_object=WristFlexFingers method=hybrid range=(3 4)
      PathWrap pathwrap_0: wrap_object=ProxEDC5Ext method=hybrid range=(5 6)
      PathWrap pathwrap_1: wrap_object=DistalExt5 method=hybrid range=(9 10)
    Millard2012EquilibriumMuscle ED4: max_isometric_force=109.2 optimal_fiber_length=0.0626 tendon_slack_length=0.365
        pennation_angle_at_optimal=0.05235988 minimum_activation=0.01
      PathPoint P1: RA1H (0.001 -0.28936 0.02)
      PathPoint P2: RA2R (-0.00553216 -0.026497 0.010001)
      PathPoint P3: RA2R (0.00934075 -0.221497 0.0370076)
      PathPoint P4: RA3M (-0.00731659 -0.023 0.008)
      PathPoint P5: RA3M (-0.0103292 -0.0691844 0.00556111)
      PathPoint P6: RA4P4 (9.6752e-5 -0.0114731 0.00422161)
      PathPoint P7: RA4P4 (0.000386464 -0.0406528 0.00318043)
      PathPoint P8: RA5C4 (0.000385416 -0.00468453 0.00333393)
      PathPoint P9: RA5C4 (0.000203833 -0.0217652 0.00256135)
      PathPoint P10: RA6D4 (0.000132245 -0.004 0.002)
      PathWrap: wrap_object=WristFlexFingers method=hybrid range=(3 4)
      PathWrap pathwrap_0: wrap_object=ProxEDC4Ext method=hybrid range=(5 6)
      PathWrap pathwrap_1: wrap_object=DistalExt4 method=hybrid range=(9 10)
    Millard2012EquilibriumMuscle ED3: max_isometric_force=94.4 optimal_fiber_length=0.0724 tendon_slack_length=0.365
        pennation_angle_at_optimal=0.05235988 minimum_activation=0.01
      PathPoint P1: RA1H (0.003 -0.289 0.01949)
      PathPoint P2: RA2R (-0.0034 -0.0265656 0.010001)
      PathPoint P3: RA2R (0.0111332 -0.220814 0.0381727)
      PathPoint P4: RA3M (0.00295006 -0.0248269 0.00978827)
      PathPoint P5: RA3M (0.00428788 -0.0767706 0.00744863)
      PathPoint P6: RA4P3 (0.000711057 -0.00373716 0.006)
      PathPoint P7: RA4P3 (0.000742664 -0.043 0.003)
      PathPoint P8: RA5C3 (0.000898352 -0.008 0.003)
      PathPoint P9: RA5C3 (0.00121214 -0.0265217 0.003)
      PathPoint P10: RA6D3 (0.00104427 -0.004 0.003)
      PathWrap: wrap_object=WristFlexFingers method=hybrid range=(3 4)
      PathWrap pathwrap_0: wrap_object=ProxEDC3Ext method=hybrid range=(5 6)
      PathWrap pathwrap_1: wrap_object=DistalExt3 method=hybrid range=(9 10)
    Millard2012EquilibriumMuscle ED2: max_isometric_force=48.8 optimal_fiber_length=0.07 tendon_slack_length=0.365
        pennation_angle_at_optimal=0.05235988 minimum_activation=0.01
      PathPoint P1: RA1H (0.005 -0.28898 0.01869)
      PathPoint P2: RA2R (-0.00107025 -0.0270379 0.009839)
      PathPoint P3: RA2R (0.0141659 -0.220398 0.0383037)
      PathPoint P4: RA3M (0.0147657 -0.0274203 0.00798757)
      PathPoint P5: RA3M (0.0216526 -0.0761482 0.00895818)
      PathPoint P6: RA4P2 (0.000509092 -0.0108561 0.0081075)
      PathPoint P7: RA4P2 (0.00075475 -0.0429657 0.00366493)
      PathPoint P8: RA5C2 (0.000793332 -0.0084169 0.00333951)
      PathPoint P9: RA5C2 (0.00062872 -0.0187628 0.00354474)
      PathPoint P10: RA6D2 (0.00075096 -0.00700405 0.00281063)
      PathWrap: wrap_object=WristFlexFingers method=hybrid range=(3 4)
      PathWrap pathwrap_0: wrap_object=ProxEDC2Ext method=hybrid range=(5 6)
      PathWrap pathwrap_1: wrap_object=DistalExt2 method=hybrid range=(9 10)
    Millard2012EquilibriumMuscle EDM: max_isometric_force=72.4 optimal_fiber_length=0.0675 tendon_slack_length=0.335
        pennation_angle_at_optimal=0.05235988 minimum_activation=0.01
      PathPoint P1: RA1H (0.00089 -0.28919 0.01847)
      PathPoint P2: RA2R (-0.01017 -0.027567 0.010851)
      PathPoint P3: RA2R (0.00458393 -0.21933 0.0351462)
      PathPoint P6: RA3M (-0.0174387 -0.0238699 0.005)
      PathPoint P7: RA3M (-0.0230223 -0.0695971 0.00483803)
      PathPoint P7_0: RA4P5 (-0.000972832 -0.000638344 0.00473868)
      PathPoint P8: RA4P5 (-3.5e-5 -0.0290423 0.0035)
      PathPoint P9: RA5C5 (-8.70702e-5 -0.0017834 0.00262561)
      PathPoint P11: RA5C5 (0.000194368 -0.0168982 0.0024542)
      PathPoint P10: RA6D5 (0.000170403 -0.00314804 0.0019929)
      PathWrap: wrap_object=WristFlexFingers method=hybrid range=(3 4)
      PathWrap pathwrap_0: wrap_object=WristExtFingers method=hybrid range=(3 4)
      PathWrap pathwrap_1: wrap_object=ProxEDMExt2 method=hybrid range=(5 6)
      PathWrap pathwrap_2: wrap_object=ProxEDMExt method=hybrid range=(5 6)
      PathWrap pathwrap_3: wrap_object=DistalExt5 method=hybrid range=(8 10)
      PathWrap pathwrap_4: wrap_object=Cen5ExtEDM method=hybrid range=(7 8)
    Millard2012EquilibriumMuscle EIND: max_isometric_force=47.3 optimal_fiber_length=0.0589 tendon_slack_length=0.21
        pennation_angle_at_optimal=0.1047198 minimum_activation=0.01
      PathPoint P1: RA2U (-0.00394 -0.16652 0.039)
      PathPoint P3: RA2R (0.0136136 -0.225791 0.035244)
      PathPoint P4: RA3M (0.00688216 -0.0263637 0.010564)
      PathPoint P5: RA3M (0.0237174 -0.0761195 0.00892105)
      PathPoint P7: RA4P2 (0.00263682 -0.0111645 0.00815967)
      PathPoint P8: RA4P2 (0.00172831 -0.0418557 0.00461942)
      PathPoint P9: RA5C2 (0.00158065 -0.00715413 0.00393277)
      PathPoint P9_0: RA5C2 (0.00150903 -0.019 0.00330422)
      PathPoint P10: RA6D2 (0.00121016 -0.00726994 0.00300198)
      PathWrap: wrap_object=WristEIPFlex method=hybrid range=(2 3)
      PathWrap pathwrap_0: wrap_object=ProxEDC2Ext method=hybrid range=(4 5)
      PathWrap pathwrap_1: wrap_object=CentralExt2 method=hybrid range=(6 7)
      PathWrap pathwrap_2: wrap_object=DistalExt2 method=hybrid range=(8 9)
    Millard2012EquilibriumMuscle EPL: max_isometric_force=256.722 optimal_fiber_length=0.054 tendon_slack_length=0.2885
        pennation_angle_at_optimal=0.1047198 minimum_activation=0.01
      PathPoint P1: RA2U (-0.0177662 -0.110478 0.0316098)
      PathPoint P3: RA2R (0.0249658 -0.209644 0.036247)
      PathPoint P4: RA2R (0.035 -0.232 0.034)
      PathPoint P4_0: RA3M (0.025 -0.013 -0.006)
      PathPoint P5: RA4P1 (0.00644251 -0.023703 0.00171696)
      PathPoint P9: RA4P1 (0.0062885 -0.0278299 0.00200798)
      PathPoint P10: RA5C1 (0.00510445 -0.0101612 0.00128237)
      PathPoint P11: RA5C1 (0.00451529 -0.0236233 0.000820069)
      PathPoint P12: RA6D1 (0.00317692 -0.00521436 0.000345217)
      PathWrap: wrap_object=EPL_prosup2 method=hybrid range=(1 2)
      PathWrap pathwrap_0: wrap_object=EPL_Wrist method=hybrid range=(3 4)
      PathWrap pathwrap_1: wrap_object=Thumb_EPL method=hybrid range=(4 5)
      PathWrap pathwrap_2: wrap_object=CenExtEPL method=hybrid range=(6 7)
      PathWrap pathwrap_3: wrap_object=DistalExt1 method=hybrid range=(8 9)
    Millard2012EquilibriumMuscle EPB: max_isometric_force=84.4055 optimal_fiber_length=0.0675
        tendon_slack_length=0.1749 pennation_angle_at_optimal=0.1570796 minimum_activation=0.01
      PathPoint P1: RA2R (0.01924 -0.14695 0.02114)
      PathPoint P2: RA2R (0.02276 -0.15857 0.02665)
      PathPoint P3: RA2R (0.0380724 -0.200988 0.0277409)
      PathPoint P4: RA2R (0.0410808 -0.213527 0.0259887)
      PathPoint P5: RA2R (0.0462613 -0.227866 0.024808)
      PathPoint P6: RA3M (0.025 -0.007 -0.003)
      PathPoint P7: RA3M (0.0292222 -0.0130797 -0.00791342)
      PathPoint P7_0: RA4P1 (0.00639921 -0.0234206 0.000450225)
      PathPoint P8: RA4P1 (0.00646391 -0.0279699 0.000445301)
      PathPoint P9: RA5C1 (0.00511078 -0.00915565 0.00035649)
      PathWrap: wrap_object=CenExtEPB method=hybrid range=(9 10)
      PathWrap pathwrap_0: wrap_object=WristEPBExt method=hybrid range=(5 6)
      PathWrap pathwrap_1: wrap_object=WristEPBFlex method=hybrid range=(5 6)
      PathWrap pathwrap_2: wrap_object=Thumb_EPB method=hybrid range=(7 8)
    Millard2012EquilibriumMuscle FPL: max_isometric_force=0.5745 optimal_fiber_length=0.0552 tendon_slack_length=0.2592
        pennation_angle_at_optimal=0.1221731 minimum_activation=0.01
      PathPoint P1: RA2R (0.00928522 -0.0967014 0.0116712)
      PathPoint P2: RA2R (0.0166136 -0.136406 0.0153437)
      PathPoint P3: RA2R (0.0215291 -0.160235 0.0153218)
      PathPoint P3_0: RA2R (0.0266795 -0.21401 0.0172707)
      PathPoint P5: RA3M (0.011497 -0.0191033 -0.0103283)
      PathPoint P5_0: RA3M (0.0128913 -0.0210292 -0.0106568)
      PathPoint P5_1: RA4P1 (-0.00312955 -0.0101648 -0.00136059)
      PathPoint P7: RA4P1 (-0.00170676 -0.0234965 -0.000708384)
      PathPoint P8: RA5C1 (-0.00263882 -0.0149701 0.000175025)
      PathPoint P9: RA5C1 (-0.00248673 -0.0166974 0.000235943)
      PathPoint P10: RA6D1 (-0.00361557 -0.00779507 -0.000214479)
      PathWrap: wrap_object=WristFDSExt method=hybrid range=(4 5)
      PathWrap pathwrap_0: wrap_object=ThumbFlexTorus method=hybrid range=(6 7)
      PathWrap pathwrap_1: wrap_object=CenFPLFlex method=hybrid range=(8 9)
      PathWrap pathwrap_2: wrap_object=DistalFlex1 method=hybrid range=(10 11)
    Millard2012EquilibriumMuscle FPB: max_isometric_force=45.6886 optimal_fiber_length=0.0552
        tendon_slack_length=0.0703 pennation_angle_at_optimal=0.1221731 minimum_activation=0.01
      PathPoint P2: RA3M (-0.008 -0.01 -0.01)
      PathPoint P2_0: RA3M (0.013 -0.01 -0.01)
      PathPoint P3: RA4P1 (0.00159375 -0.0197061 -0.00398638)
      PathPoint P3_0: RA4P1 (-0.00150265 -0.0293895 -0.00313516)
      PathPoint P4: RA5C1 (-0.00377892 -0.00451536 -0.000278153)
      PathWrap: wrap_object=ThumbFlexCylinder method=hybrid range=(2 3)
      PathWrap pathwrap_0: wrap_object=ThumbFlexTorus method=hybrid range=(2 2)
      PathWrap pathwrap_1: wrap_object=CenFPBFlex method=hybrid range=(4 5)
    Millard2012EquilibriumMuscle OP: max_isometric_force=101.8117 optimal_fiber_length=0.0552
        tendon_slack_length=0.0624 pennation_angle_at_optimal=0.1221731 minimum_activation=0.01
      PathPoint P1: RA3M (0.00380496 -0.0087436 -0.00969416)
      PathPoint P3: RA4P1 (0.00641982 -0.0169834 -0.00359259)
      PathPoint P4: RA4P1 (0.0066242 -0.0345615 0.000246944)
      PathWrap: wrap_object=Thumb_OP method=hybrid range=(1 2)
    Millard2012EquilibriumMuscle APL: max_isometric_force=27.6532 optimal_fiber_length=0.0713
        tendon_slack_length=0.2019 pennation_angle_at_optimal=0.1396263 minimum_activation=0.01
      PathPoint P1: RA2U (-0.00890255 -0.124469 0.0325339)
      PathPoint P2: RA2R (0.0269688 -0.177325 0.0296118)
      PathPoint P3: RA2R (0.0364268 -0.198319 0.0281823)
      PathPoint P4: RA2R (0.0458663 -0.226527 0.0281312)
      PathPoint P4_0: RA3M (0.0265621 -0.00958108 -0.00783708)
      PathPoint P5: RA3M (0.0265138 -0.012246 -0.00838588)
      PathPoint P9: RA4P1 (0.00520819 -0.0130115 -0.00455234)
      PathWrap: wrap_object=WristAPLExt2 method=hybrid range=(4 5)
      PathWrap pathwrap_0: wrap_object=WristAPLExt method=hybrid range=(4 5)
      PathWrap pathwrap_1: wrap_object=Thumb_APL method=hybrid range=(6 7)
    Millard2012EquilibriumMuscle APB: max_isometric_force=101.8117 optimal_fiber_length=0.0552
        tendon_slack_length=0.0624 pennation_angle_at_optimal=0.1221731 minimum_activation=0.01
      PathPoint P1: RA3M (0 -0.015 -0.01)
      PathPoint P3: RA4P1 (-0.004 -0.032 0)
      PathPoint P3_0: RA5C1 (-0.001 0 0)
      PathWrap: wrap_object=Thumb_APB method=hybrid range=(1 2)
      PathWrap pathwrap_0: wrap_object=CentralFlex1 method=hybrid range=(1 2)
    Millard2012EquilibriumMuscle ADPT: max_isometric_force=101.8117 optimal_fiber_length=0.0552
        tendon_slack_length=0.0624 pennation_angle_at_optimal=0.1221731 minimum_activation=0.01
      PathPoint P1: RA3M (0.00440577 -0.051113 0.000307584)
      PathPoint P2: RA5C1 (-0.00408694 -0.00579312 -0.000571823)
      PathWrap: wrap_object=Thumb_A_A_ADPT method=hybrid range=(1 2)
      PathWrap pathwrap_0: wrap_object=CentralFlex1 method=hybrid range=(1 2)
