# OpenSim document version 40000
Model HAPTIX_arm_model_v1:
  gravity: 0 -9.80665 0
  publications: Gritsenko et al. PLOS ONE 2016
  length_units: meters
  force_units: N
  credits:
    Matthew Boots, Russell Hardesty, Anton Sobinov, Valeriya Gritsenko, Sergiy Yakovenko, Katherine R. Saul, Wendy M. Murray, Craig M. Goehler, Melissa Daly, Meghan E. Vidt, Dustin L. Crouch
  defaults: Millard2012EquilibriumMuscle default: min_control=0.01 optimal_force=1 max_isometric_force=987.26
      optimal_fiber_length=0.0535 tendon_slack_length=0.078 pennation_angle_at_optimal=0.1396263 [radians]
      max_contraction_velocity=10 activation_time_constant=0.01 [seconds] deactivation_time_constant=0.04 [seconds]
  Ground
  BodySet:
    Body Thorax: mass=38.298 [kg] mass_center=(-0.0616 -0.254 0) inertia=(0.6915 1.0121 1.3266 0 0 0) meshes=thorax.vtp
      WrapEllipsoid Thorax: xyz_body_rotation=(0.0434587 -0.331962 0.189892) translation=(-0.0386 -0.1273 0.0709)
          quadrant=all dimensions=(0.1 0.135 0.08)
      WrapEllipsoid PECM_R_Thorax: xyz_body_rotation=(0.0434587 -0.331962 0.189892)
          translation=(-0.0386 -0.1273 0.0709) quadrant=all dimensions=(0.1 0.135 0.08)
    Body RClavicle: mass=0.156 mass_center=(-0.011096 0.0063723 0.054168)
        inertia=(0.00024259 0.00025526 4.442e-5 -1.898e-5 -6.994e-5 5.371e-5) meshes=clavicle.vtp
    Body RClavicle_Phantom: mass=0.0001 mass_center=(0 0 0) inertia=(1 1 1 0 0 0)
    Body RScapula: mass=0.70396 mass_center=(-0.054694 -0.035032 -0.043734)
        inertia=(0.0012429 0.0011504 0.0013651 0.0004494 0.00040922 0.0002411) meshes=scapula.vtp
      WrapTorus SUPSP2: xyz_body_rotation=(0.3 0.4 -0.1) translation=(-0.01 -0.01 -0.01) quadrant=all
          inner_radius=0.007 outer_radius=0.01
      WrapEllipsoid Deltoid2: xyz_body_rotation=(3.13042 -1.54881 -1.31423) translation=(-0.0058 -0.0378 0.0096)
          quadrant=-y dimensions=(0.033 0.04 0.035)
      WrapTorus Delt3: xyz_body_rotation=(0.620988 0.32882 -0.560774) translation=(-0.0973 -0.0428 -0.037) quadrant=all
          inner_radius=0.04 outer_radius=0.06
      WrapTorus INFSP: xyz_body_rotation=(0.0253073 0.58835 0.151844) translation=(-0.0561 -0.0199 -0.0112)
          quadrant=all inner_radius=0.008 outer_radius=0.019
      WrapEllipsoid TMIN: xyz_body_rotation=(-2.09754 -0.280823 -1.76348) translation=(-0.0418 -0.0519 -0.0359)
          quadrant=x dimensions=(0.03 0.03 0.05)
      WrapCylinder TRIlongglen: xyz_body_rotation=(1.37532 -0.294612 2.43596) translation=(-0.0359 -0.0309 -0.0132)
          quadrant=x radius=0.003 length=0.03
    Body RScapula_Phantom: mass=0.0001 mass_center=(0 0 0) inertia=(1 1 1 0 0 0)
    Body Phys_Phantom: mass=0.000000001 mass_center=(0 0 0) inertia=(1 1 1 0 0 0)
    Body RA1H_Phantom: mass=0.0001 mass_center=(0 0 0) inertia=(1 1 1 0 0 0)
    Body RA1H_Phantom2: mass=0.0001 mass_center=(0 0 0) inertia=(1 1 1 0 0 0)
    Body RA1H: mass=1.99757 mass_center=(0.018064 -0.140141 -0.012746)
        inertia=(0.0122776 0.00255133 0.0125789 -0.00034741 -0.0002325 0.0012293) meshes=humerus.vtp
      WrapTorus Deltoid2: xyz_body_rotation=(0.7742 0.022 -1.31423) translation=(-0.0058 0.02 0.03) quadrant=x
          inner_radius=0.03 outer_radius=0.04
      WrapEllipsoid DELT1hh: xyz_body_rotation=(0.0584685 1.00461 0.570374) translation=(-0.0139 -0.0127 -0.0262)
          quadrant=z dimensions=(0.03 0.1 0.05)
      WrapCylinder delt2hum: xyz_body_rotation=(1.55093 -0.0199582 0.0596618) translation=(0.0017 -0.0958 0.0011)
          quadrant=all radius=0.0109 length=0.12
      WrapEllipsoid delt3hum: xyz_body_rotation=(1.72735 0.0759218 -2.74313) translation=(0.0019 -0.0592 0.0011)
          quadrant=x dimensions=(0.01 0.01 0.05)
      WrapEllipsoid SUPSP: xyz_body_rotation=(0.0380482 0.00855211 -1.30673) translation=(0.0002 0.0077 0.0043)
          quadrant=all dimensions=(0.02 0.02 0.02)
      WrapEllipsoid INFSP_and_TMIN_hum_head: xyz_body_rotation=(-0.286583 -0.00907571 -0.0684169)
          translation=(-0.0003 0.0026 0.0038) quadrant=all dimensions=(0.02 0.025 0.02)
      WrapEllipsoid SUBSCAP: xyz_body_rotation=(-0.924501 0.288852 0.381529) translation=(-0.0025 0.0007 -0.0045)
          quadrant=all dimensions=(0.02 0.017 0.028)
      WrapCylinder TMINhum: xyz_body_rotation=(1.75353 0.0692896 2.74628) translation=(-0.0014 -0.0455 0) quadrant=x
          radius=0.007 length=0.07
      WrapCylinder TMAJ_LAThum: xyz_body_rotation=(1.53641 -0.0637045 1.41424) translation=(0.0007 -0.0443 -0.0055)
          quadrant=-x radius=0.007 length=0.04
      WrapCylinder PEC12hum: xyz_body_rotation=(1.55928 -0.0774926 -0.925897) translation=(0.002 -0.0508 -0.0017)
          quadrant=x radius=0.009 length=0.07
      WrapSphere PEC23hh: translation=(-0.0086 0.0021 -0.0004) quadrant=all radius=0.02
      WrapCylinder PEC3hum: xyz_body_rotation=(1.44094 -0.0561996 1.75196) translation=(0.0009 -0.0551 -0.0004)
          quadrant=-x radius=0.008 length=0.1
      WrapCylinder LAT_TMAJhh: xyz_body_rotation=(-0.305084 -0.018326 -0.686613) translation=(-0.0224 0.0102 0.0094)
          quadrant=-y radius=0.007 length=0.045
      WrapEllipsoid LAT_TMAJ2hh: xyz_body_rotation=(-0.127235 1.8469 0.0197222) translation=(0.0016 0.0092 -0.0052)
          quadrant=x dimensions=(0.01 0.02 0.02)
      WrapEllipsoid TRIlonghh: xyz_body_rotation=(3.00162 -0.853466 2.57419) translation=(-0.0078 -0.0041 -0.0014)
          quadrant=z dimensions=(0.035 0.02 0.02)
      WrapCylinder TRI: xyz_body_rotation=(-0.14015 -0.00628319 0.154985) translation=(0.0028 -0.2919 -0.0119)
          quadrant=all radius=0.016 length=0.1
      WrapSphere TMAJ_LAT_PEC_CORBhh: translation=(0.0007 0 0.006) quadrant=all radius=0.03
      WrapSphere DELT_TMAJ_LAT_PEC_CORBhh: translation=(0.0007 0 0.006) quadrant=all radius=0.03
      WrapCylinder CORBhum: xyz_body_rotation=(-1.60832 0.0959931 0.875283) translation=(0.0027 -0.1202 -0.0059)
          quadrant=x radius=0.008 length=0.1
      WrapEllipsoid Elbow_PT_ECRL_1: xyz_body_rotation=(-0.162 -0.11083 0.61453) translation=(0.003 -0.2872 -0.0069)
          quadrant=x dimensions=(0.018 0.025 0.035)
      WrapCylinder TRI_2: xyz_body_rotation=(-0.14015 -0.00628319 0.154985) translation=(0.002 -0.279 -0.0119)
          quadrant=all radius=0.024 length=0.1
      WrapCylinder BIC_LO_elbow: xyz_body_rotation=(-0.14015 -0.0062832 0.15499) translation=(0.004 -0.2731 -0.0119)
          quadrant=x radius=0.035 length=0.11
      WrapCylinder BIC_LO_3: xyz_body_rotation=(-0.19252 -0.0062832 1.5708) translation=(0.0255 -0.223 -0.033)
          quadrant=-x radius=0.005 length=0.11
      WrapEllipsoid BIC_LO_2: xyz_body_rotation=(-2.0043 -1.0016 0.97547) translation=(0.0033 0.0073 0.0003)
          quadrant=-y dimensions=(0.025 0.02 0.02)
      WrapCylinder BIC_SH_elbow: xyz_body_rotation=(-0.14015 -0.0062832 0.15499) translation=(0.004 -0.2731 -0.0119)
          quadrant=x radius=0.035 length=0.11
      WrapEllipsoid ANC_1: xyz_body_rotation=(0.00750492 -0.196699 1.04929) translation=(0.0024 -0.285 0.002)
          quadrant=-x dimensions=(0.014 0.014 0.014)
      WrapCylinder PECM_R_hum: xyz_body_rotation=(1.55928 -0.0774926 -0.925897) translation=(0.002 -0.0508 -0.0017)
          quadrant=x radius=0.009 length=0.07
      WrapEllipsoid PECM_R_hh: xyz_body_rotation=(-0.620465 -0.310494 0.363727) translation=(-0.0037 0.0005 -0.0025)
          quadrant=-z dimensions=(0.03 0.02 0.02)
      WrapEllipsoid Elbow_PT: xyz_body_rotation=(-0.162 -0.093377 0.61453) translation=(0.003 -0.2772 -0.0076)
          quadrant=x dimensions=(0.02 0.032 0.032)
      WrapCylinder ElbowECRLFlex: xyz_body_rotation=(0 0.15 0) translation=(0.015 -0.25 0) quadrant=-y radius=0.012
          length=0.08
    Body RA2U: mass=1.1053 mass_center=(0.00971783 -0.0959509 0.024286)
        inertia=(0.00541309 0.00115318 0.00494361 0.00031686 -7.615e-5 0.00109169) meshes=ulna.vtp
      WrapCylinder EPL_prosup2: xyz_body_rotation=(-1.7 -0.1 0) translation=(-0.009 -0.11 0.02) quadrant=-y radius=0.01
          length=0.1
      WrapCylinder PQ2_1: xyz_body_rotation=(1.39138 0.0689405 1.52245) translation=(-0.0012 -0.2092 0.0428)
          quadrant=all radius=0.008 length=0.1
      WrapEllipsoid ANC_2: xyz_body_rotation=(0.00750492 -0.196699 1.04929) translation=(-0.016 0.002 0.002)
          quadrant=all dimensions=(0.012 0.012 0.012)
    Body RA2R: mass=0.23359 mass_center=(0.0336341 -0.181559 0.0156)
        inertia=(0.00043855 8.859e-5 0.00040258 3.014e-5 -4.24e-6 6.418e-5) meshes=radius.vtp
      WrapCylinder WristFCUSup: xyz_body_rotation=(-0.1 1.05 0) translation=(-0.016 -0.104 0.0014) quadrant=x
          radius=0.01 length=0.02
      WrapCylinder PQ1: xyz_body_rotation=(-1.60762 -0.0127409 -2.69025) translation=(0.0281 -0.1986 0.0288)
          quadrant=all radius=0.01 length=0.1
      WrapCylinder WristFCRFlex: xyz_body_rotation=(0.593936 1.50011 -2.23559) translation=(0.033 -0.228 0.008)
          quadrant=-y radius=0.004 length=0.02
      WrapCylinder WristFCUFlex: xyz_body_rotation=(0.593936 1.50011 -2.23559) translation=(0.015 -0.231 0.01)
          quadrant=-y radius=0.004 length=0.02
      WrapCylinder WristExtFingers: xyz_body_rotation=(0.593936 1.6 -2.23559) translation=(0.01 -0.232 0.045)
          quadrant=y radius=0.007 length=0.08
      WrapCylinder WristFlexFingers: xyz_body_rotation=(0.59394 1.5001 -1.7) translation=(0.01 -0.24 0.025) quadrant=-y
          radius=0.016 length=0.08
      WrapCylinder WristEIPFlex: xyz_body_rotation=(0.593936 1.50011 -1.7) translation=(0.01 -0.24 0.024) quadrant=-y
          radius=0.015 length=0.08
      WrapTorus EPL_Wrist: xyz_body_rotation=(1.3 0 0) translation=(0.035 -0.24 0.035) quadrant=all inner_radius=0.007
          outer_radius=0.008
      WrapCylinder wristSUPsup: xyz_body_rotation=(1.57 0 -2) translation=(-0.001 -0.03 0.005) quadrant=-y radius=0.01
          length=0.04
      WrapCylinder WristECUSup: xyz_body_rotation=(0 -2.2 0) translation=(0 -0.04 0.0075) quadrant=x radius=0.015
          length=0.05
      WrapCylinder WristECRLPro: xyz_body_rotation=(1.5 0.25 0) translation=(0.01 -0.08 0.008) quadrant=x radius=0.012
          length=0.05
      WrapTorus ECRB_1: xyz_body_rotation=(1.57 0 0) translation=(0.02 -0.237 0.044) quadrant=all inner_radius=0.005
          outer_radius=0.007
      WrapCylinder WristFCRSup: translation=(0.009 -0.07 0) quadrant=x radius=0.01 length=0.04
      WrapCylinder WristFCUPro: xyz_body_rotation=(-0.1 1.8 0) translation=(0.02 -0.1 0.01) quadrant=x radius=0.01
          length=0.03
      WrapCylinder WristPLSup: translation=(-0.005 -0.1 0) quadrant=x radius=0.018 length=0.04
      WrapCylinder BIC_LO_pro_sup: xyz_body_rotation=(1.3833 0.15001 0) translation=(0.0075 -0.06 0.003) quadrant=-y
          radius=0.0055 length=0.09
      WrapCylinder BIC_SH__pro_sup: xyz_body_rotation=(1.3833 0.15001 0) translation=(0.0075 -0.06 0.003) quadrant=-y
          radius=0.0055 length=0.09
      WrapCylinder Sup_Pro_PT: xyz_body_rotation=(1.45 0.25 0) translation=(0.02 -0.1 0.01) quadrant=x radius=0.009
          length=0.09
    Body RA3M: mass=0.3148 mass_center=(0.002 -0.0401 0.0056) inertia=(0.00011 6e-5 0.00015 9e-7 -2e-7 1.2e-5)
        meshes=(sdfast_1seg_hand_fr_c_5mc.vtp sdfast_1seg_hand_fr_c_4mc.vtp sdfast_1seg_hand_fr_c_3mc.vtp sdfast_1seg_hand_fr_c_2mc.vtp sdfast_1seg_hand_fr_c_trapezium.vtp sdfast_1seg_hand_fr_c_trapezoid.vtp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)
      WrapCylinder WristAPLExt: xyz_body_rotation=(0.593936 1.6 -2.23559) translation=(0.026 0 0) quadrant=y
          radius=0.0055 length=0.01
      WrapCylinder WristAPLExt2: xyz_body_rotation=(0.593936 1.6 -2.23559) translation=(0.026 0 -0.012) quadrant=-y
          radius=0.0055 length=0.01
      WrapCylinder WristEPBExt: xyz_body_rotation=(0.593936 1.6 -2.23559) translation=(0.026 0.001 0.001) quadrant=y
          radius=0.004 length=0.01
      WrapCylinder WristEPBFlex: xyz_body_rotation=(0.593936 1.6 -2.23559) translation=(0.026 -0.0029 -0.007)
          quadrant=-y radius=0.004 length=0.01
      WrapCylinder WristFCUExt: xyz_body_rotation=(0.593936 1.50011 -2.23559) translation=(-0.01 -0.001 0) quadrant=y
          radius=0.014 length=0.02
      WrapCylinder WristFDSExt: xyz_body_rotation=(0.59394 1.5001 -2.2356) translation=(0 -0.001 0) quadrant=y
          radius=0.012 length=0.05
      WrapCylinder WristFCRExt: xyz_body_rotation=(0.593936 1.50011 -2.23559) translation=(0.015 -0.003 0) quadrant=y
          radius=0.0135 length=0.02
      WrapTorus Thumb_APB: xyz_body_rotation=(0.785 1.57 0) translation=(0.015 -0.019 -0.027) quadrant=all
          inner_radius=0.004 outer_radius=0.005
      WrapTorus Thumb_EPB: xyz_body_rotation=(1.5 0.3 0) translation=(0.04 -0.021 -0.015) quadrant=all
          inner_radius=0.004 outer_radius=0.005
      WrapTorus Thumb_APL: xyz_body_rotation=(-0.7 0 0) translation=(0.033 -0.018 -0.018) quadrant=all
          inner_radius=0.004 outer_radius=0.005
      WrapTorus Thumb_A_A_ADPT: xyz_body_rotation=(0 1.57 0) translation=(0.014 -0.048 -0.01) quadrant=all
          inner_radius=0.002 outer_radius=0.003
      WrapCylinder Prox2FlexFDS: xyz_body_rotation=(0.593936 1.50011 -2.23559) translation=(0.021 -0.083 0) quadrant=y
          radius=0.009 length=0.01
      WrapCylinder Prox3FlexFDS: xyz_body_rotation=(0.593936 1.50011 -2.23559) translation=(0.004 -0.083 0) quadrant=y
          radius=0.013 length=0.01
      WrapCylinder Prox4FlexFDS: xyz_body_rotation=(0.593936 1.50011 -2.23559) translation=(-0.011 -0.079 0) quadrant=y
          radius=0.0115 length=0.01
      WrapCylinder Prox5FlexFDS: xyz_body_rotation=(0.593936 1.50011 -2.23559) translation=(-0.022 -0.072 0) quadrant=y
          radius=0.01 length=0.012
      WrapCylinder ProxEDMExt2: xyz_body_rotation=(0.593936 1.50011 -2.23559) translation=(-0.022 -0.075 0) quadrant=-y
          radius=0.005 length=0.012
      WrapTorus ECRL_Wrist_1: xyz_body_rotation=(1.5708 0 0) translation=(0.014 -0.013 0.012) quadrant=all
          inner_radius=0.002 outer_radius=0.003
      WrapCylinder WristPLExt: xyz_body_rotation=(0.593936 1.50011 -2.23559) translation=(0 -0.004 0) quadrant=y
          radius=0.02 length=0.02
      WrapCylinder WristECUExt: xyz_body_rotation=(1.0472 1.5001 -2) translation=(-0.015 -0.004 0.006) quadrant=y
          radius=0.001 length=0.02
      WrapCylinder WristECUFlex: xyz_body_rotation=(0.59394 1.5001 -2) translation=(-0.015 -0.005 0) quadrant=-y
          radius=0.005 length=0.02
      WrapCylinder WristFDP2Ext: xyz_body_rotation=(0.59394 1.5001 -2.2356) translation=(0 -0.001 0) quadrant=y
          radius=0.015 length=0.05
      WrapCylinder Prox2FlexFDP: xyz_body_rotation=(0.59394 1.5001 -2.2356) translation=(0.021 -0.083 0) quadrant=y
          radius=0.008 length=0.01
      WrapCylinder Prox3FlexFDP: xyz_body_rotation=(0.59394 1.5001 -2.2356) translation=(0.004 -0.085 0) quadrant=y
          radius=0.0095 length=0.01
      WrapCylinder Prox4FlexFDP: xyz_body_rotation=(0.593936 1.50011 -2.23559) translation=(-0.011 -0.081 0) quadrant=y
          radius=0.0095 length=0.01
      WrapCylinder Prox5FlexFDP: xyz_body_rotation=(0.59394 1.5001 -2.2356) translation=(-0.022 -0.075 0) quadrant=y
          radius=0.0085 length=0.012
    Body RA4P1: mass=0.065 mass_center=(0 -0.02 0) inertia=(1.201e-5 2.08e-6 1.201e-5 0 0 0) meshes=1mc.vtp
      WrapTorus Thumb_OP: xyz_body_rotation=(1.57376 0 2) translation=(-0.005 0 -0.005) quadrant=all inner_radius=0.004
          outer_radius=0.005
      WrapCylinder ThumbFlexCylinder: xyz_body_rotation=(0 -0.6 0) translation=(0 0 0) quadrant=-x radius=0.016
          length=0.03
      WrapTorus ThumbFlexTorus: xyz_body_rotation=(-1.57376 -0.0797616 0.39235) translation=(-0.01 0 -0.02)
          quadrant=all inner_radius=0.002 outer_radius=0.008
      WrapTorus Thumb_EPL: xyz_body_rotation=(-1.57376 -0.0797616 0.39235) translation=(0.01 0 0.007) quadrant=all
          inner_radius=0.004 outer_radius=0.005
      WrapCylinder CentralFlex1: translation=(0 -0.04 0) quadrant=-x radius=0.007 length=0.015
    Body RA5C1: mass=0.0193 mass_center=(0 -0.0135 0) inertia=(3.56e-6 6.18e-7 3.56e-6 0 0 0) meshes=thumbprox.vtp
      WrapCylinder CenFPBFlex: xyz_body_rotation=(0 0 0.4) translation=(-0.003 0.002 0) quadrant=-x radius=0.0035
          length=0.015
      WrapCylinder CenFPLFlex: xyz_body_rotation=(0 0 0.4) translation=(0.002 0.004 0) quadrant=-x radius=0.011
          length=0.015
      WrapCylinder CenExtEPB: xyz_body_rotation=(0 0 0.2) translation=(0 0.001 0) quadrant=x radius=0.0085 length=0.015
      WrapCylinder CenExtEPL: xyz_body_rotation=(0 0 0.2) translation=(0 0.002 0) quadrant=x radius=0.0085 length=0.015
    Body RA6D1: mass=0.0263 mass_center=(0 -0.011 0) inertia=(2.39e-6 8.42e-7 2.39e-6 0 0 0) meshes=thumbdist.vtp
      WrapCylinder DistalFlex1: translation=(-0.002 0.001 0) quadrant=-x radius=0.006 length=0.01
      WrapCylinder DistalExt1: translation=(0.002 0.001 0) quadrant=x radius=0.002 length=0.01
    Body RA4P2: mass=0.0164 mass_center=(0 -0.02 0) inertia=(2.45e-6 5.25e-7 2.45e-6 0 0 0) meshes=2proxph.vtp
      WrapCylinder ProxEDC2Ext: xyz_body_rotation=(0.59394 1.5001 -2.2356) translation=(0 0.001 0.0065) quadrant=-y
          radius=0.0025 length=0.012
      WrapCylinder CentralExt2: xyz_body_rotation=(-1.57 1.57 1) translation=(0 -0.041 0) quadrant=-y radius=0.004
          length=0.012
      WrapCylinder Cen2FlexFDS: xyz_body_rotation=(-1.57 1.57 0.25) translation=(0 -0.041 -0.0015) quadrant=y
          radius=0.004 length=0.01
      WrapCylinder Cen2FlexFDP: xyz_body_rotation=(-1.57 1.57 0.8) translation=(0 -0.04 -0.0045) quadrant=y
          radius=0.003 length=0.01
    Body RA5C2: mass=0.0168 mass_center=(0 -0.011 0) inertia=(1.01e-6 5.38e-7 1.01e-6 0 0 0) meshes=2midph.vtp
      WrapCylinder DistalExt2: xyz_body_rotation=(-1.57 1.57 0) translation=(0 -0.022 0) quadrant=-y radius=0.0009
          length=0.01
    Body RA6D2: mass=0.0132 mass_center=(0.0005 -0.0075 0.0005) inertia=(7.93e-7 4.22e-7 0 0 0 0) meshes=2distph.vtp
    Body RA4P3: mass=0.0204 mass_center=(0 -0.0203 0) inertia=(4.58e-6 6.5e-7 4.58e-6 0 0 0) meshes=3proxph.vtp
      WrapCylinder ProxEDC3Ext: xyz_body_rotation=(0.59394 1.5001 -2.2356) translation=(0 0.005 0.004) quadrant=-y
          radius=0.0025 length=0.012
      WrapCylinder Cen3FlexFDS: xyz_body_rotation=(-1.57 1.57 0.25) translation=(0 -0.0415 -0.0015) quadrant=y
          radius=0.005 length=0.01
      WrapCylinder Cen3FlexFDP: xyz_body_rotation=(-1.57 1.57 0.8) translation=(0 -0.04 -0.0035) quadrant=y
          radius=0.004 length=0.01
    Body RA5C3: mass=0.0168 mass_center=(0 -0.0145 0) inertia=(1.53e-6 5.4e-7 1.53e-6 0 0 0) meshes=3midph.vtp
      WrapCylinder DistalExt3: xyz_body_rotation=(-1.57 1.57 0) translation=(0 -0.029 0) quadrant=-y radius=0.0007
          length=0.01
    Body RA6D3: mass=0.012 mass_center=(0 -0.008 0) inertia=(8.17e-7 3.84e-7 8.17e-7 0 0 0) meshes=3distph.vtp
    Body RA4P4: mass=0.0144 mass_center=(0 -0.0195 0) inertia=(4.58e-6 6.5e-7 4.58e-6 0 0 0) meshes=4proxph.vtp
      WrapCylinder ProxEDC4Ext: xyz_body_rotation=(0.593936 1.50011 -2.23559) translation=(0 0.0025 0.003) quadrant=-y
          radius=0.002 length=0.012
      WrapCylinder Cen4FlexFDS: xyz_body_rotation=(-1.57 1.57 0.8) translation=(0 -0.04 -0.002) quadrant=y
          radius=0.0035 length=0.01
      WrapCylinder Cen4FlexFDP: xyz_body_rotation=(-1.57 1.57 1.2) translation=(0 -0.038 -0.003) quadrant=y
          radius=0.003 length=0.01
    Body RA5C4: mass=0.0109 mass_center=(0 -0.012 0) inertia=(1.53e-6 5.4e-7 1.53e-6 0 0 0) meshes=4midph.vtp
      WrapCylinder DistalExt4: xyz_body_rotation=(-1.57 1.57 0) translation=(0 -0.024 0) quadrant=-y radius=0.0007
          length=0.01
    Body RA6D4: mass=0.0094 mass_center=(0 -0.007 0) inertia=(8.17e-7 3.84e-7 8.17e-7 0 0 0) meshes=4distph.vtp
    Body RA4P5: mass=0.0122 mass_center=(0 -0.016 0) inertia=(1.33e-6 2.2e-7 1.33e-6 0 0 0) meshes=5proxph.vtp
      WrapCylinder ProxEDC5Ext: xyz_body_rotation=(0.59394 1.5001 -2.2356) translation=(0 0.002 0.003) quadrant=-y
          radius=0.002 length=0.012
      WrapCylinder ProxEDMExt: xyz_body_rotation=(0.593936 1.50011 -2.23559) translation=(0 0.002 0.003) quadrant=-y
          radius=0.002 length=0.012
      WrapCylinder Cen5ExtEDM: xyz_body_rotation=(-1.57 1.57 0) translation=(0 -0.032 0.0005) quadrant=-y radius=0.0026
          length=0.01
      WrapCylinder Cen5FlexFDS: xyz_body_rotation=(-1.57 1.57 0) translation=(0 -0.033 -0.001) quadrant=y radius=0.003
          length=0.01
      WrapCylinder Cen5FlexFDP: xyz_body_rotation=(-1.57 1.57 1) translation=(0 -0.031 -0.003) quadrant=y radius=0.002
          length=0.01
    Body RA5C5: mass=0.0074 mass_center=(0 -0.009 0) inertia=(2.32e-7 1.26e-7 0 0 0 0) meshes=5midph.vtp
      WrapCylinder DistalExt5: xyz_body_rotation=(-1.57 1.57 0) translation=(0 -0.019 0) quadrant=-y radius=0.0015
          length=0.01
    Body RA6D5: mass=0.0068 mass_center=(0 -0.007 0) inertia=(2.54e-7 1.08e-7 0 0 0 0) meshes=5distph.vtp
      WrapCylinder Dist5FlexFDP_1: xyz_body_rotation=(-1.57 1.57 0) translation=(0 0 0.003) quadrant=y radius=0.001
          length=0.01
      WrapCylinder Dist5FlexFDP_2: xyz_body_rotation=(-2.0944 1.57 0) translation=(0 -0.003 -0.0045) quadrant=-y
          radius=0.001 length=0.01
  JointSet:
    CustomJoint ground_thorax: socket_parent_frame=ground_offset socket_child_frame=Thorax_offset
      Coordinate thorax_rot1: default_value=0 range=(-1.5708 1.5708) clamped=false locked=true
      Coordinate thorax_rot2: default_value=0 range=(-1.5708 1.5708) clamped=false locked=true
      Coordinate thorax_rot3: default_value=0 range=(-1.5708 1.5708) clamped=false locked=true
      PhysicalOffsetFrame ground_offset: socket_parent=/ground translation=(0 0 0) [meters]
      PhysicalOffsetFrame Thorax_offset: socket_parent=/bodyset/Thorax translation=(0 -0.508 0)
      SpatialTransform: axes_held_at_zero=(translation1 translation2 translation3)
        TransformAxis rotation1: coordinates=thorax_rot1 axis=(0 0 1) LinearFunction(coefficients=1 0)
        TransformAxis rotation2: coordinates=thorax_rot2 axis=(0 1 0) LinearFunction(coefficients=1 0)
        TransformAxis rotation3: coordinates=thorax_rot3 axis=(1 0 0) LinearFunction(coefficients=1 0)
    CustomJoint sternoclavicular: socket_parent_frame=Thorax_offset socket_child_frame=RClavicle_offset
      Coordinate sternoclavicular_r2: default_value=-0.1267109 range=(-99999.9 99999.9) clamped=false
      Coordinate sternoclavicular_r3: default_value=0.05366888 range=(-99999.9 99999.9) clamped=false
      PhysicalOffsetFrame Thorax_offset: socket_parent=/bodyset/Thorax translation=(0.006325 0.00693 0.025465)
      PhysicalOffsetFrame RClavicle_offset: socket_parent=/bodyset/RClavicle translation=(0 0 0)
      SpatialTransform: axes_held_at_zero=(rotation3 translation1 translation2 translation3)
        TransformAxis rotation1: coordinates=sternoclavicular_r2 axis=(0.0153 0.9892987 -0.1451)
            LinearFunction(coefficients=1 0)
        TransformAxis rotation2: coordinates=sternoclavicular_r3 axis=(-0.9944725 0 -0.104997)
            LinearFunction(coefficients=1 0)
    CustomJoint unrotscap: socket_parent_frame=RClavicle_offset socket_child_frame=RClavicle_Phantom_offset
      Coordinate unrotscap_r3: default_value=-0.05366888 range=(-99999.9 99999.9) clamped=false
      Coordinate unrotscap_r2: default_value=0.1267109 range=(-99999.9 99999.9) clamped=false
      PhysicalOffsetFrame RClavicle_offset: socket_parent=/bodyset/RClavicle translation=(-0.01433 0.02007 0.135535)
      PhysicalOffsetFrame RClavicle_Phantom_offset: socket_parent=/bodyset/RClavicle_Phantom translation=(0 0 0)
      SpatialTransform: axes_held_at_zero=(rotation3 translation1 translation2 translation3)
        TransformAxis rotation1: coordinates=unrotscap_r3 axis=(-0.9944725 0 -0.104997)
            LinearFunction(coefficients=1 0)
        TransformAxis rotation2: coordinates=unrotscap_r2 axis=(0.0153 0.9892987 -0.1451)
            LinearFunction(coefficients=1 0)
    CustomJoint acromioclavicular: socket_parent_frame=RClavicle_Phantom_offset socket_child_frame=RScapula_offset
      Coordinate acromioclavicular_r2: default_value=-0.02565634 range=(-99999.9 99999.9) clamped=false
      Coordinate acromioclavicular_r3: default_value=0.2073451 range=(-99999.9 99999.9) clamped=false
      Coordinate acromioclavicular_r1: default_value=0.09320058 range=(-99999.9 99999.9) clamped=false
      PhysicalOffsetFrame RClavicle_Phantom_offset: socket_parent=/bodyset/RClavicle_Phantom translation=(0 0 0)
      PhysicalOffsetFrame RScapula_offset: socket_parent=/bodyset/RScapula translation=(0 0 0)
      SpatialTransform: axes_held_at_zero=(translation1 translation2 translation3)
        TransformAxis rotation1: coordinates=acromioclavicular_r2 axis=(0.1570949 0.9472686 -0.2792909)
            LinearFunction(coefficients=1 0)
        TransformAxis rotation2: coordinates=acromioclavicular_r3 axis=(-0.754084 0.297594 0.585487)
            LinearFunction(coefficients=1 0)
        TransformAxis rotation3: coordinates=acromioclavicular_r1 axis=(0.6376998 0.1186 0.7610998)
            LinearFunction(coefficients=1 0)
    CustomJoint unrothum: socket_parent_frame=RScapula_offset socket_child_frame=RScapula_Phantom_offset
      Coordinate unrothum_r1: default_value=-0.09320058 range=(-99999.9 99999.9) clamped=false
      Coordinate unrothum_r3: default_value=-0.2073451 range=(-99999.9 99999.9) clamped=false
      Coordinate unrothum_r2: default_value=0.02565634 range=(-99999.9 99999.9) clamped=false
      PhysicalOffsetFrame RScapula_offset: socket_parent=/bodyset/RScapula translation=(-0.00955 -0.034 0.009)
      PhysicalOffsetFrame RScapula_Phantom_offset: socket_parent=/bodyset/RScapula_Phantom translation=(0 0 0)
      SpatialTransform: axes_held_at_zero=(translation1 translation2 translation3)
        TransformAxis rotation1: coordinates=unrothum_r1 axis=(0.6376998 0.1186 0.7610998)
            LinearFunction(coefficients=1 0)
        TransformAxis rotation2: coordinates=unrothum_r3 axis=(-0.754084 0.297594 0.585487)
            LinearFunction(coefficients=1 0)
        TransformAxis rotation3: coordinates=unrothum_r2 axis=(0.1570949 0.9472686 -0.2792909)
            LinearFunction(coefficients=1 0)
    CustomJoint shoulder0: socket_parent_frame=RScapula_Phantom_offset socket_child_frame=RA1H_Phantom_offset
      Coordinate elv_angle: default_value=0 range=(-1.570796 2.268928) clamped=true
      PhysicalOffsetFrame RScapula_Phantom_offset: socket_parent=/bodyset/RScapula_Phantom translation=(0 0 0)
      PhysicalOffsetFrame RA1H_Phantom_offset: socket_parent=/bodyset/RA1H_Phantom translation=(0 0 0)
      SpatialTransform: axes_held_at_zero=(rotation2 rotation3 translation1 translation2 translation3)
        TransformAxis rotation1: coordinates=elv_angle axis=(0.0048 0.9990892 0.04240001)
            LinearFunction(coefficients=1 0)
    CustomJoint shoulder1: socket_parent_frame=RA1H_Phantom_offset socket_child_frame=RA1H_Phantom2_offset
      Coordinate shoulder_elv: default_value=0 range=(0 3.141593) clamped=true
      Coordinate shoulder1_r2: default_value=0 range=(-99999.9 99999.9) clamped=false
      PhysicalOffsetFrame RA1H_Phantom_offset: socket_parent=/bodyset/RA1H_Phantom translation=(0 0 0)
      PhysicalOffsetFrame RA1H_Phantom2_offset: socket_parent=/bodyset/RA1H_Phantom2 translation=(0 0 0)
      SpatialTransform: axes_held_at_zero=(rotation3 translation1 translation2 translation3)
        TransformAxis rotation1: coordinates=shoulder_elv axis=(-0.9982614 0.0023 0.05889802)
            LinearFunction(coefficients=1 0)
        TransformAxis rotation2: coordinates=shoulder1_r2 axis=(0.0048 0.9990892 0.04240001)
            LinearFunction(coefficients=1 0)
    CustomJoint shoulder2: socket_parent_frame=RA1H_Phantom2_offset socket_child_frame=Phys_offset
      Coordinate shoulder_rot: default_value=0 range=(-1.570796 0.3490659) clamped=true
      PhysicalOffsetFrame RA1H_Phantom2_offset: socket_parent=/bodyset/RA1H_Phantom2 translation=(0 0 0)
      PhysicalOffsetFrame Phys_offset: socket_parent=/bodyset/Phys_Phantom translation=(0 0 0)
      SpatialTransform: axes_held_at_zero=(rotation2 rotation3 translation1 translation2 translation3)
        TransformAxis rotation1: coordinates=shoulder_rot axis=(0.0048 0.9990892 0.04240001)
            LinearFunction(coefficients=1 0)
    CustomJoint phys_joint: socket_parent_frame=Phys_offset socket_child_frame=RA1H_offset
      Coordinate phys_coord_ab_ad: default_value=0 range=(-3.1416 3.1416) clamped=true locked=true
      Coordinate phys_coord_rot: default_value=0 range=(-3.1416 3.1416) clamped=true locked=true
      Coordinate phys_coord_fl_ex: default_value=0 range=(-3.1416 3.1416) clamped=true locked=true
      Coordinate subluxation: default_value=0 range=(-0.05 0) clamped=true
      PhysicalOffsetFrame Phys_offset: socket_parent=/bodyset/Phys_Phantom translation=(0 0 0)
      PhysicalOffsetFrame RA1H_offset: socket_parent=/bodyset/RA1H translation=(0 0 0)
      SpatialTransform: axes_held_at_zero=(translation1 translation3)
        TransformAxis rotation1: coordinates=phys_coord_ab_ad axis=(1 0 0) LinearFunction(coefficients=1 0)
        TransformAxis rotation2: coordinates=phys_coord_rot axis=(0 1 0) LinearFunction(coefficients=1 0)
        TransformAxis rotation3: coordinates=phys_coord_fl_ex axis=(0 0 1) LinearFunction(coefficients=1 0)
        TransformAxis translation2: coordinates=subluxation axis=(0 1 0) LinearFunction(coefficients=1 0)
    CustomJoint RA1H_RA2U: socket_parent_frame=RA1H_offset socket_child_frame=RA2U_offset
      Coordinate elbow_flexion: default_value=0 range=(0 2.2689) clamped=false locked=true
      Coordinate ra_el_e_f: default_value=0 range=(0 2.2689) clamped=true
      PhysicalOffsetFrame RA1H_offset: socket_parent=/bodyset/RA1H translation=(0.0061 -0.2904 -0.0123)
      PhysicalOffsetFrame RA2U_offset: socket_parent=/bodyset/RA2U translation=(0 0 0)
      SpatialTransform: axes_held_at_zero=(rotation2 translation1 translation2 translation3)
        TransformAxis rotation1: coordinates=elbow_flexion axis=(0.04940001 0.03660001 0.9981083)
            LinearFunction(coefficients=1 0)
        TransformAxis rotation3: coordinates=ra_el_e_f axis=(0 0 1) LinearFunction(coefficients=1 0)
    CustomJoint RA2U_RA2R: socket_parent_frame=RA2U_offset socket_child_frame=RA2R_offset
      Coordinate ra_wr_s_p: default_value=-0.1614779 range=(-1.5708 1.5708) clamped=true
      PhysicalOffsetFrame RA2U_offset: socket_parent=/bodyset/RA2U translation=(0.0004 -0.011503 0.019999)
      PhysicalOffsetFrame RA2R_offset: socket_parent=/bodyset/RA2R translation=(0 0 0)
      SpatialTransform: axes_held_at_zero=(rotation2 rotation3 translation1 translation2 translation3)
        TransformAxis rotation1: coordinates=ra_wr_s_p axis=(-0.01716099 0.9926656 -0.119668)
            LinearFunction(coefficients=1 0)
    CustomJoint RA2R_RA3M: socket_parent_frame=RA2R_offset socket_child_frame=RA3M_offset
      Coordinate ra_wr_e_f: default_value=0 range=(-1.2217 1.2217) clamped=true
      Coordinate ra_wr_ad_ab: default_value=1.226522e-24 range=(-0.1745 0.5236) clamped=true
      PhysicalOffsetFrame RA2R_offset: socket_parent=/bodyset/RA2R translation=(0.018 -0.242 0.025)
      PhysicalOffsetFrame RA3M_offset: socket_parent=/bodyset/RA3M translation=(0 0 0)
      SpatialTransform: axes_held_at_zero=(rotation2 translation1 translation2 translation3)
        TransformAxis rotation1: coordinates=ra_wr_e_f axis=(1 0 0) LinearFunction(coefficients=1 0)
        TransformAxis rotation3: coordinates=ra_wr_ad_ab axis=(0 0 1) LinearFunction(coefficients=1 0)
    CustomJoint RA3M_RA4P1: socket_parent_frame=RA3M_offset socket_child_frame=RA4P1_offset
      Coordinate ra_cmc1_ad_ab: default_value=0.3489014 range=(0 0.8727) clamped=true locked=true
      Coordinate ra_cmc1_f_e: default_value=0.3994886 range=(0 0.8727) clamped=true locked=true
      PhysicalOffsetFrame RA3M_offset: socket_parent=/bodyset/RA3M translation=(0.024 -0.0251 -0.0107)
      PhysicalOffsetFrame RA4P1_offset: socket_parent=/bodyset/RA4P1 translation=(0 0 0)
      SpatialTransform: axes_held_at_zero=(rotation2 translation1 translation2 translation3)
        TransformAxis rotation1: coordinates=ra_cmc1_ad_ab axis=(1 0 0) LinearFunction(coefficients=1 0)
        TransformAxis rotation3: coordinates=ra_cmc1_f_e axis=(0 0 1) LinearFunction(coefficients=1 0)
    CustomJoint RA4P1_RA5C1: socket_parent_frame=RA4P1_offset socket_child_frame=RA5C1_offset
      Coordinate ra_mcp1_f_e: default_value=-0.2760706 range=(-0.7854 0) clamped=true locked=true
      PhysicalOffsetFrame RA4P1_offset: socket_parent=/bodyset/RA4P1 translation=(0 -0.04 0)
      PhysicalOffsetFrame RA5C1_offset: socket_parent=/bodyset/RA5C1 translation=(0 0 0)
      SpatialTransform: axes_held_at_zero=(rotation1 rotation2 translation1 translation2 translation3)
        TransformAxis rotation3: coordinates=ra_mcp1_f_e axis=(0 0 1) LinearFunction(coefficients=1 0)
    CustomJoint RA5C1_RA6D1: socket_parent_frame=RA5C1_offset socket_child_frame=RA6D1_offset
      Coordinate ra_ip1_f_e: default_value=-0.001522203 range=(-1.5708 0) clamped=true locked=true
      PhysicalOffsetFrame RA5C1_offset: socket_parent=/bodyset/RA5C1 translation=(0 -0.027 0)
      PhysicalOffsetFrame RA6D1_offset: socket_parent=/bodyset/RA6D1 translation=(0 0 0)
      SpatialTransform: axes_held_at_zero=(rotation1 rotation2 translation1 translation2 translation3)
        TransformAxis rotation3: coordinates=ra_ip1_f_e axis=(0 0 1) LinearFunction(coefficients=1 0)
    CustomJoint RA3M_RA4P2: socket_parent_frame=RA3M_offset socket_child_frame=RA4P2_offset
      Coordinate ra_mcp2_e_f: default_value=0.0002893365 range=(0 1.5708) clamped=true locked=true
      Coordinate ra_mcp2_ab_ad: default_value=0 range=(-0.2618 0.2618) clamped=true locked=true
      PhysicalOffsetFrame RA3M_offset: socket_parent=/bodyset/RA3M translation=(0.021 -0.085 0)
      PhysicalOffsetFrame RA4P2_offset: socket_parent=/bodyset/RA4P2 translation=(0 0 0)
      SpatialTransform: axes_held_at_zero=(rotation2 translation1 translation2 translation3)
        TransformAxis rotation1: coordinates=ra_mcp2_e_f axis=(1 0 0) LinearFunction(coefficients=1 0)
        TransformAxis rotation3: coordinates=ra_mcp2_ab_ad axis=(0 0 1) LinearFunction(coefficients=1 0)
    CustomJoint RA4P2_RA5C2: socket_parent_frame=RA4P2_offset socket_child_frame=RA5C2_offset
      Coordinate ra_pip2_e_f: default_value=0.000116452 range=(0 2.0944) clamped=true locked=true
      PhysicalOffsetFrame RA4P2_offset: socket_parent=/bodyset/RA4P2 translation=(0 -0.04 0)
      PhysicalOffsetFrame RA5C2_offset: socket_parent=/bodyset/RA5C2 translation=(0 0 0)
      SpatialTransform: axes_held_at_zero=(rotation2 rotation3 translation1 translation2 translation3)
        TransformAxis rotation1: coordinates=ra_pip2_e_f axis=(1 0 0) LinearFunction(coefficients=1 0)
    CustomJoint RA5C2_RA6D2: socket_parent_frame=RA5C2_offset socket_child_frame=RA6D2_offset
      Coordinate ra_dip2_e_f: default_value=0.0009792333 range=(0 1.5708) clamped=true locked=true
      PhysicalOffsetFrame RA5C2_offset: socket_parent=/bodyset/RA5C2 translation=(0 -0.022 0)
      PhysicalOffsetFrame RA6D2_offset: socket_parent=/bodyset/RA6D2 translation=(0 0 0)
      SpatialTransform: axes_held_at_zero=(rotation2 rotation3 translation1 translation2 translation3)
        TransformAxis rotation1: coordinates=ra_dip2_e_f axis=(1 0 0) LinearFunction(coefficients=1 0)
    CustomJoint RA3M_RA4P3: socket_parent_frame=RA3M_offset socket_child_frame=RA4P3_offset
      Coordinate ra_mcp3_e_f: default_value=0.0004566119 range=(0 1.5708) clamped=true locked=true
      Coordinate ra_mcp3_ab_ad: default_value=0 range=(-0.2618 0.2618) clamped=true locked=true
      PhysicalOffsetFrame RA3M_offset: socket_parent=/bodyset/RA3M translation=(0.004 -0.085 0)
      PhysicalOffsetFrame RA4P3_offset: socket_parent=/bodyset/RA4P3 translation=(0 0 0)
      SpatialTransform: axes_held_at_zero=(rotation2 translation1 translation2 translation3)
        TransformAxis rotation1: coordinates=ra_mcp3_e_f axis=(1 0 0) LinearFunction(coefficients=1 0)
        TransformAxis rotation3: coordinates=ra_mcp3_ab_ad axis=(0 0 1) LinearFunction(coefficients=1 0)
    CustomJoint RA4P3_RA5C3: socket_parent_frame=RA4P3_offset socket_child_frame=RA5C3_offset
      Coordinate ra_pip3_e_f: default_value=0.0003757574 range=(0 2.0944) clamped=true locked=true
      PhysicalOffsetFrame RA4P3_offset: socket_parent=/bodyset/RA4P3 translation=(0 -0.0405 0)
      PhysicalOffsetFrame RA5C3_offset: socket_parent=/bodyset/RA5C3 translation=(0 0 0)
      SpatialTransform: axes_held_at_zero=(rotation2 rotation3 translation1 translation2 translation3)
        TransformAxis rotation1: coordinates=ra_pip3_e_f axis=(1 0 0) LinearFunction(coefficients=1 0)
    CustomJoint RA5C3_RA6D3: socket_parent_frame=RA5C3_offset socket_child_frame=RA6D3_offset
      Coordinate ra_dip3_e_f: default_value=0.0001405541 range=(0 1.5708) clamped=true locked=true
      PhysicalOffsetFrame RA5C3_offset: socket_parent=/bodyset/RA5C3 translation=(0 -0.029047 0)
      PhysicalOffsetFrame RA6D3_offset: socket_parent=/bodyset/RA6D3 translation=(0 0 0)
      SpatialTransform: axes_held_at_zero=(rotation2 rotation3 translation1 translation2 translation3)
        TransformAxis rotation1: coordinates=ra_dip3_e_f axis=(1 0 0) LinearFunction(coefficients=1 0)
    CustomJoint RA3M_RA4P4: socket_parent_frame=RA3M_offset socket_child_frame=RA4P4_offset
      Coordinate ra_mcp4_e_f: default_value=0.0001219669 range=(0 1.5708) clamped=true locked=true
      Coordinate ra_mcp4_ab_ad: default_value=0 range=(-0.2618 0.2618) clamped=true locked=true
      PhysicalOffsetFrame RA3M_offset: socket_parent=/bodyset/RA3M translation=(-0.011 -0.081 0)
      PhysicalOffsetFrame RA4P4_offset: socket_parent=/bodyset/RA4P4 translation=(0 0 0)
      SpatialTransform: axes_held_at_zero=(rotation2 translation1 translation2 translation3)
        TransformAxis rotation1: coordinates=ra_mcp4_e_f axis=(1 0 0) LinearFunction(coefficients=1 0)
        TransformAxis rotation3: coordinates=ra_mcp4_ab_ad axis=(0 0 1) LinearFunction(coefficients=1 0)
    CustomJoint RA4P4_RA5C4: socket_parent_frame=RA4P4_offset socket_child_frame=RA5C4_offset
      Coordinate ra_pip4_e_f: default_value=0.0002069697 range=(0 2.0944) clamped=true locked=true
      PhysicalOffsetFrame RA4P4_offset: socket_parent=/bodyset/RA4P4 translation=(0 -0.039 0)
      PhysicalOffsetFrame RA5C4_offset: socket_parent=/bodyset/RA5C4 translation=(0 0 0)
      SpatialTransform: axes_held_at_zero=(rotation2 rotation3 translation1 translation2 translation3)
        TransformAxis rotation1: coordinates=ra_pip4_e_f axis=(1 0 0) LinearFunction(coefficients=1 0)
    CustomJoint RA5C4_RA6D4: socket_parent_frame=RA5C4_offset socket_child_frame=RA6D4_offset
      Coordinate ra_dip4_e_f: default_value=0.0001490989 range=(0 1.5708) clamped=true locked=true
      PhysicalOffsetFrame RA5C4_offset: socket_parent=/bodyset/RA5C4 translation=(0 -0.024 0)
      PhysicalOffsetFrame RA6D4_offset: socket_parent=/bodyset/RA6D4 translation=(0 0 0)
      SpatialTransform: axes_held_at_zero=(rotation2 rotation3 translation1 translation2 translation3)
        TransformAxis rotation1: coordinates=ra_dip4_e_f axis=(1 0 0) LinearFunction(coefficients=1 0)
    CustomJoint RA3M_RA4P5: socket_parent_frame=RA3M_offset socket_child_frame=RA4P5_offset
      Coordinate ra_mcp5_e_f: default_value=0.0001634678 range=(0 1.5708) clamped=true locked=true
      Coordinate ra_mcp5_ab_ad: default_value=0 range=(-0.2618 0.2618) clamped=true locked=true
      PhysicalOffsetFrame RA3M_offset: socket_parent=/bodyset/RA3M translation=(-0.022 -0.075 0)
      PhysicalOffsetFrame RA4P5_offset: socket_parent=/bodyset/RA4P5 translation=(0 0 0)
      SpatialTransform: axes_held_at_zero=(rotation2 translation1 translation2 translation3)
        TransformAxis rotation1: coordinates=ra_mcp5_e_f axis=(1 0 0) LinearFunction(coefficients=1 0)
        TransformAxis rotation3: coordinates=ra_mcp5_ab_ad axis=(0 0 1) LinearFunction(coefficients=1 0)
    CustomJoint RA4P5_RA5C5: socket_parent_frame=RA4P5_offset socket_child_frame=RA5C5_offset
      Coordinate ra_pip5_e_f: default_value=3.136436e-5 range=(0 2.0944) clamped=true locked=true
      PhysicalOffsetFrame RA4P5_offset: socket_parent=/bodyset/RA4P5 translation=(0 -0.0325 0.001)
      PhysicalOffsetFrame RA5C5_offset: socket_parent=/bodyset/RA5C5 translation=(0 0 0)
      SpatialTransform: axes_held_at_zero=(rotation2 rotation3 translation1 translation2 translation3)
        TransformAxis rotation1: coordinates=ra_pip5_e_f axis=(1 0 0) LinearFunction(coefficients=1 0)
    CustomJoint RA5C5_RA6D5: socket_parent_frame=RA5C5_offset socket_child_frame=RA6D5_offset
      Coordinate ra_dip5_e_f: default_value=0.0003266092 range=(0 1.5708) clamped=true locked=true
      PhysicalOffsetFrame RA5C5_offset: socket_parent=/bodyset/RA5C5 translation=(0 -0.02 0)
      PhysicalOffsetFrame RA6D5_offset: socket_parent=/bodyset/RA6D5 translation=(0 0 0)
      SpatialTransform: axes_held_at_zero=(rotation2 rotation3 translation1 translation2 translation3)
        TransformAxis rotation1: coordinates=ra_dip5_e_f axis=(1 0 0) LinearFunction(coefficients=1 0)
  ConstraintSet:
    CoordinateCouplerConstraint [values shared by the 11 below unless stated]: independent_coordinate_names=shoulder_elv
        scale_factor=1
    CoordinateCouplerConstraint sternoclavicular_r2_con: dependent_coordinate_name=sternoclavicular_r2
      coupled_coordinates_function: SimmSpline: x=(0 2.61799) y=(0 -0.633555)
    CoordinateCouplerConstraint sternoclavicular_r3_con: dependent_coordinate_name=sternoclavicular_r3
      coupled_coordinates_function: SimmSpline: x=(0 3.14159) y=(0 0.322013)
    CoordinateCouplerConstraint unrotscap_r2_con: dependent_coordinate_name=unrotscap_r2
      coupled_coordinates_function: SimmSpline: x=(0 2.61799) y=(0 0.633555)
    CoordinateCouplerConstraint unrotscap_r3_con: dependent_coordinate_name=unrotscap_r3
      coupled_coordinates_function: SimmSpline: x=(0 3.14159) y=(0 -0.322013)
    CoordinateCouplerConstraint acromioclavicular_r1_con: dependent_coordinate_name=acromioclavicular_r1
      coupled_coordinates_function: SimmSpline: x=(0 2.61799) y=(0 0.466003)
    CoordinateCouplerConstraint acromioclavicular_r2_con: dependent_coordinate_name=acromioclavicular_r2
      coupled_coordinates_function: SimmSpline: x=(0 2.61799) y=(0 -0.128282)
    CoordinateCouplerConstraint acromioclavicular_r3_con: dependent_coordinate_name=acromioclavicular_r3
      coupled_coordinates_function: SimmSpline: x=(0 2.61799) y=(0 1.03673)
    CoordinateCouplerConstraint unrothum_r1_con: dependent_coordinate_name=unrothum_r1
      coupled_coordinates_function: SimmSpline: x=(0 2.61799) y=(0 -0.466003)
    CoordinateCouplerConstraint unrothum_r2_con: dependent_coordinate_name=unrothum_r2
      coupled_coordinates_function: SimmSpline: x=(0 2.61799) y=(0 0.128282)
    CoordinateCouplerConstraint unrothum_r3_con: dependent_coordinate_name=unrothum_r3
      coupled_coordinates_function: SimmSpline: x=(0 2.61799) y=(0 -1.03673)
    CoordinateCouplerConstraint shoulder1_r2_con: independent_coordinate_names=elv_angle
        dependent_coordinate_name=shoulder1_r2
      coupled_coordinates_function: SimmSpline: x=(-1.5708 3.14159) y=(1.5708 -3.14159)
  ForceSet:
    CoordinateLimitForce ThoraxRot1Limits: coordinate=thorax_rot1 upper_stiffness=100 [N*m/degree]
        upper_limit=150 [degrees] lower_stiffness=100 [N*m/degree] lower_limit=30 [degrees] damping=0
        transition=542.8423 [degrees]
    CoordinateLimitForce ThoraxRot2Limits: coordinate=thorax_rot2 upper_stiffness=100 upper_limit=150
        lower_stiffness=100 lower_limit=30 damping=0 transition=542.8423
    CoordinateLimitForce ThoraxRot3Limits: coordinate=thorax_rot3 upper_stiffness=100 upper_limit=150
        lower_stiffness=100 lower_limit=30 damping=0 transition=542.8423
    CoordinateLimitForce elbow_flexion_ligaments: coordinate=elbow_flexion upper_stiffness=0.3037 upper_limit=85
        lower_stiffness=100 lower_limit=14 damping=0 transition=139.5813
    CoordinateLimitForce elbow_flexion_damping: coordinate=elbow_flexion upper_stiffness=1e-8 upper_limit=190
        lower_stiffness=1e-8 lower_limit=190 damping=0.001745 transition=1
    CoordinateLimitForce pro_sup_ligaments: coordinate=ra_wr_s_p upper_stiffness=50 upper_limit=60 lower_stiffness=50
        lower_limit=-60 damping=0 transition=430.1186
    CoordinateLimitForce pro_sup_damping: coordinate=ra_wr_s_p upper_stiffness=1e-8 upper_limit=190
        lower_stiffness=1e-8 lower_limit=190 damping=0.001745 transition=1
    CoordinateLimitForce flexion_ligaments: coordinate=ra_wr_e_f upper_stiffness=200 upper_limit=60
        lower_stiffness=135.3232 lower_limit=-60 damping=0 transition=92.916
    CoordinateLimitForce flexion_damping: coordinate=ra_wr_e_f upper_stiffness=1e-8 upper_limit=190
        lower_stiffness=1e-8 lower_limit=190 damping=0.00043633 transition=1
    CoordinateLimitForce RA2R_RA3M_Z_damping: coordinate=ra_wr_ad_ab upper_stiffness=1e-8 upper_limit=50
        lower_stiffness=1e-8 lower_limit=0 damping=0.00043633 transition=1
    CoordinateLimitForce RA3M_RA4P1_X_damping: coordinate=ra_cmc1_ad_ab upper_stiffness=1e-7 upper_limit=50
        lower_stiffness=1e-7 lower_limit=0 damping=0.00043633 transition=1
    CoordinateLimitForce RA3M_RA4P1_Z_damping: coordinate=ra_cmc1_f_e upper_stiffness=1e-6 upper_limit=50
        lower_stiffness=1e-7 lower_limit=0 damping=0.00043633 transition=1
    CoordinateLimitForce RA4P1_RA5C1_Z_damping: coordinate=ra_mcp1_f_e upper_stiffness=1e-6 upper_limit=0
        lower_stiffness=1e-7 lower_limit=-45 damping=0.00043633 transition=1
    CoordinateLimitForce RA5C1_RA6D1_Z_damping: coordinate=ra_ip1_f_e upper_stiffness=1e-7 upper_limit=0
        lower_stiffness=1e-7 lower_limit=-90 damping=0.00043633 transition=1
    CoordinateLimitForce RA3M_RA4P2_X_damping: coordinate=ra_mcp2_e_f upper_stiffness=1e-8 upper_limit=90
        lower_stiffness=1e-8 lower_limit=0 damping=0.00043633 transition=1
    CoordinateLimitForce RA4P2_RA5C2_X_damping: coordinate=ra_pip2_e_f upper_stiffness=1e-8 upper_limit=120
        lower_stiffness=1e-8 lower_limit=0 damping=0.00043633 transition=1
    CoordinateLimitForce RA5C2_RA6D2_X_damping: coordinate=ra_dip2_e_f upper_stiffness=1e-8 upper_limit=90
        lower_stiffness=1e-8 lower_limit=0 damping=0.00043633 transition=1
    CoordinateLimitForce RA3M_RA4P3_X_damping: coordinate=ra_mcp3_e_f upper_stiffness=1e-7 upper_limit=90
        lower_stiffness=1e-7 lower_limit=0 damping=0.00043633 transition=1
    CoordinateLimitForce RA4P3_RA5C3_X_damping: coordinate=ra_pip3_e_f upper_stiffness=1e-7 upper_limit=120
        lower_stiffness=1e-7 lower_limit=0 damping=0.00043633 transition=1
    CoordinateLimitForce RA5C3_RA6D3_X_damping: coordinate=ra_dip3_e_f upper_stiffness=1e-7 upper_limit=90
        lower_stiffness=1e-7 lower_limit=0 damping=0.00043633 transition=1
    CoordinateLimitForce RA3M_RA4P4_X_damping: coordinate=ra_mcp4_e_f upper_stiffness=1e-8 upper_limit=90
        lower_stiffness=1e-8 lower_limit=0 damping=0.00043633 transition=1
    CoordinateLimitForce RA4P4_RA5C4_X_damping: coordinate=ra_pip4_e_f upper_stiffness=1e-7 upper_limit=120
        lower_stiffness=1e-7 lower_limit=0 damping=0.00043633 transition=1
    CoordinateLimitForce RA5C4_RA6D4_X_damping: coordinate=ra_dip4_e_f upper_stiffness=1e-7 upper_limit=90
        lower_stiffness=1e-7 lower_limit=0 damping=0.00043633 transition=1
    CoordinateLimitForce RA3M_RA4P5_X_damping: coordinate=ra_mcp5_e_f upper_stiffness=1e-7 upper_limit=90
        lower_stiffness=1e-7 lower_limit=0 damping=0.00043633 transition=1
    CoordinateLimitForce RA4P5_RA5C5_X_damping: coordinate=ra_pip5_e_f upper_stiffness=1e-7 upper_limit=120
        lower_stiffness=1e-7 lower_limit=0 damping=0.00043633 transition=1
    CoordinateLimitForce RA5C5_RA6D5_X_damping: coordinate=ra_dip5_e_f upper_stiffness=1e-7 upper_limit=90
        lower_stiffness=1e-7 lower_limit=0 damping=0.00043633 transition=1
    Millard2012EquilibriumMuscle [values shared by the 22 below unless stated]:
      ActiveForceLengthCurve: minimum_value=0
      ForceVelocityCurve: concentric_slope_at_vmax=0 concentric_slope_near_vmax=0.25 isometric_slope=5
          eccentric_slope_at_vmax=0 eccentric_slope_near_vmax=0.15 max_eccentric_velocity_force_multiplier=1.4
      FiberForceLengthCurve
      TendonForceLengthCurve
    Millard2012EquilibriumMuscle DELT_A: max_isometric_force=1218.9 optimal_fiber_length=0.0976
        tendon_slack_length=0.097 pennation_angle_at_optimal=0.3839724 minimum_activation=0.01
      PathPoint P1: RA1H (0.00896 -0.11883 0.00585)
      PathPoint P2: RA1H (0.01623 -0.11033 0.00412)
      PathPoint P3: RScapula (0.04347 -0.03202 0.00139)
      PathPoint P4: RClavicle (-0.014 0.01106 0.08021)
      PathWrap: wrap_object=delt2hum method=hybrid
      PathWrap pathwrap_0: wrap_object=DELT1hh method=hybrid range=(2 3)
    Millard2012EquilibriumMuscle DELT_LAT: max_isometric_force=1103.5 optimal_fiber_length=0.1078
        tendon_slack_length=0.1095 pennation_angle_at_optimal=0.2617994 minimum_activation=0.01
      PathPoint P1: RA1H (0.00461 -0.13611 0.0056)
      PathPoint P4: RScapula (-0.01078 -0.00034 0.0062)
      PathWrap: wrap_object=Deltoid2 method=hybrid range=(1 2)
    Millard2012EquilibriumMuscle DELT_P: max_isometric_force=201.6 optimal_fiber_length=0.1367
        tendon_slack_length=0.038 pennation_angle_at_optimal=0.3141593 minimum_activation=0.01
      PathPoint P1: RScapula (-0.05573 0.00122 -0.02512)
      PathPoint P2: RScapula (-0.0740232 -0.0339024 0.0136422)
      PathPoint P3: RA1H (0.00206 -0.07602 0.01045)
      PathWrap: wrap_object=delt3hum method=hybrid
      PathWrap pathwrap_0: wrap_object=DELT_TMAJ_LAT_PEC_CORBhh method=hybrid
    Millard2012EquilibriumMuscle SUPSP: max_isometric_force=499.2 optimal_fiber_length=0.0682
        tendon_slack_length=0.0395 pennation_angle_at_optimal=0.1221731 minimum_activation=0.01
      PathPoint P1: RA1H (0.02097889 0.0142825 0.01905812)
      PathPoint P3: RScapula (-0.044 -0.01512 -0.05855)
      PathWrap: wrap_object=SUPSP2 method=hybrid
    Millard2012EquilibriumMuscle INFSP: max_isometric_force=1075.8 optimal_fiber_length=0.0755
        tendon_slack_length=0.0308 pennation_angle_at_optimal=0.3316126 minimum_activation=0.01
      PathPoint P1: RA1H (-0.00887 0.00484 0.02448)
      PathPoint P2: RScapula (-0.07382 -0.05476 -0.04781)
      PathWrap: wrap_object=INFSP method=hybrid
      PathWrap pathwrap_0: wrap_object=INFSP_and_TMIN_hum_head method=hybrid
    Millard2012EquilibriumMuscle SUBSC: max_isometric_force=1306.9 optimal_fiber_length=0.0873
        tendon_slack_length=0.033 pennation_angle_at_optimal=0.3490659 minimum_activation=0.01
      PathPoint P1: RA1H (0.01403 0.0084 -0.01331)
      PathPoint P2: RScapula (-0.01831 -0.05223 -0.02457)
      PathPoint P3: RScapula (-0.07246 -0.03943 -0.06475)
      PathWrap: wrap_object=SUBSCAP method=hybrid
    Millard2012EquilibriumMuscle TERMI: max_isometric_force=269.5 optimal_fiber_length=0.0741
        tendon_slack_length=0.0713 pennation_angle_at_optimal=0.418879 minimum_activation=0.01
      PathPoint P1: RA1H (-0.00127 -0.01259 0.022)
      PathPoint P2: RScapula (-0.09473 -0.07991 -0.04737)
      PathPoint P3: RScapula (-0.09643 -0.08121 -0.05298)
      PathWrap: wrap_object=TMIN method=hybrid range=(1 2)
      PathWrap pathwrap_0: wrap_object=INFSP_and_TMIN_hum_head method=hybrid range=(1 2)
      PathWrap pathwrap_1: wrap_object=TMINhum method=hybrid range=(1 2)
    Millard2012EquilibriumMuscle TERMA: max_isometric_force=144 optimal_fiber_length=0.1624 tendon_slack_length=0.02
        pennation_angle_at_optimal=0.2792527 minimum_activation=0.01
      PathPoint P1: RA1H (0.00998 -0.05419 -0.00568)
      PathPoint P2: RScapula (-0.10264 -0.10319 -0.05829)
      PathPoint P3: RScapula (-0.10489 -0.10895 -0.07117)
      PathWrap: wrap_object=TMAJ_LAThum method=hybrid
      PathWrap pathwrap_0: wrap_object=LAT_TMAJhh method=hybrid range=(1 2)
      PathWrap pathwrap_1: wrap_object=LAT_TMAJ2hh method=hybrid
    Millard2012EquilibriumMuscle PECM_R: optimal_force=1 max_isometric_force=444.3 optimal_fiber_length=0.1442
        tendon_slack_length=0.0028 pennation_angle_at_optimal=0.296706 minimum_activation=0.01
      PathPoint P1: RA1H (0.01169 -0.04191 0.0078)
      PathPoint PECM_R: RA1H (0.0171333 -0.037 -0.00337)
      PathPoint PECM_R_0: Thorax (0.00445605 -0.00411206 0.119678)
      PathPoint P2: RClavicle (0.00321 -0.00013 0.05113)
      PathWrap: wrap_object=PECM_R_Thorax method=hybrid
      PathWrap pathwrap_0: wrap_object=PECM_R_hum method=hybrid range=(2 3)
      PathWrap pathwrap_1: wrap_object=PECM_R_hh method=hybrid
    Millard2012EquilibriumMuscle PECM_M: max_isometric_force=658.3 optimal_fiber_length=0.1385
        tendon_slack_length=0.089 pennation_angle_at_optimal=0.4537856 minimum_activation=0.01
      PathPoint P1: RA1H (0.01274 -0.04289 0.00785)
      PathPoint PECM_M: RA1H (0.0155133 -0.04223 -0.00447)
      PathPoint PECM_M_0: Thorax (0.0203967 -0.03295 0.123283)
      PathPoint P4: Thorax (0.03091 -0.03522 0.09705)
      PathPoint P5: Thorax (0.02769 -0.04498 0.02271)
      PathWrap: wrap_object=Thorax method=hybrid
      PathWrap pathwrap_0: wrap_object=PEC12hum method=hybrid range=(2 3)
      PathWrap pathwrap_1: wrap_object=TMAJ_LAT_PEC_CORBhh method=hybrid
      PathWrap pathwrap_2: wrap_object=PEC23hh method=hybrid
    Millard2012EquilibriumMuscle PECM_C: max_isometric_force=498.1 optimal_fiber_length=0.1385
        tendon_slack_length=0.132 pennation_angle_at_optimal=0.4363323 minimum_activation=0.01
      PathPoint P1: RA1H (0.01269 -0.04375 0.0075)
      PathPoint PECM_C: RA1H (0.0142376 -0.0456522 -0.00936165)
      PathPoint PECM_C_0: Thorax (0.02984 -0.0684602 0.114267)
      PathPoint P4: Thorax (0.0525 -0.08417 0.08935)
      PathPoint P5: Thorax (0.05724 -0.11654 0.03787)
      PathWrap: wrap_object=Thorax method=hybrid
      PathWrap pathwrap_0: wrap_object=PEC3hum method=hybrid range=(2 3)
      PathWrap pathwrap_1: wrap_object=PEC23hh method=hybrid
    Millard2012EquilibriumMuscle LATD_R: max_isometric_force=290.5 optimal_fiber_length=0.254 tendon_slack_length=0.12
        pennation_angle_at_optimal=0.4363323 minimum_activation=0.01
      PathPoint P1: RA1H (0.0105 -0.03415 -0.00653)
      PathPoint LATD_R: RScapula (-0.0736533 -0.0789433 -0.02428)
      PathPoint LATD_R_0: RScapula (-0.109183 -0.0768233 -0.06022)
      PathPoint P4: Thorax (-0.11828 -0.10118 0.03316)
      PathPoint P5: Thorax (-0.09578 -0.11724 0.00882)
      PathWrap: wrap_object=TMAJ_LAThum method=hybrid
      PathWrap pathwrap_0: wrap_object=LAT_TMAJhh method=hybrid range=(1 2)
      PathWrap pathwrap_1: wrap_object=LAT_TMAJ2hh method=hybrid
    Millard2012EquilibriumMuscle LATD_M: max_isometric_force=317.5 optimal_fiber_length=0.2324
        tendon_slack_length=0.1765 pennation_angle_at_optimal=0.3316126 minimum_activation=0.01
      PathPoint P1: RA1H (0.00968 -0.04071 -0.00611)
      PathPoint LATD_M: RScapula (-0.0787333 -0.0887833 -0.02023)
      PathPoint LATD_M_0: RScapula (-0.10544 -0.128957 -0.0645967)
      PathPoint P4: Thorax (-0.10992 -0.16908 0.02878)
      PathPoint P5: Thorax (-0.07186 -0.18818 0.00815)
      PathWrap: wrap_object=TMAJ_LAThum method=hybrid
      PathWrap pathwrap_0: wrap_object=LAT_TMAJhh method=hybrid range=(1 2)
      PathWrap pathwrap_1: wrap_object=LAT_TMAJ2hh method=hybrid
    Millard2012EquilibriumMuscle LATD_C: optimal_force=1 max_isometric_force=189 optimal_fiber_length=0.2789
        tendon_slack_length=0.1403 pennation_angle_at_optimal=0.3665191 minimum_activation=0.01
      PathPoint P1: RA1H (0.01208 -0.03922 -0.00416)
      PathPoint LATD_C: RScapula (-0.06598 -0.126013 -0.0221833)
      PathPoint LATD_C_0: RScapula (-0.10059 -0.156797 -0.0617433)
      PathPoint P4: Thorax (-0.11157 -0.19387 0.05532)
      PathPoint P5: Thorax (-0.07117 -0.24858 0.00907)
      PathWrap: wrap_object=TMAJ_LAThum method=hybrid
      PathWrap pathwrap_0: wrap_object=LAT_TMAJ2hh method=hybrid
    Millard2012EquilibriumMuscle CORBR: max_isometric_force=208.2 optimal_fiber_length=0.0932 tendon_slack_length=0.097
        pennation_angle_at_optimal=0.4712389 minimum_activation=0.01
      PathPoint P1: RScapula (0.0125 -0.04127 -0.02652)
      PathPoint P2: RScapula (0.00483 -0.06958 -0.01563)
      PathPoint P3: RA1H (0.00743 -0.15048 -0.00782)
      PathWrap: wrap_object=CORBhum method=hybrid
      PathWrap pathwrap_0: wrap_object=TMAJ_LAT_PEC_CORBhh method=hybrid
    Millard2012EquilibriumMuscle TRI_LO: optimal_force=1 max_isometric_force=771.8 optimal_fiber_length=0.134
        tendon_slack_length=0.143 pennation_angle_at_optimal=0.2094395 minimum_activation=0.01
      PathPoint P1: RScapula (-0.04565 -0.04073 -0.01377)
      PathPoint P2: RA1H (-0.02714 -0.11441 -0.00664)
      PathPoint P3: RA1H (-0.03184 -0.22637 -0.01217)
      PathPoint P4: RA1H (-0.01743 -0.26757 -0.01208)
      PathPoint P5: RA2U (-0.0219 0.01046 -0.00078)
      PathWrap: wrap_object=TRI method=hybrid
      PathWrap pathwrap_0: wrap_object=TRIlonghh method=hybrid
      PathWrap pathwrap_1: wrap_object=TRIlongglen method=hybrid
    Millard2012EquilibriumMuscle TRI_LAT: max_isometric_force=717.5 optimal_fiber_length=0.1138
        tendon_slack_length=0.098 pennation_angle_at_optimal=0.1570796 minimum_activation=0.01
      PathPoint P1: RA1H (-0.00599 -0.12646 0.00428)
      PathPoint P2: RA1H (-0.02344 -0.14528 0.00928)
      PathPoint P3: RA1H (-0.03184 -0.22637 -0.01217)
      PathPoint P4: RA1H (-0.01743 -0.26757 -0.01208)
      PathPoint P5: RA2U (-0.0219 0.01046 -0.00078)
      PathWrap: wrap_object=TRI method=hybrid
    Millard2012EquilibriumMuscle TRI_M: max_isometric_force=717.5 optimal_fiber_length=0.1138
        tendon_slack_length=0.0908 pennation_angle_at_optimal=0.1570796 minimum_activation=0.01
      PathPoint P1: RA1H (-0.00838 -0.13695 -0.00906)
      PathPoint P2: RA1H (-0.02601 -0.15139 -0.0108)
      PathPoint P3: RA1H (-0.03184 -0.22637 -0.01217)
      PathPoint P4: RA1H (-0.01743 -0.26757 -0.01208)
      PathPoint P5: RA2U (-0.0219 0.01046 -0.00078)
      PathWrap: wrap_object=TRI method=hybrid
    Millard2012EquilibriumMuscle ANC: max_isometric_force=283.2 optimal_fiber_length=0.027 tendon_slack_length=0.018
        pennation_angle_at_optimal=0 minimum_activation=0.01
      PathPoint P1: RA1H (-0.0120554 -0.277583 0.0154298)
      PathPoint P2: RA2U (-0.0218385 0.00688888 -0.0122149)
      PathWrap: wrap_object=ANC_1 method=hybrid range=(1 2)
      PathWrap pathwrap_0: wrap_object=ANC_2 method=hybrid range=(1 2)
    Millard2012EquilibriumMuscle SUP: max_isometric_force=379.6 optimal_fiber_length=0.033 tendon_slack_length=0.028
        pennation_angle_at_optimal=0 minimum_activation=0.01
      PathPoint P2: RA2R (0.016 -0.065 0.014)
      PathPoint P3: RA2U (-0.02 -0.016 0.012)
      PathWrap: wrap_object=wristSUPsup method=hybrid range=(1 2)
    Millard2012EquilibriumMuscle BIC_LO: max_isometric_force=525.1 optimal_fiber_length=0.1157
        tendon_slack_length=0.2783 pennation_angle_at_optimal=0 minimum_activation=0.01
      PathPoint P1: RScapula (-0.0342458 -0.0250575 -0.0114188)
      PathPoint P2: RScapula (-0.0171304 -0.0148168 0.00483016)
      PathPoint P3: RA1H (0.0158141 0.0146813 0.0179232)
      PathPoint P4: RA1H (0.0203717 -0.0121896 0.00761448)
      PathPoint P5: RA1H (0.0164205 -0.0643875 0.00209618)
      PathPoint P6: RA1H (0.0149798 -0.0963813 0.00129995)
      PathPoint P7: RA1H (0.0158218 -0.130321 -0.00335971)
      PathPoint P8: RA1H (0.016247 -0.187132 -0.00617737)
      PathPoint P10: RA2R (-0.00268838 -0.0511622 -0.000693133)
      PathWrap: wrap_object=BIC_LO_elbow method=hybrid range=(8 9)
      PathWrap pathwrap_0: wrap_object=BIC_LO_3 method=hybrid range=(8 9)
      PathWrap pathwrap_1: wrap_object=BIC_LO_2 method=hybrid range=(2 5)
      PathWrap pathwrap_2: wrap_object=BIC_LO_pro_sup method=hybrid range=(8 9)
    Millard2012EquilibriumMuscle BIC_SH: max_isometric_force=316.8 optimal_fiber_length=0.1321
        tendon_slack_length=0.2003 pennation_angle_at_optimal=0 minimum_activation=0.01
      PathPoint P1: RScapula (0.01268 -0.03931 -0.02625)
      PathPoint P2: RScapula (0.00093 -0.06704 -0.01593)
      PathPoint P3: RA1H (0.011 -0.07576 -0.01101)
      PathPoint P4: RA1H (0.00942851 -0.125263 -0.0104958)
      PathPoint P6: RA1H (0.016 -0.18 -0.01)
      PathPoint P8: RA2R (-0.002 -0.05 0)
      PathWrap: wrap_object=BIC_SH_elbow method=hybrid range=(5 6)
      PathWrap pathwrap_0: wrap_object=BIC_SH__pro_sup method=hybrid range=(5 6)
