# OpenSim document version 20302
CMC_TaskSet arm_02_2021:
  CMC_Joint thorax_rot1: weight=1 active=(true false false) kp=100 kv=20 ka=1 coordinate=thorax_rot1 limit=0
  CMC_Joint thorax_rot2: weight=1 active=(false true false) kp=100 kv=20 ka=1 coordinate=thorax_rot2 limit=0
  CMC_Joint thorax_rot3: weight=1 active=(false false †rue) kp=100 kv=20 ka=1 coordinate=thorax_rot3 limit=0
  CMC_Joint sternoclavicular_r2: weight=1 active=(true false false) kp=100 kv=20 ka=1 coordinate=sternoclavicular_r2
      limit=0
  CMC_Joint sternoclavicular_r3: weight=1 active=(false true false) kp=100 kv=20 ka=1 coordinate=sternoclavicular_r3
      limit=0
  CMC_Joint unrotscap_r3: weight=1 active=(true false false) kp=100 kv=20 ka=1 coordinate=unrotscap_r3 limit=0
  CMC_Joint unrotscap_r2: weight=1 active=(false true false) kp=100 kv=20 ka=1 coordinate=unrotscap_r2 limit=0
  CMC_Joint acromioclavicular_r2: weight=1 active=(true false false) kp=100 kv=20 ka=1 coordinate=acromioclavicular_r2
      limit=0
  CMC_Joint acromioclavicular_r3: weight=1 active=(false true false) kp=100 kv=20 ka=1 coordinate=acromioclavicular_r3
      limit=0
  CMC_Joint acromioclavicular_r1: weight=1 active=(false false †rue) kp=100 kv=20 ka=1 coordinate=acromioclavicular_r1
      limit=0
  CMC_Joint unrothum_r1: weight=1 active=(true false false) kp=100 kv=20 ka=1 coordinate=unrothum_r1 limit=0
  CMC_Joint unrothum_r3: weight=1 active=(false true false) kp=100 kv=20 ka=1 coordinate=unrothum_r3 limit=0
  CMC_Joint unrothum_r2: weight=1 active=(false false †rue) kp=100 kv=20 ka=1 coordinate=unrothum_r2 limit=0
  CMC_Joint elv_angle: weight=1 active=(true false false) kp=100 kv=20 ka=1 coordinate=elv_angle limit=0
  CMC_Joint shoulder_elv: weight=1 active=(true false false) kp=100 kv=20 ka=1 coordinate=shoulder_elv limit=0
  CMC_Joint shoulder1_r2: weight=1 active=(false true false) kp=100 kv=20 ka=1 coordinate=shoulder1_r2 limit=0
  CMC_Joint shoulder_rot: weight=1 active=(true false false) kp=100 kv=20 ka=1 coordinate=shoulder_rot limit=0
  CMC_Joint phys_coord_ab_ad: weight=1 active=(true false false) kp=100 kv=20 ka=1 coordinate=phys_coord_ab_ad limit=0
  CMC_Joint phys_coord_rot: weight=1 active=(false true false) kp=100 kv=20 ka=1 coordinate=phys_coord_rot limit=0
  CMC_Joint phys_coord_fl_ex: weight=1 active=(false false †rue) kp=100 kv=20 ka=1 coordinate=phys_coord_fl_ex limit=0
  CMC_Joint elbow_flexion: weight=1 active=(true false false) kp=100 kv=20 ka=1 coordinate=elbow_flexion limit=0
  CMC_Joint ra_el_e_f: weight=1 active=(false false †rue) kp=100 kv=20 ka=1 coordinate=ra_el_e_f limit=0
  CMC_Joint ra_wr_s_p: weight=1 active=(true false false) kp=100 kv=20 ka=1 coordinate=ra_wr_s_p limit=0
  CMC_Joint ra_wr_e_f: weight=1 active=(true false false) kp=100 kv=20 ka=1 coordinate=ra_wr_e_f limit=0
  CMC_Joint ra_wr_ad_ab: weight=1 active=(false false †rue) kp=100 kv=20 ka=1 coordinate=ra_wr_ad_ab limit=0
  CMC_Joint ra_cmc1_ad_ab: weight=1 active=(true false false) kp=100 kv=20 ka=1 coordinate=ra_cmc1_ad_ab limit=0
  CMC_Joint ra_cmc1_f_e: weight=1 active=(false false †rue) kp=100 kv=20 ka=1 coordinate=ra_cmc1_f_e limit=0
  CMC_Joint ra_mcp1_f_e: weight=1 active=(false false †rue) kp=100 kv=20 ka=1 coordinate=ra_mcp1_f_e limit=0
  CMC_Joint ra_ip1_f_e: weight=1 active=(false false †rue) kp=100 kv=20 ka=1 coordinate=ra_ip1_f_e limit=0
  CMC_Joint ra_mcp2_e_f: weight=1 active=(true false false) kp=100 kv=20 ka=1 coordinate=ra_mcp2_e_f limit=0
  CMC_Joint ra_mcp2_ab_ad: weight=1 active=(false false †rue) kp=100 kv=20 ka=1 coordinate=ra_mcp2_ab_ad limit=0
  CMC_Joint ra_pip2_e_f: weight=1 active=(true false false) kp=100 kv=20 ka=1 coordinate=ra_pip2_e_f limit=0
  CMC_Joint ra_dip2_e_f: weight=1 active=(true false false) kp=100 kv=20 ka=1 coordinate=ra_dip2_e_f limit=0
  CMC_Joint ra_mcp3_e_f: weight=1 active=(true false false) kp=100 kv=20 ka=1 coordinate=ra_mcp3_e_f limit=0
  CMC_Joint ra_mcp3_ab_ad: weight=1 active=(false false †rue) kp=100 kv=20 ka=1 coordinate=ra_mcp3_ab_ad limit=0
  CMC_Joint ra_pip3_e_f: weight=1 active=(true false false) kp=100 kv=20 ka=1 coordinate=ra_pip3_e_f limit=0
  CMC_Joint ra_dip3_e_f: weight=1 active=(true false false) kp=100 kv=20 ka=1 coordinate=ra_dip3_e_f limit=0
  CMC_Joint ra_mcp4_e_f: weight=1 active=(true false false) kp=100 kv=20 ka=1 coordinate=ra_mcp4_e_f limit=0
  CMC_Joint ra_mcp4_ab_ad: weight=1 active=(false false †rue) kp=100 kv=20 ka=1 coordinate=ra_mcp4_ab_ad limit=0
  CMC_Joint ra_pip4_e_f: weight=1 active=(true false false) kp=100 kv=20 ka=1 coordinate=ra_pip4_e_f limit=0
  CMC_Joint ra_dip4_e_f: weight=1 active=(true false false) kp=100 kv=20 ka=1 coordinate=ra_dip4_e_f limit=0
  CMC_Joint ra_mcp5_e_f: weight=1 active=(true false false) kp=100 kv=20 ka=1 coordinate=ra_mcp5_e_f limit=0
  CMC_Joint ra_mcp5_ab_ad: weight=1 active=(false false †rue) kp=100 kv=20 ka=1 coordinate=ra_mcp5_ab_ad limit=0
  CMC_Joint ra_pip5_e_f: weight=1 active=(true false false) kp=100 kv=20 ka=1 coordinate=ra_pip5_e_f limit=0
  CMC_Joint ra_dip5_e_f: weight=1 active=(true false false) kp=100 kv=20 ka=1 coordinate=ra_dip5_e_f limit=0
