# OpenSim document version 20302
ForceSet arm_02_2021:
  CoordinateActuator thorax_rot2_reserve: coordinate=thorax_rot2 optimal_force=1
  CoordinateActuator thorax_rot3_reserve: coordinate=thorax_rot3 optimal_force=1
  CoordinateActuator sternoclavicular_r3_reserve: coordinate=sternoclavicular_r3 optimal_force=1
  CoordinateActuator unrotscap_r2_reserve: coordinate=unrotscap_r2 optimal_force=1
  CoordinateActuator acromioclavicular_r3_reserve: coordinate=acromioclavicular_r3 optimal_force=1
  CoordinateActuator acromioclavicular_r1_reserve: coordinate=acromioclavicular_r1 optimal_force=1
  CoordinateActuator unrothum_r3_reserve: coordinate=unrothum_r3 optimal_force=1
  CoordinateActuator unrothum_r2_reserve: coordinate=unrothum_r2 optimal_force=1
  CoordinateActuator shoulder1_r2_reserve: coordinate=shoulder1_r2 optimal_force=1
  CoordinateActuator phys_coord_rot_reserve: coordinate=phys_coord_rot optimal_force=1
  CoordinateActuator phys_coord_fl_ex_reserve: coordinate=phys_coord_fl_ex optimal_force=1
  CoordinateActuator ra_el_e_f_reserve: coordinate=ra_el_e_f optimal_force=1
  CoordinateActuator ra_wr_ad_ab_reserve: coordinate=ra_wr_ad_ab optimal_force=1
  CoordinateActuator ra_cmc1_f_e_reserve: coordinate=ra_cmc1_f_e optimal_force=1
  CoordinateActuator ra_mcp1_f_e_reserve: coordinate=ra_mcp1_f_e optimal_force=1
  CoordinateActuator ra_ip1_f_e_reserve: coordinate=ra_ip1_f_e optimal_force=1
  CoordinateActuator ra_mcp2_ab_ad_reserve: coordinate=ra_mcp2_ab_ad optimal_force=1
  CoordinateActuator ra_mcp3_ab_ad_reserve: coordinate=ra_mcp3_ab_ad optimal_force=1
  CoordinateActuator ra_mcp4_ab_ad_reserve: coordinate=ra_mcp4_ab_ad optimal_force=1
  CoordinateActuator ra_mcp5_ab_ad_reserve: coordinate=ra_mcp5_ab_ad optimal_force=1
